<neuroml xmlns="http://www.neuroml.org/schema/neuroml2"  xmlns:xi="http://www.w3.org/2001/XInclude" xmlns:xs="http://www.w3.org/2001/XMLSchema" xmlns:xsi="http://www.w3.org/2001/XMLSchema-instance" xsi:schemaLocation="http://www.w3.org/2001/XMLSchema" id="MuscleConnections">
    <network id="MuscleConnections">
        <population id="dBWML10" component="dBWML10" size="1">
            <instance id="0">
                <location y="0.000000" x="0.000000" z="0.000000"/>
            </instance>
        </population>
        <projection id="NCXLS_URAVR_vBWMR6" postsynapticPopulation="vBWMR6" presynapticPopulation="URAVR">
            <connection preFractionAlong="0.213796714738" preCellId="../URAVR/0/URAVR" postFractionAlong="1.0" postSegmentId="90" postCellId="../vBWMR6/0/vBWMR6" preSegmentId="17" id="1"/>
        </projection>
        <projection id="NCXLS_IL1R_dBWMR4" postsynapticPopulation="dBWMR4" presynapticPopulation="IL1R">
            <connection preFractionAlong="0.0230158527959" preCellId="../IL1R/0/IL1R" postFractionAlong="0.178940662323" postSegmentId="107" postCellId="../dBWMR4/0/dBWMR4" preSegmentId="17" id="11397"/>
            <connection preFractionAlong="0.868391242646" preCellId="../IL1R/0/IL1R" postFractionAlong="1.0" postSegmentId="104" postCellId="../dBWMR4/0/dBWMR4" preSegmentId="22" id="11416"/>
            <connection preFractionAlong="0.868391242646" preCellId="../IL1R/0/IL1R" postFractionAlong="1.0" postSegmentId="150" postCellId="../dBWMR4/0/dBWMR4" preSegmentId="22" id="11417"/>
        </projection>
        <projection id="NCXLS_PDEL_vBWML11" postsynapticPopulation="vBWML11" presynapticPopulation="PDEL">
            <connection preFractionAlong="0.956115680179" preCellId="../PDEL/0/PDEL" postFractionAlong="0.0" postSegmentId="195" postCellId="../vBWML11/0/vBWML11" preSegmentId="29" id="19693"/>
        </projection>
        <projection id="NCXLS_RMEL_dBWMR5" postsynapticPopulation="dBWMR5" presynapticPopulation="RMEL">
            <connection preFractionAlong="0.0" preCellId="../RMEL/0/RMEL" postFractionAlong="0.419275182076" postSegmentId="194" postCellId="../dBWMR5/0/dBWMR5" preSegmentId="12" id="28351"/>
            <connection preFractionAlong="1.0" preCellId="../RMEL/0/RMEL" postFractionAlong="1.0" postSegmentId="21" postCellId="../dBWMR5/0/dBWMR5" preSegmentId="9" id="28486"/>
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        </projection>
        <projection id="NCXLS_RMDDL_vBWML1" postsynapticPopulation="vBWML1" presynapticPopulation="RMDDL">
            <connection preFractionAlong="1.0" preCellId="../RMDDL/0/RMDDL" postFractionAlong="1.0" postSegmentId="102" postCellId="../vBWML1/0/vBWML1" preSegmentId="7" id="34711"/>
        </projection>
        <projection id="NCXLS_URADR_dBWMR1" postsynapticPopulation="dBWMR1" presynapticPopulation="URADR">
            <connection preFractionAlong="0.0160529429462" preCellId="../URADR/0/URADR" postFractionAlong="0.0637608444561" postSegmentId="298" postCellId="../dBWMR1/0/dBWMR1" preSegmentId="10" id="47884"/>
            <connection preFractionAlong="1.0" preCellId="../URADR/0/URADR" postFractionAlong="1.0" postSegmentId="118" postCellId="../dBWMR1/0/dBWMR1" preSegmentId="18" id="47937"/>
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        </projection>
        <projection id="NCXLS_SMBDR_dBWMR2" postsynapticPopulation="dBWMR2" presynapticPopulation="SMBDR">
            <connection preFractionAlong="1.0" preCellId="../SMBDR/0/SMBDR" postFractionAlong="1.0" postSegmentId="218" postCellId="../dBWMR2/0/dBWMR2" preSegmentId="13" id="62241"/>
            <connection preFractionAlong="0.0" preCellId="../SMBDR/0/SMBDR" postFractionAlong="1.0" postSegmentId="58" postCellId="../dBWMR2/0/dBWMR2" preSegmentId="16" id="62355"/>
            <connection preFractionAlong="0.0" preCellId="../SMBDR/0/SMBDR" postFractionAlong="0.0" postSegmentId="59" postCellId="../dBWMR2/0/dBWMR2" preSegmentId="16" id="62356"/>
        </projection>
        <projection id="NCXLS_RIFL_dBWML5" postsynapticPopulation="dBWML5" presynapticPopulation="RIFL">
            <connection preFractionAlong="0.162632036841" preCellId="../RIFL/0/RIFL" postFractionAlong="0.200169187231" postSegmentId="26" postCellId="../dBWML5/0/dBWML5" preSegmentId="13" id="73681"/>
            <connection preFractionAlong="1.0" preCellId="../RIFL/0/RIFL" postFractionAlong="1.0" postSegmentId="124" postCellId="../dBWML5/0/dBWML5" preSegmentId="10" id="73826"/>
        </projection>
        <projection id="NCXLS_VA11_vBWMR22" postsynapticPopulation="vBWMR22" presynapticPopulation="VA11">
            <connection preFractionAlong="0.460535597908" preCellId="../VA11/0/VA11" postFractionAlong="0.441078184393" postSegmentId="126" postCellId="../vBWMR22/0/vBWMR22" preSegmentId="10" id="85589"/>
            <connection preFractionAlong="0.396585150352" preCellId="../VA11/0/VA11" postFractionAlong="1.0" postSegmentId="44" postCellId="../vBWMR22/0/vBWMR22" preSegmentId="10" id="85597"/>
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        </projection>
        <projection id="NCXLS_VA11_vBWML13" postsynapticPopulation="vBWML13" presynapticPopulation="VA11">
            <connection preFractionAlong="0.0" preCellId="../VA11/0/VA11" postFractionAlong="1.0" postSegmentId="154" postCellId="../vBWML13/0/vBWML13" preSegmentId="7" id="94554"/>
        </projection>
        <projection id="NCXLS_PDB_dBWML23" postsynapticPopulation="dBWML23" presynapticPopulation="PDB">
            <connection preFractionAlong="0.16372634337" preCellId="../PDB/0/PDB" postFractionAlong="0.343523491419" postSegmentId="426" postCellId="../dBWML23/0/dBWML23" preSegmentId="24" id="112812"/>
            <connection preFractionAlong="0.368981755076" preCellId="../PDB/0/PDB" postFractionAlong="0.291860804889" postSegmentId="570" postCellId="../dBWML23/0/dBWML23" preSegmentId="25" id="112837"/>
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        </projection>
        <projection id="NCXLS_AVL_vBWMR22" postsynapticPopulation="vBWMR22" presynapticPopulation="AVL">
            <connection preFractionAlong="0.451852753599" preCellId="../AVL/0/AVL" postFractionAlong="0.0562818559218" postSegmentId="48" postCellId="../vBWMR22/0/vBWMR22" preSegmentId="56" id="135063"/>
            <connection preFractionAlong="0.467161268924" preCellId="../AVL/0/AVL" postFractionAlong="0.65159448513" postSegmentId="356" postCellId="../vBWMR22/0/vBWMR22" preSegmentId="57" id="135067"/>
        </projection>
        <projection id="NCXLS_VA12_vBWML22" postsynapticPopulation="vBWML22" presynapticPopulation="VA12">
            <connection preFractionAlong="0.200045939739" preCellId="../VA12/0/VA12" postFractionAlong="0.262589787129" postSegmentId="580" postCellId="../vBWML22/0/vBWML22" preSegmentId="6" id="144178"/>
            <connection preFractionAlong="0.294588533908" preCellId="../VA12/0/VA12" postFractionAlong="0.131896026353" postSegmentId="64" postCellId="../vBWML22/0/vBWML22" preSegmentId="5" id="144183"/>
            <connection preFractionAlong="0.294588533908" preCellId="../VA12/0/VA12" postFractionAlong="0.131896026353" postSegmentId="642" postCellId="../vBWML22/0/vBWML22" preSegmentId="5" id="144184"/>
            <connection preFractionAlong="0.455303013388" preCellId="../VA12/0/VA12" postFractionAlong="0.211869524376" postSegmentId="261" postCellId="../vBWML22/0/vBWML22" preSegmentId="6" id="144193"/>
        </projection>
        <projection id="NCXLS_AS11_dBWML22" postsynapticPopulation="dBWML22" presynapticPopulation="AS11">
            <connection preFractionAlong="0.867104593353" preCellId="../AS11/0/AS11" postFractionAlong="1.0" postSegmentId="306" postCellId="../dBWML22/0/dBWML22" preSegmentId="23" id="160111"/>
            <connection preFractionAlong="0.249694864143" preCellId="../AS11/0/AS11" postFractionAlong="0.316879682158" postSegmentId="202" postCellId="../dBWML22/0/dBWML22" preSegmentId="19" id="160122"/>
            <connection preFractionAlong="0.249694864143" preCellId="../AS11/0/AS11" postFractionAlong="0.316879682158" postSegmentId="544" postCellId="../dBWML22/0/dBWML22" preSegmentId="19" id="160123"/>
        </projection>
        <projection id="NCXLS_CEPDR_dBWMR3" postsynapticPopulation="dBWMR3" presynapticPopulation="CEPDR">
            <connection preFractionAlong="0.0141124178374" preCellId="../CEPDR/0/CEPDR" postFractionAlong="0.792185189291" postSegmentId="61" postCellId="../dBWMR3/0/dBWMR3" preSegmentId="12" id="182427"/>
            <connection preFractionAlong="0.063610022687" preCellId="../CEPDR/0/CEPDR" postFractionAlong="0.418554016751" postSegmentId="63" postCellId="../dBWMR3/0/dBWMR3" preSegmentId="13" id="182429"/>
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        </projection>
        <projection id="NCXLS_RMER_dBWML4" postsynapticPopulation="dBWML4" presynapticPopulation="RMER">
            <connection preFractionAlong="0.369938104783" preCellId="../RMER/0/RMER" postFractionAlong="0.163294871784" postSegmentId="218" postCellId="../dBWML4/0/dBWML4" preSegmentId="13" id="193575"/>
            <connection preFractionAlong="0.0" preCellId="../RMER/0/RMER" postFractionAlong="1.0" postSegmentId="114" postCellId="../dBWML4/0/dBWML4" preSegmentId="10" id="193764"/>
            <connection preFractionAlong="0.0" preCellId="../RMER/0/RMER" postFractionAlong="0.0" postSegmentId="115" postCellId="../dBWML4/0/dBWML4" preSegmentId="10" id="193765"/>
            <connection preFractionAlong="0.0" preCellId="../RMER/0/RMER" postFractionAlong="1.0" postSegmentId="218" postCellId="../dBWML4/0/dBWML4" preSegmentId="10" id="193766"/>
        </projection>
        <projection id="NCXLS_IL1R_dBWMR5" postsynapticPopulation="dBWMR5" presynapticPopulation="IL1R">
            <connection preFractionAlong="1.0" preCellId="../IL1R/0/IL1R" postFractionAlong="0.544213034796" postSegmentId="194" postCellId="../dBWMR5/0/dBWMR5" preSegmentId="15" id="206419"/>
            <connection preFractionAlong="1.0" preCellId="../IL1R/0/IL1R" postFractionAlong="1.0" postSegmentId="21" postCellId="../dBWMR5/0/dBWMR5" preSegmentId="6" id="206425"/>
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        </projection>
        <projection id="NCXLS_CEPVR_vBWMR3" postsynapticPopulation="vBWMR3" presynapticPopulation="CEPVR">
            <connection preFractionAlong="0.41677009653" preCellId="../CEPVR/0/CEPVR" postFractionAlong="1.0" postSegmentId="195" postCellId="../vBWMR3/0/vBWMR3" preSegmentId="11" id="217412"/>
        </projection>
        <projection id="NCXLS_PVCL_vBWML12" postsynapticPopulation="vBWML12" presynapticPopulation="PVCL">
            <connection preFractionAlong="0.543476030381" preCellId="../PVCL/0/PVCL" postFractionAlong="0.534090297847" postSegmentId="276" postCellId="../vBWML12/0/vBWML12" preSegmentId="42" id="223676"/>
        </projection>
        <projection id="NCXLS_RMEL_vBWMR4" postsynapticPopulation="vBWMR4" presynapticPopulation="RMEL">
            <connection preFractionAlong="0.0" preCellId="../RMEL/0/RMEL" postFractionAlong="0.70267595439" postSegmentId="41" postCellId="../vBWMR4/0/vBWMR4" preSegmentId="7" id="231176"/>
            <connection preFractionAlong="1.0" preCellId="../RMEL/0/RMEL" postFractionAlong="1.0" postSegmentId="1" postCellId="../vBWMR4/0/vBWMR4" preSegmentId="4" id="231423"/>
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        </projection>
        <projection id="NCXLS_GLRDL_dBWML6" postsynapticPopulation="dBWML6" presynapticPopulation="GLRDL">
            <connection preFractionAlong="0.175749371805" preCellId="../GLRDL/0/GLRDL" postFractionAlong="1.0" postSegmentId="159" postCellId="../dBWML6/0/dBWML6" preSegmentId="7" id="240007"/>
            <connection preFractionAlong="0.0" preCellId="../GLRDL/0/GLRDL" postFractionAlong="1.0" postSegmentId="42" postCellId="../dBWML6/0/dBWML6" preSegmentId="9" id="240069"/>
        </projection>
        <projection id="NCXLS_PVNL_vBWMR12" postsynapticPopulation="vBWMR12" presynapticPopulation="PVNL">
            <connection preFractionAlong="0.904550114077" preCellId="../PVNL/0/PVNL" postFractionAlong="0.156488493052" postSegmentId="24" postCellId="../vBWMR12/0/vBWMR12" preSegmentId="41" id="245526"/>
        </projection>
        <projection id="NCXLS_RIVL_vBWMR7" postsynapticPopulation="vBWMR7" presynapticPopulation="RIVL">
            <connection preFractionAlong="1.0" preCellId="../RIVL/0/RIVL" postFractionAlong="1.0" postSegmentId="93" postCellId="../vBWMR7/0/vBWMR7" preSegmentId="26" id="263199"/>
            <connection preFractionAlong="1.0" preCellId="../RIVL/0/RIVL" postFractionAlong="0.0" postSegmentId="92" postCellId="../vBWMR7/0/vBWMR7" preSegmentId="14" id="263275"/>
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        </projection>
        <projection id="NCXLS_RMEL_dBWMR3" postsynapticPopulation="dBWMR3" presynapticPopulation="RMEL">
            <connection preFractionAlong="0.0" preCellId="../RMEL/0/RMEL" postFractionAlong="0.419275678739" postSegmentId="6" postCellId="../dBWMR3/0/dBWMR3" preSegmentId="12" id="279039"/>
            <connection preFractionAlong="0.0" preCellId="../RMEL/0/RMEL" postFractionAlong="0.314696615716" postSegmentId="25" postCellId="../dBWMR3/0/dBWMR3" preSegmentId="11" id="279047"/>
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        </projection>
        <projection id="NCXLS_URADR_dBWMR3" postsynapticPopulation="dBWMR3" presynapticPopulation="URADR">
            <connection preFractionAlong="1.0" preCellId="../URADR/0/URADR" postFractionAlong="0.356622440675" postSegmentId="78" postCellId="../dBWMR3/0/dBWMR3" preSegmentId="16" id="287039"/>
            <connection preFractionAlong="0.0" preCellId="../URADR/0/URADR" postFractionAlong="0.135732974763" postSegmentId="18" postCellId="../dBWMR3/0/dBWMR3" preSegmentId="6" id="287045"/>
            <connection preFractionAlong="0.0" preCellId="../URADR/0/URADR" postFractionAlong="0.864267025237" postSegmentId="138" postCellId="../dBWMR3/0/dBWMR3" preSegmentId="6" id="287046"/>
            <connection preFractionAlong="0.123244507851" preCellId="../URADR/0/URADR" postFractionAlong="1.0" postSegmentId="132" postCellId="../dBWMR3/0/dBWMR3" preSegmentId="9" id="287132"/>
        </projection>
        <projection id="NCXLS_SMDDL_dBWMR4" postsynapticPopulation="dBWMR4" presynapticPopulation="SMDDL">
            <connection preFractionAlong="0.397698840978" preCellId="../SMDDL/0/SMDDL" postFractionAlong="1.0" postSegmentId="122" postCellId="../dBWMR4/0/dBWMR4" preSegmentId="19" id="292439"/>
        </projection>
        <projection id="NCXLS_RMHR_vBWML1" postsynapticPopulation="vBWML1" presynapticPopulation="RMHR">
            <connection preFractionAlong="1.0" preCellId="../RMHR/0/RMHR" postFractionAlong="1.0" postSegmentId="102" postCellId="../vBWML1/0/vBWML1" preSegmentId="21" id="306087"/>
            <connection preFractionAlong="1.0" preCellId="../RMHR/0/RMHR" postFractionAlong="0.0" postSegmentId="140" postCellId="../vBWML1/0/vBWML1" preSegmentId="16" id="306365"/>
            <connection preFractionAlong="1.0" preCellId="../RMHR/0/RMHR" postFractionAlong="1.0" postSegmentId="172" postCellId="../vBWML1/0/vBWML1" preSegmentId="16" id="306366"/>
        </projection>
        <projection id="NCXLS_VD13_dBWMR24" postsynapticPopulation="dBWMR24" presynapticPopulation="VD13">
            <connection preFractionAlong="0.396644410979" preCellId="../VD13/0/VD13" postFractionAlong="0.804419544658" postSegmentId="28" postCellId="../dBWMR24/0/dBWMR24" preSegmentId="18" id="336795"/>
            <connection preFractionAlong="0.745263807251" preCellId="../VD13/0/VD13" postFractionAlong="0.115073327711" postSegmentId="196" postCellId="../dBWMR24/0/dBWMR24" preSegmentId="27" id="336822"/>
            <connection preFractionAlong="0.745263807251" preCellId="../VD13/0/VD13" postFractionAlong="0.115073327711" postSegmentId="306" postCellId="../dBWMR24/0/dBWMR24" preSegmentId="27" id="336823"/>
        </projection>
        <projection id="NCXLS_VA12_vBWML20" postsynapticPopulation="vBWML20" presynapticPopulation="VA12">
            <connection preFractionAlong="1.0" preCellId="../VA12/0/VA12" postFractionAlong="1.0" postSegmentId="413" postCellId="../vBWML20/0/vBWML20" preSegmentId="7" id="367767"/>
            <connection preFractionAlong="1.0" preCellId="../VA12/0/VA12" postFractionAlong="0.0" postSegmentId="415" postCellId="../vBWML20/0/vBWML20" preSegmentId="6" id="367779"/>
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        </projection>
        <projection id="NCXLS_AS11_dBWML24" postsynapticPopulation="dBWML24" presynapticPopulation="AS11">
            <connection preFractionAlong="0.943018139669" preCellId="../AS11/0/AS11" postFractionAlong="0.73809363756" postSegmentId="66" postCellId="../dBWML24/0/dBWML24" preSegmentId="17" id="386240"/>
            <connection preFractionAlong="0.0" preCellId="../AS11/0/AS11" postFractionAlong="1.0" postSegmentId="50" postCellId="../dBWML24/0/dBWML24" preSegmentId="12" id="386585"/>
        </projection>
        <projection id="NCXLS_GLRDR_dBWMR6" postsynapticPopulation="dBWMR6" presynapticPopulation="GLRDR">
            <connection preFractionAlong="0.0" preCellId="../GLRDR/0/GLRDR" postFractionAlong="0.48817436352" postSegmentId="203" postCellId="../dBWMR6/0/dBWMR6" preSegmentId="7" id="403331"/>
            <connection preFractionAlong="0.0" preCellId="../GLRDR/0/GLRDR" postFractionAlong="0.46078965511" postSegmentId="172" postCellId="../dBWMR6/0/dBWMR6" preSegmentId="9" id="403403"/>
        </projection>
        <projection id="NCXLS_RIVL_vBWMR6" postsynapticPopulation="vBWMR6" presynapticPopulation="RIVL">
            <connection preFractionAlong="1.0" preCellId="../RIVL/0/RIVL" postFractionAlong="0.0214567365642" postSegmentId="55" postCellId="../vBWMR6/0/vBWMR6" preSegmentId="26" id="413621"/>
            <connection preFractionAlong="1.0" preCellId="../RIVL/0/RIVL" postFractionAlong="1.0" postSegmentId="52" postCellId="../vBWMR6/0/vBWMR6" preSegmentId="12" id="415383"/>
            <connection preFractionAlong="1.0" preCellId="../RIVL/0/RIVL" postFractionAlong="0.0" postSegmentId="53" postCellId="../vBWMR6/0/vBWMR6" preSegmentId="12" id="415384"/>
        </projection>
        <projection id="NCXLS_PDEL_vBWML12" postsynapticPopulation="vBWML12" presynapticPopulation="PDEL">
            <connection preFractionAlong="0.543466041218" preCellId="../PDEL/0/PDEL" postFractionAlong="0.533673393346" postSegmentId="276" postCellId="../vBWML12/0/vBWML12" preSegmentId="32" id="419453"/>
        </projection>
        <projection id="NCXLS_IL1DL_dBWML3" postsynapticPopulation="dBWML3" presynapticPopulation="IL1DL">
            <connection preFractionAlong="1.0" preCellId="../IL1DL/0/IL1DL" postFractionAlong="0.873909618321" postSegmentId="119" postCellId="../dBWML3/0/dBWML3" preSegmentId="17" id="428501"/>
            <connection preFractionAlong="0.971753958509" preCellId="../IL1DL/0/IL1DL" postFractionAlong="1.0" postSegmentId="46" postCellId="../dBWML3/0/dBWML3" preSegmentId="15" id="428503"/>
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        </projection>
        <projection id="NCXLS_URADR_dBWMR2" postsynapticPopulation="dBWMR2" presynapticPopulation="URADR">
            <connection preFractionAlong="0.0160540494569" preCellId="../URADR/0/URADR" postFractionAlong="1.0" postSegmentId="194" postCellId="../dBWMR2/0/dBWMR2" preSegmentId="10" id="442029"/>
            <connection preFractionAlong="1.0" preCellId="../URADR/0/URADR" postFractionAlong="0.0617535595163" postSegmentId="183" postCellId="../dBWMR2/0/dBWMR2" preSegmentId="18" id="442064"/>
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        </projection>
        <projection id="NCXLS_RIML_vBWMR4" postsynapticPopulation="vBWMR4" presynapticPopulation="RIML">
            <connection preFractionAlong="0.1889516066" preCellId="../RIML/0/RIML" postFractionAlong="0.443670733158" postSegmentId="10" postCellId="../vBWMR4/0/vBWMR4" preSegmentId="17" id="458357"/>
            <connection preFractionAlong="0.646013480212" preCellId="../RIML/0/RIML" postFractionAlong="0.0085406331756" postSegmentId="5" postCellId="../vBWMR4/0/vBWMR4" preSegmentId="32" id="458502"/>
        </projection>
        <projection id="NCXLS_VA12_vBWMR19" postsynapticPopulation="vBWMR19" presynapticPopulation="VA12">
            <connection preFractionAlong="1.0" preCellId="../VA12/0/VA12" postFractionAlong="1.0" postSegmentId="57" postCellId="../vBWMR19/0/vBWMR19" preSegmentId="7" id="470080"/>
            <connection preFractionAlong="1.0" preCellId="../VA12/0/VA12" postFractionAlong="1.0" postSegmentId="140" postCellId="../vBWMR19/0/vBWMR19" preSegmentId="6" id="470096"/>
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        </projection>
        <projection id="NCXLS_GLRDR_dBWMR1" postsynapticPopulation="dBWMR1" presynapticPopulation="GLRDR">
            <connection preFractionAlong="0.93780118173" preCellId="../GLRDR/0/GLRDR" postFractionAlong="0.171156050575" postSegmentId="298" postCellId="../dBWMR1/0/dBWMR1" preSegmentId="12" id="481362"/>
            <connection preFractionAlong="0.390700538237" preCellId="../GLRDR/0/GLRDR" postFractionAlong="0.815140012486" postSegmentId="59" postCellId="../dBWMR1/0/dBWMR1" preSegmentId="12" id="481395"/>
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        </projection>
        <projection id="NCXLS_IL1DR_dBWMR3" postsynapticPopulation="dBWMR3" presynapticPopulation="IL1DR">
            <connection preFractionAlong="0.578184765174" preCellId="../IL1DR/0/IL1DR" postFractionAlong="0.539805765725" postSegmentId="61" postCellId="../dBWMR3/0/dBWMR3" preSegmentId="16" id="499257"/>
            <connection preFractionAlong="0.665452264299" preCellId="../IL1DR/0/IL1DR" postFractionAlong="0.348406505064" postSegmentId="139" postCellId="../dBWMR3/0/dBWMR3" preSegmentId="15" id="499258"/>
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        </projection>
        <projection id="NCXLS_VA10_vBWMR10" postsynapticPopulation="vBWMR10" presynapticPopulation="VA10">
            <connection preFractionAlong="0.0" preCellId="../VA10/0/VA10" postFractionAlong="1.0" postSegmentId="246" postCellId="../vBWMR10/0/vBWMR10" preSegmentId="9" id="504457"/>
        </projection>
        <projection id="NCXLS_PVQL_vBWMR10" postsynapticPopulation="vBWMR10" presynapticPopulation="PVQL">
            <connection preFractionAlong="0.810452259604" preCellId="../PVQL/0/PVQL" postFractionAlong="0.423857307142" postSegmentId="168" postCellId="../vBWMR10/0/vBWMR10" preSegmentId="46" id="511597"/>
        </projection>
        <projection id="NCXLS_GLRL_vBWML1" postsynapticPopulation="vBWML1" presynapticPopulation="GLRL">
            <connection preFractionAlong="0.461975956073" preCellId="../GLRL/0/GLRL" postFractionAlong="1.0" postSegmentId="83" postCellId="../vBWML1/0/vBWML1" preSegmentId="17" id="523169"/>
            <connection preFractionAlong="0.632720123166" preCellId="../GLRL/0/GLRL" postFractionAlong="0.911773773444" postSegmentId="49" postCellId="../vBWML1/0/vBWML1" preSegmentId="17" id="523176"/>
            <connection preFractionAlong="0.82995619726" preCellId="../GLRL/0/GLRL" postFractionAlong="0.489895686715" postSegmentId="93" postCellId="../vBWML1/0/vBWML1" preSegmentId="17" id="523180"/>
            <connection preFractionAlong="0.54360807907" preCellId="../GLRL/0/GLRL" postFractionAlong="0.0" postSegmentId="207" postCellId="../vBWML1/0/vBWML1" preSegmentId="14" id="523434"/>
        </projection>
        <projection id="NCXLS_RMER_dBWML3" postsynapticPopulation="dBWML3" presynapticPopulation="RMER">
            <connection preFractionAlong="0.0" preCellId="../RMER/0/RMER" postFractionAlong="1.0" postSegmentId="20" postCellId="../dBWML3/0/dBWML3" preSegmentId="12" id="540585"/>
            <connection preFractionAlong="1.0" preCellId="../RMER/0/RMER" postFractionAlong="0.788519808382" postSegmentId="152" postCellId="../dBWML3/0/dBWML3" preSegmentId="12" id="540612"/>
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        </projection>
        <projection id="NCXLS_RIVL_vBWMR5" postsynapticPopulation="vBWMR5" presynapticPopulation="RIVL">
            <connection preFractionAlong="0.0409796305367" preCellId="../RIVL/0/RIVL" postFractionAlong="0.254603125124" postSegmentId="175" postCellId="../vBWMR5/0/vBWMR5" preSegmentId="14" id="552900"/>
            <connection preFractionAlong="1.0" preCellId="../RIVL/0/RIVL" postFractionAlong="1.0" postSegmentId="98" postCellId="../vBWMR5/0/vBWMR5" preSegmentId="26" id="552952"/>
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        </projection>
        <projection id="NCXLS_SMBDL_dBWMR4" postsynapticPopulation="dBWMR4" presynapticPopulation="SMBDL">
            <connection preFractionAlong="0.113429206237" preCellId="../SMBDL/0/SMBDL" postFractionAlong="1.0" postSegmentId="122" postCellId="../dBWMR4/0/dBWMR4" preSegmentId="19" id="567912"/>
            <connection preFractionAlong="0.0" preCellId="../SMBDL/0/SMBDL" postFractionAlong="0.781682232347" postSegmentId="123" postCellId="../dBWMR4/0/dBWMR4" preSegmentId="16" id="567920"/>
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        </projection>
        <projection id="NCXLS_IL1DL_dBWML2" postsynapticPopulation="dBWML2" presynapticPopulation="IL1DL">
            <connection preFractionAlong="0.979705472049" preCellId="../IL1DL/0/IL1DL" postFractionAlong="0.550401037941" postSegmentId="287" postCellId="../dBWML2/0/dBWML2" preSegmentId="22" id="581768"/>
            <connection preFractionAlong="0.00482470511355" preCellId="../IL1DL/0/IL1DL" postFractionAlong="0.679636980549" postSegmentId="291" postCellId="../dBWML2/0/dBWML2" preSegmentId="14" id="581813"/>
            <connection preFractionAlong="0.98232936335" preCellId="../IL1DL/0/IL1DL" postFractionAlong="0.418274635365" postSegmentId="156" postCellId="../dBWML2/0/dBWML2" preSegmentId="20" id="581833"/>
            <connection preFractionAlong="0.98232936335" preCellId="../IL1DL/0/IL1DL" postFractionAlong="0.418274635365" postSegmentId="238" postCellId="../dBWML2/0/dBWML2" preSegmentId="20" id="581834"/>
        </projection>
        <projection id="NCXLS_VA10_vBWML17" postsynapticPopulation="vBWML17" presynapticPopulation="VA10">
            <connection preFractionAlong="0.0" preCellId="../VA10/0/VA10" postFractionAlong="1.0" postSegmentId="226" postCellId="../vBWML17/0/vBWML17" preSegmentId="9" id="596351"/>
            <connection preFractionAlong="0.985449668824" preCellId="../VA10/0/VA10" postFractionAlong="1.0" postSegmentId="164" postCellId="../vBWML17/0/vBWML17" preSegmentId="13" id="596367"/>
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        </projection>
        <projection id="NCXLS_RMED_vBWMR6" postsynapticPopulation="vBWMR6" presynapticPopulation="RMED">
            <connection preFractionAlong="0.0" preCellId="../RMED/0/RMED" postFractionAlong="0.559077532179" postSegmentId="51" postCellId="../vBWMR6/0/vBWMR6" preSegmentId="12" id="611869"/>
            <connection preFractionAlong="0.0" preCellId="../RMED/0/RMED" postFractionAlong="1.0" postSegmentId="54" postCellId="../vBWMR6/0/vBWMR6" preSegmentId="14" id="612216"/>
        </projection>
        <projection id="NCXLS_IL1DR_dBWMR2" postsynapticPopulation="dBWMR2" presynapticPopulation="IL1DR">
            <connection preFractionAlong="0.190513250802" preCellId="../IL1DR/0/IL1DR" postFractionAlong="1.0" postSegmentId="194" postCellId="../dBWMR2/0/dBWMR2" preSegmentId="21" id="625488"/>
            <connection preFractionAlong="0.536255750153" preCellId="../IL1DR/0/IL1DR" postFractionAlong="0.0" postSegmentId="219" postCellId="../dBWMR2/0/dBWMR2" preSegmentId="17" id="625517"/>
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        </projection>
        <projection id="NCXLS_HSNL_vBWML11" postsynapticPopulation="vBWML11" presynapticPopulation="HSNL">
            <connection preFractionAlong="0.953068330062" preCellId="../HSNL/0/HSNL" postFractionAlong="0.110025379864" postSegmentId="195" postCellId="../vBWML11/0/vBWML11" preSegmentId="17" id="633288"/>
        </projection>
        <projection id="NCXLS_PVNL_vBWMR11" postsynapticPopulation="vBWMR11" presynapticPopulation="PVNL">
            <connection preFractionAlong="0.957251650173" preCellId="../PVNL/0/PVNL" postFractionAlong="0.853719099524" postSegmentId="116" postCellId="../vBWMR11/0/vBWMR11" preSegmentId="39" id="636063"/>
        </projection>
        <projection id="NCXLS_IL1R_vBWMR4" postsynapticPopulation="vBWMR4" presynapticPopulation="IL1R">
            <connection preFractionAlong="0.456332230852" preCellId="../IL1R/0/IL1R" postFractionAlong="0.0" postSegmentId="127" postCellId="../vBWMR4/0/vBWMR4" preSegmentId="26" id="651599"/>
            <connection preFractionAlong="0.528177842208" preCellId="../IL1R/0/IL1R" postFractionAlong="1.0" postSegmentId="30" postCellId="../vBWMR4/0/vBWMR4" preSegmentId="26" id="651602"/>
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        </projection>
        <projection id="NCXLS_PVNL_vBWML14" postsynapticPopulation="vBWML14" presynapticPopulation="PVNL">
            <connection preFractionAlong="0.193950452554" preCellId="../PVNL/0/PVNL" postFractionAlong="0.00778663714753" postSegmentId="74" postCellId="../vBWML14/0/vBWML14" preSegmentId="38" id="661375"/>
        </projection>
        <projection id="NCXLS_RMDDR_dBWML2" postsynapticPopulation="dBWML2" presynapticPopulation="RMDDR">
            <connection preFractionAlong="1.0" preCellId="../RMDDR/0/RMDDR" postFractionAlong="0.0" postSegmentId="4" postCellId="../dBWML2/0/dBWML2" preSegmentId="11" id="673048"/>
            <connection preFractionAlong="1.0" preCellId="../RMDDR/0/RMDDR" postFractionAlong="0.0" postSegmentId="192" postCellId="../dBWML2/0/dBWML2" preSegmentId="10" id="673147"/>
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        </projection>
        <projection id="NCXLS_AVFL_vBWML11" postsynapticPopulation="vBWML11" presynapticPopulation="AVFL">
            <connection preFractionAlong="0.0439784988951" preCellId="../AVFL/0/AVFL" postFractionAlong="0.0" postSegmentId="195" postCellId="../vBWML11/0/vBWML11" preSegmentId="11" id="677788"/>
        </projection>
        <projection id="NCXLS_SMDVL_dBWML2" postsynapticPopulation="dBWML2" presynapticPopulation="SMDVL">
            <connection preFractionAlong="1.0" preCellId="../SMDVL/0/SMDVL" postFractionAlong="0.0" postSegmentId="4" postCellId="../dBWML2/0/dBWML2" preSegmentId="5" id="684294"/>
            <connection preFractionAlong="0.0" preCellId="../SMDVL/0/SMDVL" postFractionAlong="0.0" postSegmentId="192" postCellId="../dBWML2/0/dBWML2" preSegmentId="8" id="684442"/>
            <connection preFractionAlong="0.0" preCellId="../SMDVL/0/SMDVL" postFractionAlong="0.0" postSegmentId="312" postCellId="../dBWML2/0/dBWML2" preSegmentId="8" id="684443"/>
        </projection>
        <projection id="NCXLS_RMER_vBWML4" postsynapticPopulation="vBWML4" presynapticPopulation="RMER">
            <connection preFractionAlong="0.680420120534" preCellId="../RMER/0/RMER" postFractionAlong="0.801759576709" postSegmentId="175" postCellId="../vBWML4/0/vBWML4" preSegmentId="8" id="693157"/>
            <connection preFractionAlong="1.0" preCellId="../RMER/0/RMER" postFractionAlong="0.0" postSegmentId="0" postCellId="../vBWML4/0/vBWML4" preSegmentId="11" id="693403"/>
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        </projection>
        <projection id="NCXLS_RMDVR_vBWML4" postsynapticPopulation="vBWML4" presynapticPopulation="RMDVR">
            <connection preFractionAlong="0.690851205511" preCellId="../RMDVR/0/RMDVR" postFractionAlong="0.800503798146" postSegmentId="175" postCellId="../vBWML4/0/vBWML4" preSegmentId="14" id="703357"/>
            <connection preFractionAlong="1.0" preCellId="../RMDVR/0/RMDVR" postFractionAlong="0.959914237868" postSegmentId="165" postCellId="../vBWML4/0/vBWML4" preSegmentId="16" id="703467"/>
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        </projection>
        <projection id="NCXLS_RMDVR_vBWML6" postsynapticPopulation="vBWML6" presynapticPopulation="RMDVR">
            <connection preFractionAlong="1.0" preCellId="../RMDVR/0/RMDVR" postFractionAlong="0.0" postSegmentId="20" postCellId="../vBWML6/0/vBWML6" preSegmentId="16" id="711381"/>
            <connection preFractionAlong="1.0" preCellId="../RMDVR/0/RMDVR" postFractionAlong="0.302583257058" postSegmentId="118" postCellId="../vBWML6/0/vBWML6" preSegmentId="13" id="711508"/>
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        </projection>
        <projection id="NCXLS_PLNL_vBWML12" postsynapticPopulation="vBWML12" presynapticPopulation="PLNL">
            <connection preFractionAlong="0.999026045222" preCellId="../PLNL/0/PLNL" postFractionAlong="0.987095903006" postSegmentId="309" postCellId="../vBWML12/0/vBWML12" preSegmentId="37" id="716005"/>
        </projection>
        <projection id="NCXLS_PDB_dBWMR24" postsynapticPopulation="dBWMR24" presynapticPopulation="PDB">
            <connection preFractionAlong="0.0128270321877" preCellId="../PDB/0/PDB" postFractionAlong="0.684040962422" postSegmentId="536" postCellId="../dBWMR24/0/dBWMR24" preSegmentId="26" id="737750"/>
            <connection preFractionAlong="0.578393083124" preCellId="../PDB/0/PDB" postFractionAlong="0.194186246981" postSegmentId="196" postCellId="../dBWMR24/0/dBWMR24" preSegmentId="26" id="737753"/>
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        </projection>
        <projection id="NCXLS_IL1DR_dBWMR1" postsynapticPopulation="dBWMR1" presynapticPopulation="IL1DR">
            <connection preFractionAlong="0.19050306116" preCellId="../IL1DR/0/IL1DR" postFractionAlong="0.200239370778" postSegmentId="298" postCellId="../dBWMR1/0/dBWMR1" preSegmentId="21" id="774899"/>
            <connection preFractionAlong="0.0300483471078" preCellId="../IL1DR/0/IL1DR" postFractionAlong="0.209109710061" postSegmentId="135" postCellId="../dBWMR1/0/dBWMR1" preSegmentId="20" id="774907"/>
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        </projection>
        <projection id="NCXLS_SMDDL_dBWMR1" postsynapticPopulation="dBWMR1" presynapticPopulation="SMDDL">
            <connection preFractionAlong="1.0" preCellId="../SMDDL/0/SMDDL" postFractionAlong="1.0" postSegmentId="224" postCellId="../dBWMR1/0/dBWMR1" preSegmentId="15" id="790852"/>
            <connection preFractionAlong="1.0" preCellId="../SMDDL/0/SMDDL" postFractionAlong="0.0" postSegmentId="75" postCellId="../dBWMR1/0/dBWMR1" preSegmentId="13" id="791037"/>
            <connection preFractionAlong="1.0" preCellId="../SMDDL/0/SMDDL" postFractionAlong="0.0" postSegmentId="168" postCellId="../dBWMR1/0/dBWMR1" preSegmentId="13" id="791038"/>
        </projection>
        <projection id="NCXLS_HSNR_vBWMR15" postsynapticPopulation="vBWMR15" presynapticPopulation="HSNR">
            <connection preFractionAlong="0.409951967981" preCellId="../HSNR/0/HSNR" postFractionAlong="0.271568892268" postSegmentId="417" postCellId="../vBWMR15/0/vBWMR15" preSegmentId="6" id="799332"/>
        </projection>
        <projection id="NCXLS_PVNL_vBWML11" postsynapticPopulation="vBWML11" presynapticPopulation="PVNL">
            <connection preFractionAlong="0.956133303208" preCellId="../PVNL/0/PVNL" postFractionAlong="0.0" postSegmentId="195" postCellId="../vBWML11/0/vBWML11" preSegmentId="39" id="808198"/>
            <connection preFractionAlong="0.48205295524" preCellId="../PVNL/0/PVNL" postFractionAlong="0.0" postSegmentId="31" postCellId="../vBWML11/0/vBWML11" preSegmentId="40" id="808214"/>
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        </projection>
        <projection id="NCXLS_RID_dBWML14" postsynapticPopulation="dBWML14" presynapticPopulation="RID">
            <connection preFractionAlong="0.956581614723" preCellId="../RID/0/RID" postFractionAlong="0.657364815826" postSegmentId="291" postCellId="../dBWML14/0/dBWML14" preSegmentId="40" id="811572"/>
        </projection>
        <projection id="NCXLS_RMDDR_dBWML3" postsynapticPopulation="dBWML3" presynapticPopulation="RMDDR">
            <connection preFractionAlong="1.0" preCellId="../RMDDR/0/RMDDR" postFractionAlong="1.0" postSegmentId="20" postCellId="../dBWML3/0/dBWML3" preSegmentId="12" id="817255"/>
        </projection>
        <projection id="NCXLS_VA10_vBWMR20" postsynapticPopulation="vBWMR20" presynapticPopulation="VA10">
            <connection preFractionAlong="0.218139738875" preCellId="../VA10/0/VA10" postFractionAlong="0.0" postSegmentId="15" postCellId="../vBWMR20/0/vBWMR20" preSegmentId="5" id="829345"/>
            <connection preFractionAlong="0.446047672432" preCellId="../VA10/0/VA10" postFractionAlong="0.546566042317" postSegmentId="228" postCellId="../vBWMR20/0/vBWMR20" preSegmentId="10" id="829353"/>
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        </projection>
        <projection id="NCXLS_RIVR_dBWMR7" postsynapticPopulation="dBWMR7" presynapticPopulation="RIVR">
            <connection preFractionAlong="0.0" preCellId="../RIVR/0/RIVR" postFractionAlong="0.0" postSegmentId="32" postCellId="../dBWMR7/0/dBWMR7" preSegmentId="0" id="856302"/>
        </projection>
        <projection id="NCXLS_RMDVR_vBWML7" postsynapticPopulation="vBWML7" presynapticPopulation="RMDVR">
            <connection preFractionAlong="1.0" preCellId="../RMDVR/0/RMDVR" postFractionAlong="1.0" postSegmentId="188" postCellId="../vBWML7/0/vBWML7" preSegmentId="16" id="864982"/>
            <connection preFractionAlong="1.0" preCellId="../RMDVR/0/RMDVR" postFractionAlong="0.0" postSegmentId="216" postCellId="../vBWML7/0/vBWML7" preSegmentId="13" id="865005"/>
        </projection>
        <projection id="NCXLS_SDQL_vBWML19" postsynapticPopulation="vBWML19" presynapticPopulation="SDQL">
            <connection preFractionAlong="0.0" preCellId="../SDQL/0/SDQL" postFractionAlong="1.0" postSegmentId="2" postCellId="../vBWML19/0/vBWML19" preSegmentId="0" id="870940"/>
            <connection preFractionAlong="0.610805950009" preCellId="../SDQL/0/SDQL" postFractionAlong="1.0" postSegmentId="108" postCellId="../vBWML19/0/vBWML19" preSegmentId="4" id="871004"/>
            <connection preFractionAlong="0.433430241437" preCellId="../SDQL/0/SDQL" postFractionAlong="1.0" postSegmentId="56" postCellId="../vBWML19/0/vBWML19" preSegmentId="4" id="871015"/>
        </projection>
        <projection id="NCXLS_RIML_dBWMR5" postsynapticPopulation="dBWMR5" presynapticPopulation="RIML">
            <connection preFractionAlong="1.0" preCellId="../RIML/0/RIML" postFractionAlong="0.41931904625" postSegmentId="194" postCellId="../dBWMR5/0/dBWMR5" preSegmentId="27" id="885423"/>
            <connection preFractionAlong="0.0" preCellId="../RIML/0/RIML" postFractionAlong="1.0" postSegmentId="21" postCellId="../dBWMR5/0/dBWMR5" preSegmentId="30" id="885558"/>
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        </projection>
        <projection id="NCXLS_VA11_vBWML22" postsynapticPopulation="vBWML22" presynapticPopulation="VA11">
            <connection preFractionAlong="0.748053412711" preCellId="../VA11/0/VA11" postFractionAlong="1.0" postSegmentId="462" postCellId="../vBWML22/0/vBWML22" preSegmentId="10" id="905995"/>
            <connection preFractionAlong="0.35480643494" preCellId="../VA11/0/VA11" postFractionAlong="1.0" postSegmentId="64" postCellId="../vBWML22/0/vBWML22" preSegmentId="4" id="906003"/>
            <connection preFractionAlong="0.35480643494" preCellId="../VA11/0/VA11" postFractionAlong="1.0" postSegmentId="642" postCellId="../vBWML22/0/vBWML22" preSegmentId="4" id="906004"/>
            <connection preFractionAlong="0.83542145169" preCellId="../VA11/0/VA11" postFractionAlong="0.0" postSegmentId="203" postCellId="../vBWML22/0/vBWML22" preSegmentId="10" id="906005"/>
        </projection>
        <projection id="NCXLS_VA11_vBWMR21" postsynapticPopulation="vBWMR21" presynapticPopulation="VA11">
            <connection preFractionAlong="0.920905572339" preCellId="../VA11/0/VA11" postFractionAlong="1.0" postSegmentId="164" postCellId="../vBWMR21/0/vBWMR21" preSegmentId="10" id="915667"/>
        </projection>
        <projection id="NCXLS_PDB_dBWML22" postsynapticPopulation="dBWML22" presynapticPopulation="PDB">
            <connection preFractionAlong="0.847804371875" preCellId="../PDB/0/PDB" postFractionAlong="0.316906158017" postSegmentId="202" postCellId="../dBWML22/0/dBWML22" preSegmentId="32" id="918609"/>
        </projection>
        <projection id="NCXLS_RMDDL_dBWMR3" postsynapticPopulation="dBWMR3" presynapticPopulation="RMDDL">
            <connection preFractionAlong="1.0" preCellId="../RMDDL/0/RMDDL" postFractionAlong="0.419297619395" postSegmentId="6" postCellId="../dBWMR3/0/dBWMR3" preSegmentId="12" id="925365"/>
            <connection preFractionAlong="1.0" preCellId="../RMDDL/0/RMDDL" postFractionAlong="1.0" postSegmentId="18" postCellId="../dBWMR3/0/dBWMR3" preSegmentId="10" id="925706"/>
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        </projection>
        <projection id="NCXLS_RMDDR_dBWMR2" postsynapticPopulation="dBWMR2" presynapticPopulation="RMDDR">
            <connection preFractionAlong="1.0" preCellId="../RMDDR/0/RMDDR" postFractionAlong="1.0" postSegmentId="218" postCellId="../dBWMR2/0/dBWMR2" preSegmentId="9" id="936477"/>
            <connection preFractionAlong="0.0" preCellId="../RMDDR/0/RMDDR" postFractionAlong="1.0" postSegmentId="58" postCellId="../dBWMR2/0/dBWMR2" preSegmentId="11" id="936575"/>
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        </projection>
        <projection id="NCXLS_IL1R_dBWMR3" postsynapticPopulation="dBWMR3" presynapticPopulation="IL1R">
            <connection preFractionAlong="0.00782770091204" preCellId="../IL1R/0/IL1R" postFractionAlong="0.343288149222" postSegmentId="39" postCellId="../dBWMR3/0/dBWMR3" preSegmentId="15" id="953756"/>
            <connection preFractionAlong="1.0" preCellId="../IL1R/0/IL1R" postFractionAlong="1.0" postSegmentId="32" postCellId="../dBWMR3/0/dBWMR3" preSegmentId="19" id="953757"/>
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        </projection>
        <projection id="NCXLS_URYDR_dBWMR2" postsynapticPopulation="dBWMR2" presynapticPopulation="URYDR">
            <connection preFractionAlong="0.942059858744" preCellId="../URYDR/0/URYDR" postFractionAlong="0.990268571062" postSegmentId="194" postCellId="../dBWMR2/0/dBWMR2" preSegmentId="13" id="972086"/>
            <connection preFractionAlong="0.458017521296" preCellId="../URYDR/0/URYDR" postFractionAlong="0.0" postSegmentId="219" postCellId="../dBWMR2/0/dBWMR2" preSegmentId="9" id="972103"/>
        </projection>
        <projection id="NCXLS_SMBVR_vBWMR8" postsynapticPopulation="vBWMR8" presynapticPopulation="SMBVR">
            <connection preFractionAlong="0.0170966671232" preCellId="../SMBVR/0/SMBVR" postFractionAlong="0.795745804781" postSegmentId="19" postCellId="../vBWMR8/0/vBWMR8" preSegmentId="27" id="989740"/>
            <connection preFractionAlong="0.48190256561" preCellId="../SMBVR/0/SMBVR" postFractionAlong="0.838740231228" postSegmentId="15" postCellId="../vBWMR8/0/vBWMR8" preSegmentId="27" id="989741"/>
            <connection preFractionAlong="0.946640212604" preCellId="../SMBVR/0/SMBVR" postFractionAlong="0.881553158534" postSegmentId="115" postCellId="../vBWMR8/0/vBWMR8" preSegmentId="27" id="989743"/>
        </projection>
        <projection id="NCXLS_RMDL_vBWML1" postsynapticPopulation="vBWML1" presynapticPopulation="RMDL">
            <connection preFractionAlong="1.0" preCellId="../RMDL/0/RMDL" postFractionAlong="1.0" postSegmentId="102" postCellId="../vBWML1/0/vBWML1" preSegmentId="6" id="1005947"/>
            <connection preFractionAlong="0.0" preCellId="../RMDL/0/RMDL" postFractionAlong="0.0" postSegmentId="140" postCellId="../vBWML1/0/vBWML1" preSegmentId="9" id="1006158"/>
            <connection preFractionAlong="0.0" preCellId="../RMDL/0/RMDL" postFractionAlong="1.0" postSegmentId="172" postCellId="../vBWML1/0/vBWML1" preSegmentId="9" id="1006159"/>
            <connection preFractionAlong="0.0" preCellId="../RMDL/0/RMDL" postFractionAlong="0.0" postSegmentId="173" postCellId="../vBWML1/0/vBWML1" preSegmentId="9" id="1006160"/>
        </projection>
        <projection id="NCXLS_PVR_vBWML13" postsynapticPopulation="vBWML13" presynapticPopulation="PVR">
            <connection preFractionAlong="0.688745728934" preCellId="../PVR/0/PVR" postFractionAlong="0.921911394792" postSegmentId="52" postCellId="../vBWML13/0/vBWML13" preSegmentId="44" id="1012475"/>
        </projection>
        <projection id="NCXLS_SMDVL_vBWMR3" postsynapticPopulation="vBWMR3" presynapticPopulation="SMDVL">
            <connection preFractionAlong="0.795791811408" preCellId="../SMDVL/0/SMDVL" postFractionAlong="0.295052741624" postSegmentId="46" postCellId="../vBWMR3/0/vBWMR3" preSegmentId="13" id="1020651"/>
            <connection preFractionAlong="0.0" preCellId="../SMDVL/0/SMDVL" postFractionAlong="0.792977492439" postSegmentId="135" postCellId="../vBWMR3/0/vBWMR3" preSegmentId="12" id="1020689"/>
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        </projection>
        <projection id="NCXLS_CEPVR_vBWMR5" postsynapticPopulation="vBWMR5" presynapticPopulation="CEPVR">
            <connection preFractionAlong="0.439921812253" preCellId="../CEPVR/0/CEPVR" postFractionAlong="1.0" postSegmentId="360" postCellId="../vBWMR5/0/vBWMR5" preSegmentId="4" id="1034291"/>
            <connection preFractionAlong="0.953212664811" preCellId="../CEPVR/0/CEPVR" postFractionAlong="0.334329843345" postSegmentId="302" postCellId="../vBWMR5/0/vBWMR5" preSegmentId="16" id="1034306"/>
        </projection>
        <projection id="NCXLS_PVT_vBWML13" postsynapticPopulation="vBWML13" presynapticPopulation="PVT">
            <connection preFractionAlong="0.343100174189" preCellId="../PVT/0/PVT" postFractionAlong="1.0" postSegmentId="84" postCellId="../vBWML13/0/vBWML13" preSegmentId="28" id="1046340"/>
        </projection>
        <projection id="NCXLS_GLRR_dBWMR4" postsynapticPopulation="dBWMR4" presynapticPopulation="GLRR">
            <connection preFractionAlong="0.158396441973" preCellId="../GLRR/0/GLRR" postFractionAlong="1.0" postSegmentId="199" postCellId="../dBWMR4/0/dBWMR4" preSegmentId="11" id="1054683"/>
            <connection preFractionAlong="0.868421733166" preCellId="../GLRR/0/GLRR" postFractionAlong="1.0" postSegmentId="104" postCellId="../dBWMR4/0/dBWMR4" preSegmentId="16" id="1054702"/>
        </projection>
        <projection id="NCXLS_RMHR_dBWML5" postsynapticPopulation="dBWML5" presynapticPopulation="RMHR">
            <connection preFractionAlong="0.847561860287" preCellId="../RMHR/0/RMHR" postFractionAlong="0.201046476154" postSegmentId="26" postCellId="../dBWML5/0/dBWML5" preSegmentId="16" id="1070714"/>
            <connection preFractionAlong="0.0" preCellId="../RMHR/0/RMHR" postFractionAlong="0.289274036089" postSegmentId="255" postCellId="../dBWML5/0/dBWML5" preSegmentId="23" id="1070844"/>
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        </projection>
        <projection id="NCXLS_BDUL_dBWML5" postsynapticPopulation="dBWML5" presynapticPopulation="BDUL">
            <connection preFractionAlong="1.0" preCellId="../BDUL/0/BDUL" postFractionAlong="1.0" postSegmentId="20" postCellId="../dBWML5/0/dBWML5" preSegmentId="3" id="1086973"/>
            <connection preFractionAlong="0.683890037969" preCellId="../BDUL/0/BDUL" postFractionAlong="0.791650658783" postSegmentId="322" postCellId="../dBWML5/0/dBWML5" preSegmentId="19" id="1086997"/>
            <connection preFractionAlong="0.239067855013" preCellId="../BDUL/0/BDUL" postFractionAlong="1.0" postSegmentId="94" postCellId="../dBWML5/0/dBWML5" preSegmentId="5" id="1087023"/>
        </projection>
        <projection id="NCXLS_PDA_dBWML21" postsynapticPopulation="dBWML21" presynapticPopulation="PDA">
            <connection preFractionAlong="0.822348381428" preCellId="../PDA/0/PDA" postFractionAlong="0.361377946978" postSegmentId="160" postCellId="../dBWML21/0/dBWML21" preSegmentId="25" id="1093950"/>
        </projection>
        <projection id="NCXLS_IL1DL_dBWML6" postsynapticPopulation="dBWML6" presynapticPopulation="IL1DL">
            <connection preFractionAlong="1.0" preCellId="../IL1DL/0/IL1DL" postFractionAlong="1.0" postSegmentId="156" postCellId="../dBWML6/0/dBWML6" preSegmentId="14" id="1103076"/>
            <connection preFractionAlong="1.0" preCellId="../IL1DL/0/IL1DL" postFractionAlong="1.0" postSegmentId="42" postCellId="../dBWML6/0/dBWML6" preSegmentId="16" id="1103240"/>
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        </projection>
        <projection id="NCXLS_RIMR_dBWML5" postsynapticPopulation="dBWML5" presynapticPopulation="RIMR">
            <connection preFractionAlong="0.829346272591" preCellId="../RIMR/0/RIMR" postFractionAlong="0.199533666295" postSegmentId="26" postCellId="../dBWML5/0/dBWML5" preSegmentId="31" id="1125241"/>
            <connection preFractionAlong="0.0" preCellId="../RIMR/0/RIMR" postFractionAlong="1.0" postSegmentId="124" postCellId="../dBWML5/0/dBWML5" preSegmentId="34" id="1125402"/>
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        </projection>
        <projection id="NCXLS_SMDVL_vBWMR2" postsynapticPopulation="vBWMR2" presynapticPopulation="SMDVL">
            <connection preFractionAlong="1.0" preCellId="../SMDVL/0/SMDVL" postFractionAlong="1.0" postSegmentId="54" postCellId="../vBWMR2/0/vBWMR2" preSegmentId="12" id="1145371"/>
            <connection preFractionAlong="1.0" preCellId="../SMDVL/0/SMDVL" postFractionAlong="1.0" postSegmentId="24" postCellId="../vBWMR2/0/vBWMR2" preSegmentId="10" id="1145455"/>
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        </projection>
        <projection id="NCXLS_RMDL_dBWML5" postsynapticPopulation="dBWML5" presynapticPopulation="RMDL">
            <connection preFractionAlong="0.162665898817" preCellId="../RMDL/0/RMDL" postFractionAlong="0.799906452937" postSegmentId="150" postCellId="../dBWML5/0/dBWML5" preSegmentId="8" id="1159651"/>
            <connection preFractionAlong="1.0" preCellId="../RMDL/0/RMDL" postFractionAlong="1.0" postSegmentId="124" postCellId="../dBWML5/0/dBWML5" preSegmentId="5" id="1159813"/>
        </projection>
        <projection id="NCXLS_VA12_vBWML12" postsynapticPopulation="vBWML12" presynapticPopulation="VA12">
            <connection preFractionAlong="1.0" preCellId="../VA12/0/VA12" postFractionAlong="1.0" postSegmentId="378" postCellId="../vBWML12/0/vBWML12" preSegmentId="7" id="1165598"/>
        </projection>
        <projection id="NCXLS_RMED_vBWMR2" postsynapticPopulation="vBWMR2" presynapticPopulation="RMED">
            <connection preFractionAlong="1.0" preCellId="../RMED/0/RMED" postFractionAlong="1.0" postSegmentId="54" postCellId="../vBWMR2/0/vBWMR2" preSegmentId="13" id="1180993"/>
            <connection preFractionAlong="0.0" preCellId="../RMED/0/RMED" postFractionAlong="1.0" postSegmentId="24" postCellId="../vBWMR2/0/vBWMR2" preSegmentId="16" id="1181087"/>
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        </projection>
        <projection id="NCXLS_URAVL_vBWML1" postsynapticPopulation="vBWML1" presynapticPopulation="URAVL">
            <connection preFractionAlong="0.681935847729" preCellId="../URAVL/0/URAVL" postFractionAlong="0.0" postSegmentId="216" postCellId="../vBWML1/0/vBWML1" preSegmentId="9" id="1208982"/>
            <connection preFractionAlong="0.234461916938" preCellId="../URAVL/0/URAVL" postFractionAlong="0.0" postSegmentId="218" postCellId="../vBWML1/0/vBWML1" preSegmentId="9" id="1208986"/>
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        </projection>
        <projection id="NCXLS_RMDVR_vBWML5" postsynapticPopulation="vBWML5" presynapticPopulation="RMDVR">
            <connection preFractionAlong="0.242024356357" preCellId="../RMDVR/0/RMDVR" postFractionAlong="0.81410682972" postSegmentId="123" postCellId="../vBWML5/0/vBWML5" preSegmentId="14" id="1220917"/>
            <connection preFractionAlong="1.0" preCellId="../RMDVR/0/RMDVR" postFractionAlong="1.0" postSegmentId="4" postCellId="../vBWML5/0/vBWML5" preSegmentId="16" id="1221080"/>
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        </projection>
        <projection id="NCXLS_AVKL_vBWML11" postsynapticPopulation="vBWML11" presynapticPopulation="AVKL">
            <connection preFractionAlong="0.0774252770164" preCellId="../AVKL/0/AVKL" postFractionAlong="0.199609887509" postSegmentId="170" postCellId="../vBWML11/0/vBWML11" preSegmentId="10" id="1233299"/>
            <connection preFractionAlong="0.0927079120771" preCellId="../AVKL/0/AVKL" postFractionAlong="0.0" postSegmentId="30" postCellId="../vBWML11/0/vBWML11" preSegmentId="9" id="1233301"/>
            <connection preFractionAlong="0.951036502337" preCellId="../AVKL/0/AVKL" postFractionAlong="0.0" postSegmentId="399" postCellId="../vBWML11/0/vBWML11" preSegmentId="33" id="1233314"/>
        </projection>
        <projection id="NCXLS_RMHR_dBWML4" postsynapticPopulation="dBWML4" presynapticPopulation="RMHR">
            <connection preFractionAlong="0.368479743962" preCellId="../RMHR/0/RMHR" postFractionAlong="0.163185189682" postSegmentId="218" postCellId="../dBWML4/0/dBWML4" preSegmentId="16" id="1283984"/>
            <connection preFractionAlong="1.0" preCellId="../RMHR/0/RMHR" postFractionAlong="1.0" postSegmentId="114" postCellId="../dBWML4/0/dBWML4" preSegmentId="19" id="1284136"/>
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        </projection>
        <projection id="NCXLS_DVA_vBWML23" postsynapticPopulation="vBWML23" presynapticPopulation="DVA">
            <connection preFractionAlong="0.926426297528" preCellId="../DVA/0/DVA" postFractionAlong="0.569192933569" postSegmentId="431" postCellId="../vBWML23/0/vBWML23" preSegmentId="5" id="1290816"/>
            <connection preFractionAlong="0.13138242803" preCellId="../DVA/0/DVA" postFractionAlong="0.338307766543" postSegmentId="593" postCellId="../vBWML23/0/vBWML23" preSegmentId="12" id="1291816"/>
        </projection>
        <projection id="NCXLS_RMDDL_dBWMR2" postsynapticPopulation="dBWMR2" presynapticPopulation="RMDDL">
            <connection preFractionAlong="1.0" preCellId="../RMDDL/0/RMDDL" postFractionAlong="1.0" postSegmentId="218" postCellId="../dBWMR2/0/dBWMR2" preSegmentId="11" id="1301804"/>
            <connection preFractionAlong="1.0" preCellId="../RMDDL/0/RMDDL" postFractionAlong="1.0" postSegmentId="58" postCellId="../dBWMR2/0/dBWMR2" preSegmentId="9" id="1301899"/>
            <connection preFractionAlong="1.0" preCellId="../RMDDL/0/RMDDL" postFractionAlong="0.0" postSegmentId="59" postCellId="../dBWMR2/0/dBWMR2" preSegmentId="9" id="1301900"/>
            <connection preFractionAlong="1.0" preCellId="../RMDDL/0/RMDDL" postFractionAlong="0.0" postSegmentId="164" postCellId="../dBWMR2/0/dBWMR2" preSegmentId="9" id="1301901"/>
        </projection>
        <projection id="NCXLS_PVWR_vBWMR12" postsynapticPopulation="vBWMR12" presynapticPopulation="PVWR">
            <connection preFractionAlong="1.0" preCellId="../PVWR/0/PVWR" postFractionAlong="1.0" postSegmentId="90" postCellId="../vBWMR12/0/vBWMR12" preSegmentId="15" id="1306484"/>
        </projection>
        <projection id="NCXLS_RMDDR_dBWMR1" postsynapticPopulation="dBWMR1" presynapticPopulation="RMDDR">
            <connection preFractionAlong="1.0" preCellId="../RMDDR/0/RMDDR" postFractionAlong="1.0" postSegmentId="224" postCellId="../dBWMR1/0/dBWMR1" preSegmentId="8" id="1319616"/>
            <connection preFractionAlong="0.0" preCellId="../RMDDR/0/RMDDR" postFractionAlong="0.0" postSegmentId="75" postCellId="../dBWMR1/0/dBWMR1" preSegmentId="11" id="1319814"/>
            <connection preFractionAlong="0.0" preCellId="../RMDDR/0/RMDDR" postFractionAlong="0.0" postSegmentId="168" postCellId="../dBWMR1/0/dBWMR1" preSegmentId="11" id="1319815"/>
        </projection>
        <projection id="NCXLS_PQR_vBWML14" postsynapticPopulation="vBWML14" presynapticPopulation="PQR">
            <connection preFractionAlong="0.0" preCellId="../PQR/0/PQR" postFractionAlong="1.0" postSegmentId="62" postCellId="../vBWML14/0/vBWML14" preSegmentId="18" id="1325436"/>
        </projection>
        <projection id="NCXLS_RMDDL_dBWMR1" postsynapticPopulation="dBWMR1" presynapticPopulation="RMDDL">
            <connection preFractionAlong="1.0" preCellId="../RMDDL/0/RMDDL" postFractionAlong="1.0" postSegmentId="224" postCellId="../dBWMR1/0/dBWMR1" preSegmentId="12" id="1342304"/>
            <connection preFractionAlong="1.0" preCellId="../RMDDL/0/RMDDL" postFractionAlong="0.0" postSegmentId="75" postCellId="../dBWMR1/0/dBWMR1" preSegmentId="10" id="1342452"/>
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        </projection>
        <projection id="NCXLS_VD12_vBWMR12" postsynapticPopulation="vBWMR12" presynapticPopulation="VD12">
            <connection preFractionAlong="1.0" preCellId="../VD12/0/VD12" postFractionAlong="1.0" postSegmentId="90" postCellId="../vBWMR12/0/vBWMR12" preSegmentId="29" id="1363964"/>
            <connection preFractionAlong="1.0" preCellId="../VD12/0/VD12" postFractionAlong="1.0" postSegmentId="249" postCellId="../vBWMR12/0/vBWMR12" preSegmentId="28" id="1364049"/>
        </projection>
        <projection id="NCXLS_RMDDR_dBWML6" postsynapticPopulation="dBWML6" presynapticPopulation="RMDDR">
            <connection preFractionAlong="0.371845415445" preCellId="../RMDDR/0/RMDDR" postFractionAlong="0.325544915496" postSegmentId="31" postCellId="../dBWML6/0/dBWML6" preSegmentId="11" id="1384004"/>
            <connection preFractionAlong="0.0" preCellId="../RMDDR/0/RMDDR" postFractionAlong="1.0" postSegmentId="34" postCellId="../dBWML6/0/dBWML6" preSegmentId="14" id="1384415"/>
            <connection preFractionAlong="0.0" preCellId="../RMDDR/0/RMDDR" postFractionAlong="0.0" postSegmentId="35" postCellId="../dBWML6/0/dBWML6" preSegmentId="14" id="1384416"/>
        </projection>
        <projection id="NCXLS_AVL_vBWMR19" postsynapticPopulation="vBWMR19" presynapticPopulation="AVL">
            <connection preFractionAlong="0.148691678268" preCellId="../AVL/0/AVL" postFractionAlong="0.954284518083" postSegmentId="76" postCellId="../vBWMR19/0/vBWMR19" preSegmentId="55" id="1388204"/>
        </projection>
        <projection id="NCXLS_VD12_vBWML22" postsynapticPopulation="vBWML22" presynapticPopulation="VD12">
            <connection preFractionAlong="0.436195177922" preCellId="../VD12/0/VD12" postFractionAlong="0.601248277725" postSegmentId="64" postCellId="../vBWML22/0/vBWML22" preSegmentId="5" id="1405245"/>
            <connection preFractionAlong="0.766266121789" preCellId="../VD12/0/VD12" postFractionAlong="0.784554639235" postSegmentId="9" postCellId="../vBWML22/0/vBWML22" preSegmentId="5" id="1405254"/>
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        </projection>
        <projection id="NCXLS_RMED_vBWMR3" postsynapticPopulation="vBWMR3" presynapticPopulation="RMED">
            <connection preFractionAlong="1.0" preCellId="../RMED/0/RMED" postFractionAlong="0.344869511602" postSegmentId="46" postCellId="../vBWMR3/0/vBWMR3" preSegmentId="13" id="1430502"/>
            <connection preFractionAlong="0.0" preCellId="../RMED/0/RMED" postFractionAlong="1.0" postSegmentId="74" postCellId="../vBWMR3/0/vBWMR3" preSegmentId="16" id="1430587"/>
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        </projection>
        <projection id="NCXLS_RMDVR_vBWML2" postsynapticPopulation="vBWML2" presynapticPopulation="RMDVR">
            <connection preFractionAlong="1.0" preCellId="../RMDVR/0/RMDVR" postFractionAlong="1.0" postSegmentId="230" postCellId="../vBWML2/0/vBWML2" preSegmentId="12" id="1449660"/>
            <connection preFractionAlong="0.0" preCellId="../RMDVR/0/RMDVR" postFractionAlong="1.0" postSegmentId="229" postCellId="../vBWML2/0/vBWML2" preSegmentId="14" id="1449684"/>
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        </projection>
        <projection id="NCXLS_SMDDL_vBWML3" postsynapticPopulation="vBWML3" presynapticPopulation="SMDDL">
            <connection preFractionAlong="1.0" preCellId="../SMDDL/0/SMDDL" postFractionAlong="1.0" postSegmentId="46" postCellId="../vBWML3/0/vBWML3" preSegmentId="2" id="1462852"/>
            <connection preFractionAlong="0.867001803086" preCellId="../SMDDL/0/SMDDL" postFractionAlong="0.825943727549" postSegmentId="135" postCellId="../vBWML3/0/vBWML3" preSegmentId="7" id="1462918"/>
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        </projection>
        <projection id="NCXLS_RMDVR_vBWMR6" postsynapticPopulation="vBWMR6" presynapticPopulation="RMDVR">
            <connection preFractionAlong="1.0" preCellId="../RMDVR/0/RMDVR" postFractionAlong="1.0" postSegmentId="48" postCellId="../vBWMR6/0/vBWMR6" preSegmentId="16" id="1472726"/>
            <connection preFractionAlong="1.0" preCellId="../RMDVR/0/RMDVR" postFractionAlong="1.0" postSegmentId="29" postCellId="../vBWMR6/0/vBWMR6" preSegmentId="12" id="1473140"/>
        </projection>
        <projection id="NCXLS_SDQL_vBWMR19" postsynapticPopulation="vBWMR19" presynapticPopulation="SDQL">
            <connection preFractionAlong="0.843155997552" preCellId="../SDQL/0/SDQL" postFractionAlong="0.0" postSegmentId="75" postCellId="../vBWMR19/0/vBWMR19" preSegmentId="4" id="1479344"/>
            <connection preFractionAlong="0.667473527488" preCellId="../SDQL/0/SDQL" postFractionAlong="0.0" postSegmentId="259" postCellId="../vBWMR19/0/vBWMR19" preSegmentId="4" id="1479345"/>
        </projection>
        <projection id="NCXLS_RMHR_dBWML3" postsynapticPopulation="dBWML3" presynapticPopulation="RMHR">
            <connection preFractionAlong="1.0" preCellId="../RMHR/0/RMHR" postFractionAlong="1.0" postSegmentId="20" postCellId="../dBWML3/0/dBWML3" preSegmentId="16" id="1481815"/>
        </projection>
        <projection id="NCXLS_CEPDL_dBWML5" postsynapticPopulation="dBWML5" presynapticPopulation="CEPDL">
            <connection preFractionAlong="0.456839717249" preCellId="../CEPDL/0/CEPDL" postFractionAlong="1.0" postSegmentId="344" postCellId="../dBWML5/0/dBWML5" preSegmentId="23" id="1497724"/>
            <connection preFractionAlong="0.0" preCellId="../CEPDL/0/CEPDL" postFractionAlong="0.872429312437" postSegmentId="322" postCellId="../dBWML5/0/dBWML5" preSegmentId="7" id="1497751"/>
        </projection>
        <projection id="NCXLS_PDA_dBWML23" postsynapticPopulation="dBWML23" presynapticPopulation="PDA">
            <connection preFractionAlong="0.360007616249" preCellId="../PDA/0/PDA" postFractionAlong="0.563305125097" postSegmentId="426" postCellId="../dBWML23/0/dBWML23" preSegmentId="17" id="1510534"/>
            <connection preFractionAlong="0.883540062585" preCellId="../PDA/0/PDA" postFractionAlong="0.434131660716" postSegmentId="440" postCellId="../dBWML23/0/dBWML23" preSegmentId="23" id="1511395"/>
            <connection preFractionAlong="0.883540062585" preCellId="../PDA/0/PDA" postFractionAlong="0.434131660716" postSegmentId="750" postCellId="../dBWML23/0/dBWML23" preSegmentId="23" id="1511396"/>
        </projection>
        <projection id="NCXLS_RMDDL_dBWMR6" postsynapticPopulation="dBWMR6" presynapticPopulation="RMDDL">
            <connection preFractionAlong="1.0" preCellId="../RMDDL/0/RMDDL" postFractionAlong="0.46975955917" postSegmentId="126" postCellId="../dBWMR6/0/dBWMR6" preSegmentId="10" id="1527329"/>
            <connection preFractionAlong="0.0" preCellId="../RMDDL/0/RMDDL" postFractionAlong="0.109548085997" postSegmentId="89" postCellId="../dBWMR6/0/dBWMR6" preSegmentId="13" id="1527472"/>
        </projection>
        <projection id="NCXLS_VD10_vBWML20" postsynapticPopulation="vBWML20" presynapticPopulation="VD10">
            <connection preFractionAlong="0.635960682612" preCellId="../VD10/0/VD10" postFractionAlong="0.375093237745" postSegmentId="292" postCellId="../vBWML20/0/vBWML20" preSegmentId="5" id="1546809"/>
            <connection preFractionAlong="1.0" preCellId="../VD10/0/VD10" postFractionAlong="1.0" postSegmentId="86" postCellId="../vBWML20/0/vBWML20" preSegmentId="29" id="1546814"/>
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        </projection>
        <projection id="NCXLS_AVKR_vBWML17" postsynapticPopulation="vBWML17" presynapticPopulation="AVKR">
            <connection preFractionAlong="0.109647809696" preCellId="../AVKR/0/AVKR" postFractionAlong="1.0" postSegmentId="28" postCellId="../vBWML17/0/vBWML17" preSegmentId="27" id="1576068"/>
            <connection preFractionAlong="0.0850412969355" preCellId="../AVKR/0/AVKR" postFractionAlong="1.0" postSegmentId="30" postCellId="../vBWML17/0/vBWML17" preSegmentId="27" id="1576069"/>
            <connection preFractionAlong="0.0850412969355" preCellId="../AVKR/0/AVKR" postFractionAlong="1.0" postSegmentId="224" postCellId="../vBWML17/0/vBWML17" preSegmentId="27" id="1576070"/>
            <connection preFractionAlong="0.0604366057517" preCellId="../AVKR/0/AVKR" postFractionAlong="1.0" postSegmentId="226" postCellId="../vBWML17/0/vBWML17" preSegmentId="27" id="1576072"/>
        </projection>
        <projection id="NCXLS_VD12_vBWML23" postsynapticPopulation="vBWML23" presynapticPopulation="VD12">
            <connection preFractionAlong="1.0" preCellId="../VD12/0/VD12" postFractionAlong="0.864678644318" postSegmentId="799" postCellId="../vBWML23/0/vBWML23" preSegmentId="0" id="1640278"/>
            <connection preFractionAlong="0.217025227695" preCellId="../VD12/0/VD12" postFractionAlong="1.0" postSegmentId="28" postCellId="../vBWML23/0/vBWML23" preSegmentId="3" id="1640303"/>
            <connection preFractionAlong="0.217025227695" preCellId="../VD12/0/VD12" postFractionAlong="1.0" postSegmentId="822" postCellId="../vBWML23/0/vBWML23" preSegmentId="3" id="1640304"/>
        </projection>
        <projection id="NCXLS_AVL_vBWML10" postsynapticPopulation="vBWML10" presynapticPopulation="AVL">
            <connection preFractionAlong="0.456646416365" preCellId="../AVL/0/AVL" postFractionAlong="0.537030416669" postSegmentId="72" postCellId="../vBWML10/0/vBWML10" preSegmentId="32" id="1663996"/>
            <connection preFractionAlong="0.269659491093" preCellId="../AVL/0/AVL" postFractionAlong="0.174908669577" postSegmentId="202" postCellId="../vBWML10/0/vBWML10" preSegmentId="30" id="1664008"/>
            <connection preFractionAlong="0.269659491093" preCellId="../AVL/0/AVL" postFractionAlong="0.174908669577" postSegmentId="240" postCellId="../vBWML10/0/vBWML10" preSegmentId="30" id="1664009"/>
        </projection>
        <projection id="NCXLS_RMER_vBWML1" postsynapticPopulation="vBWML1" presynapticPopulation="RMER">
            <connection preFractionAlong="0.0" preCellId="../RMER/0/RMER" postFractionAlong="1.0" postSegmentId="102" postCellId="../vBWML1/0/vBWML1" preSegmentId="11" id="1680248"/>
            <connection preFractionAlong="0.0" preCellId="../RMER/0/RMER" postFractionAlong="1.0" postSegmentId="101" postCellId="../vBWML1/0/vBWML1" preSegmentId="10" id="1680277"/>
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        </projection>
        <projection id="NCXLS_URAVL_vBWML3" postsynapticPopulation="vBWML3" presynapticPopulation="URAVL">
            <connection preFractionAlong="0.311284569519" preCellId="../URAVL/0/URAVL" postFractionAlong="1.0" postSegmentId="28" postCellId="../vBWML3/0/vBWML3" preSegmentId="8" id="1691898"/>
            <connection preFractionAlong="0.0249517830581" preCellId="../URAVL/0/URAVL" postFractionAlong="0.0" postSegmentId="202" postCellId="../vBWML3/0/vBWML3" preSegmentId="8" id="1691899"/>
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        </projection>
        <projection id="NCXLS_RMED_vBWML2" postsynapticPopulation="vBWML2" presynapticPopulation="RMED">
            <connection preFractionAlong="1.0" preCellId="../RMED/0/RMED" postFractionAlong="1.0" postSegmentId="230" postCellId="../vBWML2/0/vBWML2" preSegmentId="8" id="1718063"/>
            <connection preFractionAlong="0.0" preCellId="../RMED/0/RMED" postFractionAlong="1.0" postSegmentId="229" postCellId="../vBWML2/0/vBWML2" preSegmentId="10" id="1718087"/>
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        </projection>
        <projection id="NCXLS_RMDVR_vBWML3" postsynapticPopulation="vBWML3" presynapticPopulation="RMDVR">
            <connection preFractionAlong="0.132439340924" preCellId="../RMDVR/0/RMDVR" postFractionAlong="0.825972857807" postSegmentId="135" postCellId="../vBWML3/0/vBWML3" preSegmentId="14" id="1734804"/>
            <connection preFractionAlong="1.0" preCellId="../RMDVR/0/RMDVR" postFractionAlong="1.0" postSegmentId="26" postCellId="../vBWML3/0/vBWML3" preSegmentId="11" id="1734936"/>
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        </projection>
        <projection id="NCXLS_RMGR_dBWMR5" postsynapticPopulation="dBWMR5" presynapticPopulation="RMGR">
            <connection preFractionAlong="1.0" preCellId="../RMGR/0/RMGR" postFractionAlong="0.816546441672" postSegmentId="113" postCellId="../dBWMR5/0/dBWMR5" preSegmentId="18" id="1745900"/>
            <connection preFractionAlong="1.0" preCellId="../RMGR/0/RMGR" postFractionAlong="1.0" postSegmentId="49" postCellId="../dBWMR5/0/dBWMR5" preSegmentId="0" id="1745914"/>
            <connection preFractionAlong="1.0" preCellId="../RMGR/0/RMGR" postFractionAlong="0.0" postSegmentId="50" postCellId="../dBWMR5/0/dBWMR5" preSegmentId="0" id="1745915"/>
        </projection>
        <projection id="NCXLS_SMDDL_vBWML2" postsynapticPopulation="vBWML2" presynapticPopulation="SMDDL">
            <connection preFractionAlong="1.0" preCellId="../SMDDL/0/SMDDL" postFractionAlong="1.0" postSegmentId="230" postCellId="../vBWML2/0/vBWML2" preSegmentId="8" id="1759256"/>
            <connection preFractionAlong="1.0" preCellId="../SMDDL/0/SMDDL" postFractionAlong="0.0" postSegmentId="208" postCellId="../vBWML2/0/vBWML2" preSegmentId="10" id="1759346"/>
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        </projection>
        <projection id="NCXLS_PDER_vBWML13" postsynapticPopulation="vBWML13" presynapticPopulation="PDER">
            <connection preFractionAlong="0.342991386093" preCellId="../PDER/0/PDER" postFractionAlong="1.0" postSegmentId="84" postCellId="../vBWML13/0/vBWML13" preSegmentId="28" id="1771219"/>
            <connection preFractionAlong="0.645624672614" preCellId="../PDER/0/PDER" postFractionAlong="0.0" postSegmentId="315" postCellId="../vBWML13/0/vBWML13" preSegmentId="27" id="1771220"/>
        </projection>
        <projection id="NCXLS_RMDVR_vBWMR7" postsynapticPopulation="vBWMR7" presynapticPopulation="RMDVR">
            <connection preFractionAlong="1.0" preCellId="../RMDVR/0/RMDVR" postFractionAlong="1.0" postSegmentId="93" postCellId="../vBWMR7/0/vBWMR7" preSegmentId="16" id="1778244"/>
            <connection preFractionAlong="0.0" preCellId="../RMDVR/0/RMDVR" postFractionAlong="0.0" postSegmentId="92" postCellId="../vBWMR7/0/vBWMR7" preSegmentId="0" id="1778287"/>
        </projection>
        <projection id="NCXLS_RMHL_dBWMR3" postsynapticPopulation="dBWMR3" presynapticPopulation="RMHL">
            <connection preFractionAlong="1.0" preCellId="../RMHL/0/RMHL" postFractionAlong="0.419306943574" postSegmentId="6" postCellId="../dBWMR3/0/dBWMR3" preSegmentId="16" id="1788267"/>
            <connection preFractionAlong="0.0" preCellId="../RMHL/0/RMHL" postFractionAlong="0.619346583253" postSegmentId="24" postCellId="../dBWMR3/0/dBWMR3" preSegmentId="23" id="1788392"/>
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        </projection>
        <projection id="NCXLS_RMDVL_vBWMR6" postsynapticPopulation="vBWMR6" presynapticPopulation="RMDVL">
            <connection preFractionAlong="1.0" preCellId="../RMDVL/0/RMDVL" postFractionAlong="1.0" postSegmentId="48" postCellId="../vBWMR6/0/vBWMR6" preSegmentId="16" id="1797539"/>
            <connection preFractionAlong="1.0" preCellId="../RMDVL/0/RMDVL" postFractionAlong="1.0" postSegmentId="54" postCellId="../vBWMR6/0/vBWMR6" preSegmentId="13" id="1797833"/>
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        </projection>
        <projection id="NCXLS_PDA_dBWML22" postsynapticPopulation="dBWML22" presynapticPopulation="PDA">
            <connection preFractionAlong="0.84781264987" preCellId="../PDA/0/PDA" postFractionAlong="0.316477853497" postSegmentId="202" postCellId="../dBWML22/0/dBWML22" preSegmentId="25" id="1801211"/>
        </projection>
        <projection id="NCXLS_AVHR_vBWMR9" postsynapticPopulation="vBWMR9" presynapticPopulation="AVHR">
            <connection preFractionAlong="0.0246516676584" preCellId="../AVHR/0/AVHR" postFractionAlong="0.0532775103133" postSegmentId="359" postCellId="../vBWMR9/0/vBWMR9" preSegmentId="25" id="1804966"/>
        </projection>
        <projection id="NCXLS_PQR_vBWML12" postsynapticPopulation="vBWML12" presynapticPopulation="PQR">
            <connection preFractionAlong="0.0" preCellId="../PQR/0/PQR" postFractionAlong="1.0" postSegmentId="378" postCellId="../vBWML12/0/vBWML12" preSegmentId="18" id="1820132"/>
            <connection preFractionAlong="0.0" preCellId="../PQR/0/PQR" postFractionAlong="1.0" postSegmentId="164" postCellId="../vBWML12/0/vBWML12" preSegmentId="16" id="1820320"/>
            <connection preFractionAlong="0.0" preCellId="../PQR/0/PQR" postFractionAlong="0.0" postSegmentId="165" postCellId="../vBWML12/0/vBWML12" preSegmentId="16" id="1820321"/>
            <connection preFractionAlong="0.0" preCellId="../PQR/0/PQR" postFractionAlong="1.0" postSegmentId="167" postCellId="../vBWML12/0/vBWML12" preSegmentId="16" id="1820322"/>
        </projection>
        <projection id="NCXLS_RMDDR_dBWMR6" postsynapticPopulation="dBWMR6" presynapticPopulation="RMDDR">
            <connection preFractionAlong="0.0" preCellId="../RMDDR/0/RMDDR" postFractionAlong="0.468891448852" postSegmentId="126" postCellId="../dBWMR6/0/dBWMR6" preSegmentId="11" id="1836832"/>
            <connection preFractionAlong="1.0" preCellId="../RMDDR/0/RMDDR" postFractionAlong="0.110930571759" postSegmentId="89" postCellId="../dBWMR6/0/dBWMR6" preSegmentId="8" id="1836975"/>
            <connection preFractionAlong="1.0" preCellId="../RMDDR/0/RMDDR" postFractionAlong="1.0" postSegmentId="32" postCellId="../dBWMR6/0/dBWMR6" preSegmentId="6" id="1837599"/>
        </projection>
        <projection id="NCXLS_PLMR_vBWML13" postsynapticPopulation="vBWML13" presynapticPopulation="PLMR">
            <connection preFractionAlong="1.0" preCellId="../PLMR/0/PLMR" postFractionAlong="1.0" postSegmentId="154" postCellId="../vBWML13/0/vBWML13" preSegmentId="37" id="1842935"/>
            <connection preFractionAlong="0.5" preCellId="../PLMR/0/PLMR" postFractionAlong="0.0" postSegmentId="36" postCellId="../vBWML13/0/vBWML13" preSegmentId="36" id="1843002"/>
        </projection>
        <projection id="NCXLS_RMDDR_dBWML4" postsynapticPopulation="dBWML4" presynapticPopulation="RMDDR">
            <connection preFractionAlong="0.343754292427" preCellId="../RMDDR/0/RMDDR" postFractionAlong="0.161196399027" postSegmentId="218" postCellId="../dBWML4/0/dBWML4" preSegmentId="12" id="1854149"/>
            <connection preFractionAlong="0.0" preCellId="../RMDDR/0/RMDDR" postFractionAlong="1.0" postSegmentId="114" postCellId="../dBWML4/0/dBWML4" preSegmentId="14" id="1854229"/>
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        </projection>
        <projection id="NCXLS_AVL_vBWML11" postsynapticPopulation="vBWML11" presynapticPopulation="AVL">
            <connection preFractionAlong="0.0441489355027" preCellId="../AVL/0/AVL" postFractionAlong="0.0" postSegmentId="195" postCellId="../vBWML11/0/vBWML11" preSegmentId="35" id="1860582"/>
            <connection preFractionAlong="0.518253525382" preCellId="../AVL/0/AVL" postFractionAlong="0.0" postSegmentId="31" postCellId="../vBWML11/0/vBWML11" preSegmentId="34" id="1860598"/>
            <connection preFractionAlong="0.0192372182025" preCellId="../AVL/0/AVL" postFractionAlong="1.0" postSegmentId="160" postCellId="../vBWML11/0/vBWML11" preSegmentId="34" id="1860599"/>
        </projection>
        <projection id="NCXLS_VD11_vBWMR22" postsynapticPopulation="vBWMR22" presynapticPopulation="VD11">
            <connection preFractionAlong="0.562787237976" preCellId="../VD11/0/VD11" postFractionAlong="0.912570551314" postSegmentId="627" postCellId="../vBWMR22/0/vBWMR22" preSegmentId="10" id="1881294"/>
            <connection preFractionAlong="0.404452734577" preCellId="../VD11/0/VD11" postFractionAlong="0.910645264705" postSegmentId="262" postCellId="../vBWMR22/0/vBWMR22" preSegmentId="11" id="1881325"/>
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        </projection>
        <projection id="NCXLS_URAVL_vBWML2" postsynapticPopulation="vBWML2" presynapticPopulation="URAVL">
            <connection preFractionAlong="0.889907112391" preCellId="../URAVL/0/URAVL" postFractionAlong="0.22331988461" postSegmentId="94" postCellId="../vBWML2/0/vBWML2" preSegmentId="8" id="1916936"/>
            <connection preFractionAlong="0.234474060323" preCellId="../URAVL/0/URAVL" postFractionAlong="0.331122366108" postSegmentId="92" postCellId="../vBWML2/0/vBWML2" preSegmentId="9" id="1916941"/>
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        </projection>
        <projection id="NCXLS_RMED_vBWML3" postsynapticPopulation="vBWML3" presynapticPopulation="RMED">
            <connection preFractionAlong="0.133053367039" preCellId="../RMED/0/RMED" postFractionAlong="0.82595294949" postSegmentId="135" postCellId="../vBWML3/0/vBWML3" preSegmentId="10" id="1932765"/>
            <connection preFractionAlong="1.0" preCellId="../RMED/0/RMED" postFractionAlong="1.0" postSegmentId="26" postCellId="../vBWML3/0/vBWML3" preSegmentId="7" id="1932889"/>
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        </projection>
        <projection id="NCXLS_AVFL_vBWMR22" postsynapticPopulation="vBWMR22" presynapticPopulation="AVFL">
            <connection preFractionAlong="0.449063673433" preCellId="../AVFL/0/AVFL" postFractionAlong="0.0480990556592" postSegmentId="48" postCellId="../vBWMR22/0/vBWMR22" preSegmentId="32" id="1945002"/>
            <connection preFractionAlong="0.466408011805" preCellId="../AVFL/0/AVFL" postFractionAlong="0.642610042286" postSegmentId="356" postCellId="../vBWMR22/0/vBWMR22" preSegmentId="33" id="1945006"/>
            <connection preFractionAlong="0.466408011805" preCellId="../AVFL/0/AVFL" postFractionAlong="0.642610042286" postSegmentId="486" postCellId="../vBWMR22/0/vBWMR22" preSegmentId="33" id="1945007"/>
            <connection preFractionAlong="0.167476865111" preCellId="../AVFL/0/AVFL" postFractionAlong="0.777351497703" postSegmentId="122" postCellId="../vBWMR22/0/vBWMR22" preSegmentId="35" id="1945012"/>
        </projection>
        <projection id="NCXLS_PDER_vBWML12" postsynapticPopulation="vBWML12" presynapticPopulation="PDER">
            <connection preFractionAlong="0.543462518074" preCellId="../PDER/0/PDER" postFractionAlong="0.533626340917" postSegmentId="276" postCellId="../vBWML12/0/vBWML12" preSegmentId="33" id="1954551"/>
            <connection preFractionAlong="0.43871186263" preCellId="../PDER/0/PDER" postFractionAlong="0.404496276246" postSegmentId="126" postCellId="../vBWML12/0/vBWML12" preSegmentId="31" id="1954554"/>
        </projection>
        <projection id="NCXLS_VA10_vBWMR18" postsynapticPopulation="vBWMR18" presynapticPopulation="VA10">
            <connection preFractionAlong="1.0" preCellId="../VA10/0/VA10" postFractionAlong="0.410633940036" postSegmentId="39" postCellId="../vBWMR18/0/vBWMR18" preSegmentId="14" id="1963046"/>
            <connection preFractionAlong="0.0133206491617" preCellId="../VA10/0/VA10" postFractionAlong="0.708341279296" postSegmentId="41" postCellId="../vBWMR18/0/vBWMR18" preSegmentId="8" id="1963104"/>
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        </projection>
        <projection id="NCXLS_AVL_vBWML23" postsynapticPopulation="vBWML23" presynapticPopulation="AVL">
            <connection preFractionAlong="1.0" preCellId="../AVL/0/AVL" postFractionAlong="1.0" postSegmentId="54" postCellId="../vBWML23/0/vBWML23" preSegmentId="64" id="1970626"/>
        </projection>
        <projection id="NCXLS_PQR_vBWML13" postsynapticPopulation="vBWML13" presynapticPopulation="PQR">
            <connection preFractionAlong="0.0" preCellId="../PQR/0/PQR" postFractionAlong="1.0" postSegmentId="154" postCellId="../vBWML13/0/vBWML13" preSegmentId="18" id="1993010"/>
            <connection preFractionAlong="0.0" preCellId="../PQR/0/PQR" postFractionAlong="0.0" postSegmentId="172" postCellId="../vBWML13/0/vBWML13" preSegmentId="12" id="1994489"/>
        </projection>
        <projection id="NCXLS_VB10_vBWMR22" postsynapticPopulation="vBWMR22" presynapticPopulation="VB10">
            <connection preFractionAlong="0.449355353027" preCellId="../VB10/0/VB10" postFractionAlong="0.0418467075004" postSegmentId="48" postCellId="../vBWMR22/0/vBWMR22" preSegmentId="5" id="2011272"/>
            <connection preFractionAlong="0.466475401744" preCellId="../VB10/0/VB10" postFractionAlong="0.636258645871" postSegmentId="356" postCellId="../vBWMR22/0/vBWMR22" preSegmentId="6" id="2011276"/>
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        </projection>
        <projection id="NCXLS_IL1L_dBWML4" postsynapticPopulation="dBWML4" presynapticPopulation="IL1L">
            <connection preFractionAlong="0.0" preCellId="../IL1L/0/IL1L" postFractionAlong="0.414523060979" postSegmentId="127" postCellId="../dBWML4/0/dBWML4" preSegmentId="17" id="2027383"/>
            <connection preFractionAlong="0.117721052144" preCellId="../IL1L/0/IL1L" postFractionAlong="0.156578160802" postSegmentId="39" postCellId="../dBWML4/0/dBWML4" preSegmentId="15" id="2027413"/>
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        </projection>
        <projection id="NCXLS_RMDDR_dBWMR7" postsynapticPopulation="dBWMR7" presynapticPopulation="RMDDR">
            <connection preFractionAlong="1.0" preCellId="../RMDDR/0/RMDDR" postFractionAlong="1.0" postSegmentId="32" postCellId="../dBWMR7/0/dBWMR7" preSegmentId="0" id="2040598"/>
            <connection preFractionAlong="0.0" preCellId="../RMDDR/0/RMDDR" postFractionAlong="0.0" postSegmentId="180" postCellId="../dBWMR7/0/dBWMR7" preSegmentId="3" id="2040621"/>
            <connection preFractionAlong="0.0" preCellId="../RMDDR/0/RMDDR" postFractionAlong="1.0" postSegmentId="21" postCellId="../dBWMR7/0/dBWMR7" preSegmentId="7" id="2040814"/>
        </projection>
        <projection id="NCXLS_SMDVL_vBWMR6" postsynapticPopulation="vBWMR6" presynapticPopulation="SMDVL">
            <connection preFractionAlong="0.549420770651" preCellId="../SMDVL/0/SMDVL" postFractionAlong="0.547947085122" postSegmentId="163" postCellId="../vBWMR6/0/vBWMR6" preSegmentId="18" id="2049626"/>
            <connection preFractionAlong="0.288146790128" preCellId="../SMDVL/0/SMDVL" postFractionAlong="0.0" postSegmentId="42" postCellId="../vBWMR6/0/vBWMR6" preSegmentId="19" id="2049627"/>
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        </projection>
        <projection id="NCXLS_AVL_vBWML12" postsynapticPopulation="vBWML12" presynapticPopulation="AVL">
            <connection preFractionAlong="0.456646875178" preCellId="../AVL/0/AVL" postFractionAlong="0.537139879956" postSegmentId="276" postCellId="../vBWML12/0/vBWML12" preSegmentId="32" id="2058182"/>
            <connection preFractionAlong="0.561562581571" preCellId="../AVL/0/AVL" postFractionAlong="0.409793167485" postSegmentId="126" postCellId="../vBWML12/0/vBWML12" preSegmentId="34" id="2058185"/>
        </projection>
        <projection id="NCXLS_RMDVR_vBWML1" postsynapticPopulation="vBWML1" presynapticPopulation="RMDVR">
            <connection preFractionAlong="1.0" preCellId="../RMDVR/0/RMDVR" postFractionAlong="1.0" postSegmentId="102" postCellId="../vBWML1/0/vBWML1" preSegmentId="10" id="2074577"/>
            <connection preFractionAlong="1.0" preCellId="../RMDVR/0/RMDVR" postFractionAlong="1.0" postSegmentId="101" postCellId="../vBWML1/0/vBWML1" preSegmentId="11" id="2074606"/>
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        </projection>
        <projection id="NCXLS_SMDVR_vBWML4" postsynapticPopulation="vBWML4" presynapticPopulation="SMDVR">
            <connection preFractionAlong="0.891535994132" preCellId="../SMDVR/0/SMDVR" postFractionAlong="0.303121431294" postSegmentId="175" postCellId="../vBWML4/0/vBWML4" preSegmentId="14" id="2085018"/>
            <connection preFractionAlong="1.0" preCellId="../SMDVR/0/SMDVR" postFractionAlong="1.0" postSegmentId="22" postCellId="../vBWML4/0/vBWML4" preSegmentId="12" id="2085070"/>
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        </projection>
        <projection id="NCXLS_VA10_vBWMR19" postsynapticPopulation="vBWMR19" presynapticPopulation="VA10">
            <connection preFractionAlong="0.150108224498" preCellId="../VA10/0/VA10" postFractionAlong="1.0" postSegmentId="78" postCellId="../vBWMR19/0/vBWMR19" preSegmentId="5" id="2091479"/>
            <connection preFractionAlong="0.0876904921179" preCellId="../VA10/0/VA10" postFractionAlong="0.0" postSegmentId="77" postCellId="../vBWMR19/0/vBWMR19" preSegmentId="5" id="2091485"/>
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        </projection>
        <projection id="NCXLS_PVPL_vBWML22" postsynapticPopulation="vBWML22" presynapticPopulation="PVPL">
            <connection preFractionAlong="0.287462829628" preCellId="../PVPL/0/PVPL" postFractionAlong="0.466641647044" postSegmentId="42" postCellId="../vBWML22/0/vBWML22" preSegmentId="11" id="2099535"/>
            <connection preFractionAlong="0.774767916824" preCellId="../PVPL/0/PVPL" postFractionAlong="1.0" postSegmentId="336" postCellId="../vBWML22/0/vBWML22" preSegmentId="5" id="2100341"/>
        </projection>
        <projection id="NCXLS_VD13_vBWMR22" postsynapticPopulation="vBWMR22" presynapticPopulation="VD13">
            <connection preFractionAlong="1.0" preCellId="../VD13/0/VD13" postFractionAlong="1.0" postSegmentId="58" postCellId="../vBWMR22/0/vBWMR22" preSegmentId="7" id="2116163"/>
            <connection preFractionAlong="0.117086953967" preCellId="../VD13/0/VD13" postFractionAlong="1.0" postSegmentId="589" postCellId="../vBWMR22/0/vBWMR22" preSegmentId="12" id="2116217"/>
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        </projection>
        <projection id="NCXLS_PDEL_vBWML13" postsynapticPopulation="vBWML13" presynapticPopulation="PDEL">
            <connection preFractionAlong="0.342874404214" preCellId="../PDEL/0/PDEL" postFractionAlong="1.0" postSegmentId="84" postCellId="../vBWML13/0/vBWML13" preSegmentId="27" id="2128160"/>
        </projection>
        <projection id="NCXLS_PDA_dBWML24" postsynapticPopulation="dBWML24" presynapticPopulation="PDA">
            <connection preFractionAlong="0.0740504863984" preCellId="../PDA/0/PDA" postFractionAlong="0.121882802746" postSegmentId="20" postCellId="../dBWML24/0/dBWML24" preSegmentId="18" id="2145781"/>
            <connection preFractionAlong="0.298868694889" preCellId="../PDA/0/PDA" postFractionAlong="0.723008206394" postSegmentId="148" postCellId="../dBWML24/0/dBWML24" preSegmentId="19" id="2145788"/>
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        </projection>
        <projection id="NCXLS_RID_dBWML13" postsynapticPopulation="dBWML13" presynapticPopulation="RID">
            <connection preFractionAlong="0.938819487334" preCellId="../RID/0/RID" postFractionAlong="1.0" postSegmentId="299" postCellId="../dBWML13/0/dBWML13" preSegmentId="40" id="2163248"/>
        </projection>
        <projection id="NCXLS_RMDDL_dBWMR5" postsynapticPopulation="dBWMR5" presynapticPopulation="RMDDL">
            <connection preFractionAlong="1.0" preCellId="../RMDDL/0/RMDDL" postFractionAlong="0.419297122731" postSegmentId="194" postCellId="../dBWMR5/0/dBWMR5" preSegmentId="12" id="2171135"/>
            <connection preFractionAlong="1.0" preCellId="../RMDDL/0/RMDDL" postFractionAlong="1.0" postSegmentId="114" postCellId="../dBWMR5/0/dBWMR5" preSegmentId="9" id="2171314"/>
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        </projection>
        <projection id="NCXLS_IL1L_dBWML5" postsynapticPopulation="dBWML5" presynapticPopulation="IL1L">
            <connection preFractionAlong="0.591025909804" preCellId="../IL1L/0/IL1L" postFractionAlong="0.859035653047" postSegmentId="347" postCellId="../dBWML5/0/dBWML5" preSegmentId="15" id="2185092"/>
            <connection preFractionAlong="0.991045735826" preCellId="../IL1L/0/IL1L" postFractionAlong="0.732317591252" postSegmentId="255" postCellId="../dBWML5/0/dBWML5" preSegmentId="15" id="2185093"/>
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        </projection>
        <projection id="NCXLS_SMBDL_dBWMR6" postsynapticPopulation="dBWMR6" presynapticPopulation="SMBDL">
            <connection preFractionAlong="0.768288602546" preCellId="../SMBDL/0/SMBDL" postFractionAlong="0.476801937719" postSegmentId="79" postCellId="../dBWMR6/0/dBWMR6" preSegmentId="20" id="2200890"/>
            <connection preFractionAlong="0.479109849748" preCellId="../SMBDL/0/SMBDL" postFractionAlong="0.764344654893" postSegmentId="11" postCellId="../dBWMR6/0/dBWMR6" preSegmentId="20" id="2200892"/>
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        </projection>
        <projection id="NCXLS_RMDL_vBWMR4" postsynapticPopulation="vBWMR4" presynapticPopulation="RMDL">
            <connection preFractionAlong="1.0" preCellId="../RMDL/0/RMDL" postFractionAlong="0.694612233027" postSegmentId="7" postCellId="../vBWMR4/0/vBWMR4" preSegmentId="16" id="2209461"/>
            <connection preFractionAlong="1.0" preCellId="../RMDL/0/RMDL" postFractionAlong="1.0" postSegmentId="1" postCellId="../vBWMR4/0/vBWMR4" preSegmentId="4" id="2209720"/>
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        </projection>
        <projection id="NCXLS_PVCR_vBWMR21" postsynapticPopulation="vBWMR21" presynapticPopulation="PVCR">
            <connection preFractionAlong="0.847458960601" preCellId="../PVCR/0/PVCR" postFractionAlong="0.803319576792" postSegmentId="164" postCellId="../vBWMR21/0/vBWMR21" preSegmentId="18" id="2215287"/>
            <connection preFractionAlong="0.171660250166" preCellId="../PVCR/0/PVCR" postFractionAlong="0.372046083672" postSegmentId="245" postCellId="../vBWMR21/0/vBWMR21" preSegmentId="19" id="2215290"/>
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        </projection>
        <projection id="NCXLS_RIAL_vBWML14" postsynapticPopulation="vBWML14" presynapticPopulation="RIAL">
            <connection preFractionAlong="1.0" preCellId="../RIAL/0/RIAL" postFractionAlong="1.0" postSegmentId="81" postCellId="../vBWML14/0/vBWML14" preSegmentId="6" id="2218576"/>
        </projection>
        <projection id="NCXLS_AS11_vBWML22" postsynapticPopulation="vBWML22" presynapticPopulation="AS11">
            <connection preFractionAlong="0.06298489412" preCellId="../AS11/0/AS11" postFractionAlong="0.970404630911" postSegmentId="67" postCellId="../vBWML22/0/vBWML22" preSegmentId="22" id="2246307"/>
            <connection preFractionAlong="0.031114052441" preCellId="../AS11/0/AS11" postFractionAlong="0.221634409079" postSegmentId="567" postCellId="../vBWML22/0/vBWML22" preSegmentId="23" id="2246495"/>
        </projection>
        <projection id="NCXLS_VD13_vBWML23" postsynapticPopulation="vBWML23" presynapticPopulation="VD13">
            <connection preFractionAlong="1.0" preCellId="../VD13/0/VD13" postFractionAlong="0.0877987317226" postSegmentId="429" postCellId="../vBWML23/0/vBWML23" preSegmentId="0" id="2283617"/>
            <connection preFractionAlong="0.555710361399" preCellId="../VD13/0/VD13" postFractionAlong="1.0" postSegmentId="156" postCellId="../vBWML23/0/vBWML23" preSegmentId="3" id="2283689"/>
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        </projection>
        <projection id="NCXLS_SMBVR_vBWMR1" postsynapticPopulation="vBWMR1" presynapticPopulation="SMBVR">
            <connection preFractionAlong="1.0" preCellId="../SMBVR/0/SMBVR" postFractionAlong="1.0" postSegmentId="249" postCellId="../vBWMR1/0/vBWMR1" preSegmentId="11" id="2320397"/>
            <connection preFractionAlong="1.0" preCellId="../SMBVR/0/SMBVR" postFractionAlong="1.0" postSegmentId="1" postCellId="../vBWMR1/0/vBWMR1" preSegmentId="9" id="2320489"/>
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        </projection>
        <projection id="NCXLS_PDA_vBWML13" postsynapticPopulation="vBWML13" presynapticPopulation="PDA">
            <connection preFractionAlong="1.0" preCellId="../PDA/0/PDA" postFractionAlong="1.0" postSegmentId="154" postCellId="../vBWML13/0/vBWML13" preSegmentId="26" id="2330328"/>
        </projection>
        <projection id="NCXLS_RMDDR_vBWML1" postsynapticPopulation="vBWML1" presynapticPopulation="RMDDR">
            <connection preFractionAlong="1.0" preCellId="../RMDDR/0/RMDDR" postFractionAlong="1.0" postSegmentId="102" postCellId="../vBWML1/0/vBWML1" preSegmentId="13" id="2344359"/>
            <connection preFractionAlong="1.0" preCellId="../RMDDR/0/RMDDR" postFractionAlong="0.0" postSegmentId="140" postCellId="../vBWML1/0/vBWML1" preSegmentId="11" id="2344517"/>
        </projection>
        <projection id="NCXLS_RMDR_dBWML5" postsynapticPopulation="dBWML5" presynapticPopulation="RMDR">
            <connection preFractionAlong="0.839053904234" preCellId="../RMDR/0/RMDR" postFractionAlong="0.799745931059" postSegmentId="150" postCellId="../dBWML5/0/dBWML5" preSegmentId="11" id="2355637"/>
            <connection preFractionAlong="0.0" preCellId="../RMDR/0/RMDR" postFractionAlong="1.0" postSegmentId="124" postCellId="../dBWML5/0/dBWML5" preSegmentId="14" id="2355798"/>
        </projection>
        <projection id="NCXLS_RMDL_dBWML3" postsynapticPopulation="dBWML3" presynapticPopulation="RMDL">
            <connection preFractionAlong="1.0" preCellId="../RMDL/0/RMDL" postFractionAlong="1.0" postSegmentId="20" postCellId="../dBWML3/0/dBWML3" preSegmentId="7" id="2361578"/>
        </projection>
        <projection id="NCXLS_SMDVR_vBWML6" postsynapticPopulation="vBWML6" presynapticPopulation="SMDVR">
            <connection preFractionAlong="0.290808692279" preCellId="../SMDVR/0/SMDVR" postFractionAlong="0.0" postSegmentId="238" postCellId="../vBWML6/0/vBWML6" preSegmentId="19" id="2370723"/>
            <connection preFractionAlong="0.708125292654" preCellId="../SMDVR/0/SMDVR" postFractionAlong="0.623260079751" postSegmentId="166" postCellId="../vBWML6/0/vBWML6" preSegmentId="17" id="2370726"/>
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        </projection>
        <projection id="NCXLS_RMDVR_vBWMR3" postsynapticPopulation="vBWMR3" presynapticPopulation="RMDVR">
            <connection preFractionAlong="0.0" preCellId="../RMDVR/0/RMDVR" postFractionAlong="0.396088282342" postSegmentId="169" postCellId="../vBWMR3/0/vBWMR3" preSegmentId="0" id="2380393"/>
            <connection preFractionAlong="1.0" preCellId="../RMDVR/0/RMDVR" postFractionAlong="0.968362255974" postSegmentId="102" postCellId="../vBWMR3/0/vBWMR3" preSegmentId="16" id="2380457"/>
        </projection>
        <projection id="NCXLS_PVCR_vBWMR22" postsynapticPopulation="vBWMR22" presynapticPopulation="PVCR">
            <connection preFractionAlong="0.550669236297" preCellId="../PVCR/0/PVCR" postFractionAlong="0.0419167490566" postSegmentId="48" postCellId="../vBWMR22/0/vBWMR22" preSegmentId="19" id="2395207"/>
            <connection preFractionAlong="0.533515923913" preCellId="../PVCR/0/PVCR" postFractionAlong="0.636261689898" postSegmentId="356" postCellId="../vBWMR22/0/vBWMR22" preSegmentId="18" id="2395211"/>
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        </projection>
        <projection id="NCXLS_PVCR_vBWML13" postsynapticPopulation="vBWML13" presynapticPopulation="PVCR">
            <connection preFractionAlong="0.343119837141" preCellId="../PVCR/0/PVCR" postFractionAlong="1.0" postSegmentId="84" postCellId="../vBWML13/0/vBWML13" preSegmentId="38" id="2406726"/>
        </projection>
        <projection id="NCXLS_SAAVL_vBWML9" postsynapticPopulation="vBWML9" presynapticPopulation="SAAVL">
            <connection preFractionAlong="1.0" preCellId="../SAAVL/0/SAAVL" postFractionAlong="1.0" postSegmentId="140" postCellId="../vBWML9/0/vBWML9" preSegmentId="8" id="2409457"/>
        </projection>
        <projection id="NCXLS_SMDDR_vBWML2" postsynapticPopulation="vBWML2" presynapticPopulation="SMDDR">
            <connection preFractionAlong="1.0" preCellId="../SMDDR/0/SMDDR" postFractionAlong="1.0" postSegmentId="230" postCellId="../vBWML2/0/vBWML2" preSegmentId="15" id="2431644"/>
            <connection preFractionAlong="1.0" preCellId="../SMDDR/0/SMDDR" postFractionAlong="0.0" postSegmentId="208" postCellId="../vBWML2/0/vBWML2" preSegmentId="13" id="2431792"/>
            <connection preFractionAlong="1.0" preCellId="../SMDDR/0/SMDDR" postFractionAlong="0.0" postSegmentId="236" postCellId="../vBWML2/0/vBWML2" preSegmentId="13" id="2431793"/>
        </projection>
        <projection id="NCXLS_SIBVL_vBWML2" postsynapticPopulation="vBWML2" presynapticPopulation="SIBVL">
            <connection preFractionAlong="0.0" preCellId="../SIBVL/0/SIBVL" postFractionAlong="1.0" postSegmentId="230" postCellId="../vBWML2/0/vBWML2" preSegmentId="62" id="2440876"/>
        </projection>
        <projection id="NCXLS_SMDDL_dBWML7" postsynapticPopulation="dBWML7" presynapticPopulation="SMDDL">
            <connection preFractionAlong="0.533281463246" preCellId="../SMDDL/0/SMDDL" postFractionAlong="1.0" postSegmentId="280" postCellId="../dBWML7/0/dBWML7" preSegmentId="22" id="2457814"/>
        </projection>
        <projection id="NCXLS_SDQR_vBWMR7" postsynapticPopulation="vBWMR7" presynapticPopulation="SDQR">
            <connection preFractionAlong="0.751416033009" preCellId="../SDQR/0/SDQR" postFractionAlong="1.0" postSegmentId="196" postCellId="../vBWMR7/0/vBWMR7" preSegmentId="5" id="2459601"/>
        </projection>
        <projection id="NCXLS_RIVR_vBWML7" postsynapticPopulation="vBWML7" presynapticPopulation="RIVR">
            <connection preFractionAlong="1.0" preCellId="../RIVR/0/RIVR" postFractionAlong="1.0" postSegmentId="188" postCellId="../vBWML7/0/vBWML7" preSegmentId="24" id="2466885"/>
        </projection>
        <projection id="NCXLS_VB10_vBWMR21" postsynapticPopulation="vBWMR21" presynapticPopulation="VB10">
            <connection preFractionAlong="0.152540422906" preCellId="../VB10/0/VB10" postFractionAlong="0.803272679715" postSegmentId="164" postCellId="../vBWMR21/0/vBWMR21" preSegmentId="6" id="2479266"/>
            <connection preFractionAlong="0.82825063577" preCellId="../VB10/0/VB10" postFractionAlong="0.371982509022" postSegmentId="245" postCellId="../vBWMR21/0/vBWMR21" preSegmentId="5" id="2479269"/>
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        </projection>
        <projection id="NCXLS_VD13_vBWML22" postsynapticPopulation="vBWML22" presynapticPopulation="VD13">
            <connection preFractionAlong="1.0" preCellId="../VD13/0/VD13" postFractionAlong="1.0" postSegmentId="338" postCellId="../vBWML22/0/vBWML22" preSegmentId="7" id="2489241"/>
            <connection preFractionAlong="1.0" preCellId="../VD13/0/VD13" postFractionAlong="0.0" postSegmentId="420" postCellId="../vBWML22/0/vBWML22" preSegmentId="24" id="2489523"/>
        </projection>
        <projection id="NCXLS_RMGR_vBWMR8" postsynapticPopulation="vBWMR8" presynapticPopulation="RMGR">
            <connection preFractionAlong="0.333577248493" preCellId="../RMGR/0/RMGR" postFractionAlong="0.489002078417" postSegmentId="181" postCellId="../vBWMR8/0/vBWMR8" preSegmentId="5" id="2502828"/>
            <connection preFractionAlong="0.884287864496" preCellId="../RMGR/0/RMGR" postFractionAlong="0.540116408386" postSegmentId="295" postCellId="../vBWMR8/0/vBWMR8" preSegmentId="9" id="2502830"/>
        </projection>
        <projection id="NCXLS_URAVR_vBWMR3" postsynapticPopulation="vBWMR3" presynapticPopulation="URAVR">
            <connection preFractionAlong="0.241593721806" preCellId="../URAVR/0/URAVR" postFractionAlong="1.0" postSegmentId="195" postCellId="../vBWMR3/0/vBWMR3" preSegmentId="9" id="2514476"/>
            <connection preFractionAlong="0.341694008375" preCellId="../URAVR/0/URAVR" postFractionAlong="0.0258397243078" postSegmentId="82" postCellId="../vBWMR3/0/vBWMR3" preSegmentId="9" id="2514480"/>
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        </projection>
        <projection id="NCXLS_RMDR_vBWML5" postsynapticPopulation="vBWML5" presynapticPopulation="RMDR">
            <connection preFractionAlong="0.903684285517" preCellId="../RMDR/0/RMDR" postFractionAlong="0.799258504132" postSegmentId="123" postCellId="../vBWML5/0/vBWML5" preSegmentId="16" id="2524131"/>
            <connection preFractionAlong="1.0" preCellId="../RMDR/0/RMDR" postFractionAlong="1.0" postSegmentId="108" postCellId="../vBWML5/0/vBWML5" preSegmentId="13" id="2524478"/>
        </projection>
        <projection id="NCXLS_VB11_vBWMR22" postsynapticPopulation="vBWMR22" presynapticPopulation="VB11">
            <connection preFractionAlong="0.121396386649" preCellId="../VB11/0/VB11" postFractionAlong="0.780106666359" postSegmentId="356" postCellId="../vBWMR22/0/vBWMR22" preSegmentId="3" id="2546748"/>
            <connection preFractionAlong="0.372238566993" preCellId="../VB11/0/VB11" postFractionAlong="0.806848568093" postSegmentId="130" postCellId="../vBWMR22/0/vBWMR22" preSegmentId="3" id="2546754"/>
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        </projection>
        <projection id="NCXLS_VD10_vBWMR21" postsynapticPopulation="vBWMR21" presynapticPopulation="VD10">
            <connection preFractionAlong="0.528320730673" preCellId="../VD10/0/VD10" postFractionAlong="0.445030884979" postSegmentId="241" postCellId="../vBWMR21/0/vBWMR21" preSegmentId="10" id="2568404"/>
            <connection preFractionAlong="0.215797611487" preCellId="../VD10/0/VD10" postFractionAlong="0.669097452168" postSegmentId="4" postCellId="../vBWMR21/0/vBWMR21" preSegmentId="11" id="2568407"/>
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        </projection>
        <projection id="NCXLS_GLRR_dBWMR5" postsynapticPopulation="dBWMR5" presynapticPopulation="GLRR">
            <connection preFractionAlong="0.750405464615" preCellId="../GLRR/0/GLRR" postFractionAlong="0.794352148606" postSegmentId="194" postCellId="../dBWMR5/0/dBWMR5" preSegmentId="2" id="2587207"/>
            <connection preFractionAlong="1.0" preCellId="../GLRR/0/GLRR" postFractionAlong="1.0" postSegmentId="220" postCellId="../dBWMR5/0/dBWMR5" preSegmentId="11" id="2587222"/>
            <connection preFractionAlong="1.0" preCellId="../GLRR/0/GLRR" postFractionAlong="0.0" postSegmentId="221" postCellId="../dBWMR5/0/dBWMR5" preSegmentId="11" id="2587223"/>
        </projection>
        <projection id="NCXLS_SMDDR_dBWML2" postsynapticPopulation="dBWML2" presynapticPopulation="SMDDR">
            <connection preFractionAlong="1.0" preCellId="../SMDDR/0/SMDDR" postFractionAlong="0.0" postSegmentId="4" postCellId="../dBWML2/0/dBWML2" preSegmentId="14" id="2600298"/>
            <connection preFractionAlong="1.0" preCellId="../SMDDR/0/SMDDR" postFractionAlong="0.0" postSegmentId="192" postCellId="../dBWML2/0/dBWML2" preSegmentId="12" id="2600436"/>
            <connection preFractionAlong="1.0" preCellId="../SMDDR/0/SMDDR" postFractionAlong="0.0" postSegmentId="312" postCellId="../dBWML2/0/dBWML2" preSegmentId="12" id="2600437"/>
        </projection>
        <projection id="NCXLS_SMBVR_vBWMR3" postsynapticPopulation="vBWMR3" presynapticPopulation="SMBVR">
            <connection preFractionAlong="1.0" preCellId="../SMBVR/0/SMBVR" postFractionAlong="0.338420062296" postSegmentId="46" postCellId="../vBWMR3/0/vBWMR3" preSegmentId="8" id="2612757"/>
            <connection preFractionAlong="0.0" preCellId="../SMBVR/0/SMBVR" postFractionAlong="1.0" postSegmentId="74" postCellId="../vBWMR3/0/vBWMR3" preSegmentId="11" id="2612885"/>
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        </projection>
        <projection id="NCXLS_AVAR_vBWMR21" postsynapticPopulation="vBWMR21" presynapticPopulation="AVAR">
            <connection preFractionAlong="0.895823575246" preCellId="../AVAR/0/AVAR" postFractionAlong="1.0" postSegmentId="164" postCellId="../vBWMR21/0/vBWMR21" preSegmentId="52" id="2626018"/>
            <connection preFractionAlong="0.881957422108" preCellId="../AVAR/0/AVAR" postFractionAlong="1.0" postSegmentId="244" postCellId="../vBWMR21/0/vBWMR21" preSegmentId="52" id="2626024"/>
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        </projection>
        <projection id="NCXLS_AVKR_vBWML11" postsynapticPopulation="vBWML11" presynapticPopulation="AVKR">
            <connection preFractionAlong="0.95542032189" preCellId="../AVKR/0/AVKR" postFractionAlong="1.0" postSegmentId="194" postCellId="../vBWML11/0/vBWML11" preSegmentId="32" id="2656568"/>
        </projection>
        <projection id="NCXLS_URAVR_vBWMR2" postsynapticPopulation="vBWMR2" presynapticPopulation="URAVR">
            <connection preFractionAlong="0.777053055507" preCellId="../URAVR/0/URAVR" postFractionAlong="0.85916744361" postSegmentId="219" postCellId="../vBWMR2/0/vBWMR2" preSegmentId="19" id="2684903"/>
            <connection preFractionAlong="0.73161484498" preCellId="../URAVR/0/URAVR" postFractionAlong="0.866563016485" postSegmentId="7" postCellId="../vBWMR2/0/vBWMR2" preSegmentId="19" id="2684909"/>
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        </projection>
        <projection id="NCXLS_VB11_vBWML23" postsynapticPopulation="vBWML23" presynapticPopulation="VB11">
            <connection preFractionAlong="0.988325223737" preCellId="../VB11/0/VB11" postFractionAlong="1.0" postSegmentId="158" postCellId="../vBWML23/0/vBWML23" preSegmentId="9" id="2708904"/>
            <connection preFractionAlong="0.648560871957" preCellId="../VB11/0/VB11" postFractionAlong="1.0" postSegmentId="156" postCellId="../vBWML23/0/vBWML23" preSegmentId="9" id="2708930"/>
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        </projection>
        <projection id="NCXLS_RMDR_vBWML4" postsynapticPopulation="vBWML4" presynapticPopulation="RMDR">
            <connection preFractionAlong="1.0" preCellId="../RMDR/0/RMDR" postFractionAlong="0.788782471897" postSegmentId="175" postCellId="../vBWML4/0/vBWML4" preSegmentId="16" id="2720906"/>
            <connection preFractionAlong="1.0" preCellId="../RMDR/0/RMDR" postFractionAlong="0.0" postSegmentId="0" postCellId="../vBWML4/0/vBWML4" preSegmentId="13" id="2721054"/>
        </projection>
        <projection id="NCXLS_PDA_dBWMR24" postsynapticPopulation="dBWMR24" presynapticPopulation="PDA">
            <connection preFractionAlong="0.941161795331" preCellId="../PDA/0/PDA" postFractionAlong="0.821817564897" postSegmentId="622" postCellId="../dBWMR24/0/dBWMR24" preSegmentId="16" id="2738796"/>
            <connection preFractionAlong="0.0128210151769" preCellId="../PDA/0/PDA" postFractionAlong="0.684060310137" postSegmentId="536" postCellId="../dBWMR24/0/dBWMR24" preSegmentId="19" id="2738817"/>
        </projection>
        <projection id="NCXLS_RMHL_dBWMR5" postsynapticPopulation="dBWMR5" presynapticPopulation="RMHL">
            <connection preFractionAlong="1.0" preCellId="../RMHL/0/RMHL" postFractionAlong="0.41930644764" postSegmentId="194" postCellId="../dBWMR5/0/dBWMR5" preSegmentId="16" id="2764809"/>
            <connection preFractionAlong="0.0" preCellId="../RMHL/0/RMHL" postFractionAlong="1.0" postSegmentId="21" postCellId="../dBWMR5/0/dBWMR5" preSegmentId="22" id="2764880"/>
        </projection>
        <projection id="NCXLS_PVPR_vBWMR22" postsynapticPopulation="vBWMR22" presynapticPopulation="PVPR">
            <connection preFractionAlong="0.561936284741" preCellId="../PVPR/0/PVPR" postFractionAlong="0.612086275587" postSegmentId="48" postCellId="../vBWMR22/0/vBWMR22" preSegmentId="9" id="2779678"/>
            <connection preFractionAlong="0.535009751224" preCellId="../PVPR/0/PVPR" postFractionAlong="0.203444237133" postSegmentId="184" postCellId="../vBWMR22/0/vBWMR22" preSegmentId="8" id="2779682"/>
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        </projection>
        <projection id="NCXLS_DVC_vBWMR20" postsynapticPopulation="vBWMR20" presynapticPopulation="DVC">
            <connection preFractionAlong="0.396177157397" preCellId="../DVC/0/DVC" postFractionAlong="0.374601609684" postSegmentId="228" postCellId="../vBWMR20/0/vBWMR20" preSegmentId="16" id="2790580"/>
            <connection preFractionAlong="0.617722654305" preCellId="../DVC/0/DVC" postFractionAlong="0.171767522195" postSegmentId="302" postCellId="../vBWMR20/0/vBWMR20" preSegmentId="16" id="2790584"/>
        </projection>
        <projection id="NCXLS_AVKR_vBWML20" postsynapticPopulation="vBWML20" presynapticPopulation="AVKR">
            <connection preFractionAlong="0.999958357112" preCellId="../AVKR/0/AVKR" postFractionAlong="0.481844511717" postSegmentId="184" postCellId="../vBWML20/0/vBWML20" preSegmentId="53" id="2799976"/>
        </projection>
        <projection id="NCXLS_PVPL_vBWML7" postsynapticPopulation="vBWML7" presynapticPopulation="PVPL">
            <connection preFractionAlong="0.614644791945" preCellId="../PVPL/0/PVPL" postFractionAlong="1.0" postSegmentId="188" postCellId="../vBWML7/0/vBWML7" preSegmentId="38" id="2815430"/>
        </projection>
        <projection id="NCXLS_AVL_vBWMR20" postsynapticPopulation="vBWMR20" presynapticPopulation="AVL">
            <connection preFractionAlong="0.604051201125" preCellId="../AVL/0/AVL" postFractionAlong="0.38694568978" postSegmentId="228" postCellId="../vBWMR20/0/vBWMR20" preSegmentId="55" id="2821548"/>
            <connection preFractionAlong="0.3824981377" preCellId="../AVL/0/AVL" postFractionAlong="0.183671672084" postSegmentId="302" postCellId="../vBWMR20/0/vBWMR20" preSegmentId="55" id="2821552"/>
        </projection>
        <projection id="NCXLS_IL1L_vBWML4" postsynapticPopulation="vBWML4" presynapticPopulation="IL1L">
            <connection preFractionAlong="0.437476916709" preCellId="../IL1L/0/IL1L" postFractionAlong="0.330439636717" postSegmentId="170" postCellId="../vBWML4/0/vBWML4" preSegmentId="26" id="2833555"/>
            <connection preFractionAlong="0.565003289358" preCellId="../IL1L/0/IL1L" postFractionAlong="0.415703940967" postSegmentId="86" postCellId="../vBWML4/0/vBWML4" preSegmentId="26" id="2833559"/>
            <connection preFractionAlong="0.275188760138" preCellId="../IL1L/0/IL1L" postFractionAlong="0.0" postSegmentId="198" postCellId="../vBWML4/0/vBWML4" preSegmentId="26" id="2833585"/>
            <connection preFractionAlong="0.151739740501" preCellId="../IL1L/0/IL1L" postFractionAlong="1.0" postSegmentId="20" postCellId="../vBWML4/0/vBWML4" preSegmentId="26" id="2833696"/>
        </projection>
        <projection id="NCXLS_RMDL_dBWMR4" postsynapticPopulation="dBWMR4" presynapticPopulation="RMDL">
            <connection preFractionAlong="0.0949615513184" preCellId="../RMDL/0/RMDL" postFractionAlong="0.762859485194" postSegmentId="123" postCellId="../dBWMR4/0/dBWMR4" preSegmentId="11" id="2844503"/>
            <connection preFractionAlong="0.0" preCellId="../RMDL/0/RMDL" postFractionAlong="1.0" postSegmentId="122" postCellId="../dBWMR4/0/dBWMR4" preSegmentId="14" id="2844690"/>
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        </projection>
        <projection id="NCXLS_AVHR_vBWML13" postsynapticPopulation="vBWML13" presynapticPopulation="AVHR">
            <connection preFractionAlong="0.656719442528" preCellId="../AVHR/0/AVHR" postFractionAlong="1.0" postSegmentId="84" postCellId="../vBWML13/0/vBWML13" preSegmentId="29" id="2851382"/>
            <connection preFractionAlong="0.354335485921" preCellId="../AVHR/0/AVHR" postFractionAlong="0.0" postSegmentId="315" postCellId="../vBWML13/0/vBWML13" preSegmentId="30" id="2851383"/>
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        </projection>
        <projection id="NCXLS_CEPVL_vBWML7" postsynapticPopulation="vBWML7" presynapticPopulation="CEPVL">
            <connection preFractionAlong="1.0" preCellId="../CEPVL/0/CEPVL" postFractionAlong="1.0" postSegmentId="188" postCellId="../vBWML7/0/vBWML7" preSegmentId="5" id="2861908"/>
            <connection preFractionAlong="1.0" preCellId="../CEPVL/0/CEPVL" postFractionAlong="0.0" postSegmentId="216" postCellId="../vBWML7/0/vBWML7" preSegmentId="2" id="2862028"/>
        </projection>
        <projection id="NCXLS_PDB_vBWML14" postsynapticPopulation="vBWML14" presynapticPopulation="PDB">
            <connection preFractionAlong="1.0" preCellId="../PDB/0/PDB" postFractionAlong="1.0" postSegmentId="62" postCellId="../vBWML14/0/vBWML14" preSegmentId="33" id="2873164"/>
        </projection>
        <projection id="NCXLS_SMDDR_dBWML5" postsynapticPopulation="dBWML5" presynapticPopulation="SMDDR">
            <connection preFractionAlong="0.787003631533" preCellId="../SMDDR/0/SMDDR" postFractionAlong="0.473871307072" postSegmentId="55" postCellId="../dBWML5/0/dBWML5" preSegmentId="21" id="2899310"/>
            <connection preFractionAlong="0.046608483024" preCellId="../SMDDR/0/SMDDR" postFractionAlong="0.756102961536" postSegmentId="289" postCellId="../dBWML5/0/dBWML5" preSegmentId="22" id="2899311"/>
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        </projection>
        <projection id="NCXLS_SMBVR_vBWMR2" postsynapticPopulation="vBWMR2" presynapticPopulation="SMBVR">
            <connection preFractionAlong="1.0" preCellId="../SMBVR/0/SMBVR" postFractionAlong="1.0" postSegmentId="54" postCellId="../vBWMR2/0/vBWMR2" preSegmentId="8" id="2916120"/>
            <connection preFractionAlong="0.0" preCellId="../SMBVR/0/SMBVR" postFractionAlong="1.0" postSegmentId="24" postCellId="../vBWMR2/0/vBWMR2" preSegmentId="11" id="2916256"/>
            <connection preFractionAlong="0.0" preCellId="../SMBVR/0/SMBVR" postFractionAlong="0.0" postSegmentId="25" postCellId="../vBWMR2/0/vBWMR2" preSegmentId="11" id="2916257"/>
        </projection>
        <projection id="NCXLS_RMDDL_dBWMR4" postsynapticPopulation="dBWMR4" presynapticPopulation="RMDDL">
            <connection preFractionAlong="0.0949292513462" preCellId="../RMDDL/0/RMDDL" postFractionAlong="0.762778515444" postSegmentId="123" postCellId="../dBWMR4/0/dBWMR4" preSegmentId="12" id="2931271"/>
            <connection preFractionAlong="1.0" preCellId="../RMDDL/0/RMDDL" postFractionAlong="1.0" postSegmentId="18" postCellId="../dBWMR4/0/dBWMR4" preSegmentId="9" id="2931493"/>
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        </projection>
        <projection id="NCXLS_AVDR_vBWML21" postsynapticPopulation="vBWML21" presynapticPopulation="AVDR">
            <connection preFractionAlong="0.856577511669" preCellId="../AVDR/0/AVDR" postFractionAlong="0.0" postSegmentId="51" postCellId="../vBWML21/0/vBWML21" preSegmentId="53" id="2941693"/>
            <connection preFractionAlong="0.843318751948" preCellId="../AVDR/0/AVDR" postFractionAlong="0.0" postSegmentId="211" postCellId="../vBWML21/0/vBWML21" preSegmentId="53" id="2941697"/>
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        </projection>
        <projection id="NCXLS_VB11_vBWML22" postsynapticPopulation="vBWML22" presynapticPopulation="VB11">
            <connection preFractionAlong="0.63481021052" preCellId="../VB11/0/VB11" postFractionAlong="0.466248506108" postSegmentId="42" postCellId="../vBWML22/0/vBWML22" preSegmentId="15" id="2976938"/>
            <connection preFractionAlong="0.253385054953" preCellId="../VB11/0/VB11" postFractionAlong="0.286869032426" postSegmentId="340" postCellId="../vBWML22/0/vBWML22" preSegmentId="14" id="2976964"/>
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        </projection>
        <projection id="NCXLS_HSNR_vBWMR9" postsynapticPopulation="vBWMR9" presynapticPopulation="HSNR">
            <connection preFractionAlong="0.975329651683" preCellId="../HSNR/0/HSNR" postFractionAlong="0.0529393996778" postSegmentId="359" postCellId="../vBWMR9/0/vBWMR9" preSegmentId="19" id="2986887"/>
        </projection>
        <projection id="NCXLS_SMDVR_vBWML3" postsynapticPopulation="vBWML3" presynapticPopulation="SMDVR">
            <connection preFractionAlong="0.0988321480245" preCellId="../SMDVR/0/SMDVR" postFractionAlong="0.607433703319" postSegmentId="135" postCellId="../vBWML3/0/vBWML3" preSegmentId="14" id="2995125"/>
            <connection preFractionAlong="0.312809254333" preCellId="../SMDVR/0/SMDVR" postFractionAlong="0.0" postSegmentId="107" postCellId="../vBWML3/0/vBWML3" preSegmentId="15" id="2995210"/>
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        </projection>
        <projection id="NCXLS_AVFR_vBWMR14" postsynapticPopulation="vBWMR14" presynapticPopulation="AVFR">
            <connection preFractionAlong="0.652228879666" preCellId="../AVFR/0/AVFR" postFractionAlong="0.0383772360849" postSegmentId="99" postCellId="../vBWMR14/0/vBWMR14" preSegmentId="13" id="3004316"/>
            <connection preFractionAlong="0.388510283469" preCellId="../AVFR/0/AVFR" postFractionAlong="0.0" postSegmentId="22" postCellId="../vBWMR14/0/vBWMR14" preSegmentId="13" id="3004329"/>
        </projection>
        <projection id="NCXLS_RMHL_dBWMR4" postsynapticPopulation="dBWMR4" presynapticPopulation="RMHL">
            <connection preFractionAlong="0.0950260524233" preCellId="../RMHL/0/RMHL" postFractionAlong="0.762766077205" postSegmentId="123" postCellId="../dBWMR4/0/dBWMR4" preSegmentId="16" id="3015816"/>
            <connection preFractionAlong="0.0" preCellId="../RMHL/0/RMHL" postFractionAlong="1.0" postSegmentId="122" postCellId="../dBWMR4/0/dBWMR4" preSegmentId="18" id="3015926"/>
        </projection>
        <projection id="NCXLS_PVPR_vBWMR21" postsynapticPopulation="vBWMR21" presynapticPopulation="PVPR">
            <connection preFractionAlong="0.848947312757" preCellId="../PVPR/0/PVPR" postFractionAlong="1.0" postSegmentId="164" postCellId="../vBWMR21/0/vBWMR21" preSegmentId="8" id="3024922"/>
            <connection preFractionAlong="0.520509507846" preCellId="../PVPR/0/PVPR" postFractionAlong="0.0791018430093" postSegmentId="245" postCellId="../vBWMR21/0/vBWMR21" preSegmentId="9" id="3024925"/>
            <connection preFractionAlong="0.0823252950139" preCellId="../PVPR/0/PVPR" postFractionAlong="1.0" postSegmentId="290" postCellId="../vBWMR21/0/vBWMR21" preSegmentId="10" id="3024958"/>
            <connection preFractionAlong="0.0823252950139" preCellId="../PVPR/0/PVPR" postFractionAlong="1.0" postSegmentId="324" postCellId="../vBWMR21/0/vBWMR21" preSegmentId="10" id="3024959"/>
        </projection>
        <projection id="NCXLS_RIMR_vBWML4" postsynapticPopulation="vBWML4" presynapticPopulation="RIMR">
            <connection preFractionAlong="0.69883741533" preCellId="../RIMR/0/RIMR" postFractionAlong="0.799674326794" postSegmentId="175" postCellId="../vBWML4/0/vBWML4" preSegmentId="36" id="3035844"/>
            <connection preFractionAlong="0.0" preCellId="../RIMR/0/RIMR" postFractionAlong="0.0741338993628" postSegmentId="132" postCellId="../vBWML4/0/vBWML4" preSegmentId="18" id="3035924"/>
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        </projection>
        <projection id="NCXLS_AVG_vBWML11" postsynapticPopulation="vBWML11" presynapticPopulation="AVG">
            <connection preFractionAlong="0.0438812670821" preCellId="../AVG/0/AVG" postFractionAlong="0.0" postSegmentId="195" postCellId="../vBWML11/0/vBWML11" preSegmentId="10" id="3046217"/>
            <connection preFractionAlong="0.517962841042" preCellId="../AVG/0/AVG" postFractionAlong="0.0" postSegmentId="31" postCellId="../vBWML11/0/vBWML11" preSegmentId="9" id="3046233"/>
        </projection>
        <projection id="NCXLS_URADL_dBWML2" postsynapticPopulation="dBWML2" presynapticPopulation="URADL">
            <connection preFractionAlong="0.978604076483" preCellId="../URADL/0/URADL" postFractionAlong="0.334514547125" postSegmentId="275" postCellId="../dBWML2/0/dBWML2" preSegmentId="19" id="3056543"/>
            <connection preFractionAlong="0.0142712962957" preCellId="../URADL/0/URADL" postFractionAlong="0.299974191696" postSegmentId="156" postCellId="../dBWML2/0/dBWML2" preSegmentId="9" id="3056576"/>
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        </projection>
        <projection id="NCXLS_RMDL_dBWMR3" postsynapticPopulation="dBWMR3" presynapticPopulation="RMDL">
            <connection preFractionAlong="1.0" preCellId="../RMDL/0/RMDL" postFractionAlong="0.419185601816" postSegmentId="6" postCellId="../dBWMR3/0/dBWMR3" preSegmentId="11" id="3068475"/>
            <connection preFractionAlong="0.0" preCellId="../RMDL/0/RMDL" postFractionAlong="1.0" postSegmentId="94" postCellId="../dBWMR3/0/dBWMR3" preSegmentId="14" id="3068612"/>
            <connection preFractionAlong="0.0" preCellId="../RMDL/0/RMDL" postFractionAlong="0.0" postSegmentId="95" postCellId="../dBWMR3/0/dBWMR3" preSegmentId="14" id="3068613"/>
            <connection preFractionAlong="0.0" preCellId="../RMDL/0/RMDL" postFractionAlong="1.0" postSegmentId="153" postCellId="../dBWMR3/0/dBWMR3" preSegmentId="14" id="3068614"/>
        </projection>
        <projection id="NCXLS_PVT_vBWMR11" postsynapticPopulation="vBWMR11" presynapticPopulation="PVT">
            <connection preFractionAlong="0.95724116243" preCellId="../PVT/0/PVT" postFractionAlong="0.853613484658" postSegmentId="116" postCellId="../vBWMR11/0/vBWMR11" preSegmentId="30" id="3074309"/>
            <connection preFractionAlong="0.379410448248" preCellId="../PVT/0/PVT" postFractionAlong="0.197974133158" postSegmentId="233" postCellId="../vBWMR11/0/vBWMR11" preSegmentId="31" id="3074327"/>
        </projection>
        <projection id="NCXLS_AVHR_vBWML12" postsynapticPopulation="vBWML12" presynapticPopulation="AVHR">
            <connection preFractionAlong="0.456537188132" preCellId="../AVHR/0/AVHR" postFractionAlong="0.533316805475" postSegmentId="276" postCellId="../vBWML12/0/vBWML12" preSegmentId="24" id="3081078"/>
            <connection preFractionAlong="0.561274393571" preCellId="../AVHR/0/AVHR" postFractionAlong="0.403595001223" postSegmentId="126" postCellId="../vBWML12/0/vBWML12" preSegmentId="26" id="3081081"/>
        </projection>
        <projection id="NCXLS_RIVR_vBWML4" postsynapticPopulation="vBWML4" presynapticPopulation="RIVR">
            <connection preFractionAlong="0.702226350549" preCellId="../RIVR/0/RIVR" postFractionAlong="0.813227765913" postSegmentId="175" postCellId="../vBWML4/0/vBWML4" preSegmentId="14" id="3085630"/>
        </projection>
        <projection id="NCXLS_VD12_vBWML13" postsynapticPopulation="vBWML13" presynapticPopulation="VD12">
            <connection preFractionAlong="1.0" preCellId="../VD12/0/VD12" postFractionAlong="1.0" postSegmentId="154" postCellId="../vBWML13/0/vBWML13" preSegmentId="29" id="3101590"/>
            <connection preFractionAlong="1.0" preCellId="../VD12/0/VD12" postFractionAlong="1.0" postSegmentId="182" postCellId="../vBWML13/0/vBWML13" preSegmentId="28" id="3101668"/>
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        </projection>
        <projection id="NCXLS_SMDVR_vBWML5" postsynapticPopulation="vBWML5" presynapticPopulation="SMDVR">
            <connection preFractionAlong="0.882858558184" preCellId="../SMDVR/0/SMDVR" postFractionAlong="1.0" postSegmentId="11" postCellId="../vBWML5/0/vBWML5" preSegmentId="19" id="3118359"/>
            <connection preFractionAlong="0.289558332458" preCellId="../SMDVR/0/SMDVR" postFractionAlong="1.0" postSegmentId="259" postCellId="../vBWML5/0/vBWML5" preSegmentId="19" id="3118362"/>
            <connection preFractionAlong="0.610563232973" preCellId="../SMDVR/0/SMDVR" postFractionAlong="0.00934884457794" postSegmentId="196" postCellId="../vBWML5/0/vBWML5" preSegmentId="18" id="3118381"/>
            <connection preFractionAlong="0.610563232973" preCellId="../SMDVR/0/SMDVR" postFractionAlong="0.00934884457794" postSegmentId="310" postCellId="../vBWML5/0/vBWML5" preSegmentId="18" id="3118382"/>
        </projection>
        <projection id="NCXLS_AVAR_vBWML12" postsynapticPopulation="vBWML12" presynapticPopulation="AVAR">
            <connection preFractionAlong="0.10601505958" preCellId="../AVAR/0/AVAR" postFractionAlong="1.0" postSegmentId="276" postCellId="../vBWML12/0/vBWML12" preSegmentId="10" id="3125551"/>
        </projection>
        <projection id="NCXLS_AVKR_vBWMR22" postsynapticPopulation="vBWMR22" presynapticPopulation="AVKR">
            <connection preFractionAlong="0.910168230197" preCellId="../AVKR/0/AVKR" postFractionAlong="0.0" postSegmentId="508" postCellId="../vBWMR22/0/vBWMR22" preSegmentId="59" id="3145986"/>
            <connection preFractionAlong="0.881770752852" preCellId="../AVKR/0/AVKR" postFractionAlong="0.90056125871" postSegmentId="51" postCellId="../vBWMR22/0/vBWMR22" preSegmentId="59" id="3145990"/>
            <connection preFractionAlong="0.95347878862" preCellId="../AVKR/0/AVKR" postFractionAlong="0.218305256497" postSegmentId="335" postCellId="../vBWMR22/0/vBWMR22" preSegmentId="59" id="3146003"/>
        </projection>
        <projection id="NCXLS_URAVR_vBWMR4" postsynapticPopulation="vBWMR4" presynapticPopulation="URAVR">
            <connection preFractionAlong="0.509750586432" preCellId="../URAVR/0/URAVR" postFractionAlong="0.242653644403" postSegmentId="127" postCellId="../vBWMR4/0/vBWMR4" preSegmentId="18" id="3189520"/>
            <connection preFractionAlong="0.5" preCellId="../URAVR/0/URAVR" postFractionAlong="1.0" postSegmentId="101" postCellId="../vBWMR4/0/vBWMR4" preSegmentId="17" id="3189551"/>
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        </projection>
        <projection id="NCXLS_SMBVL_vBWML5" postsynapticPopulation="vBWML5" presynapticPopulation="SMBVL">
            <connection preFractionAlong="0.969230692184" preCellId="../SMBVL/0/SMBVL" postFractionAlong="0.480235181692" postSegmentId="256" postCellId="../vBWML5/0/vBWML5" preSegmentId="24" id="3203031"/>
            <connection preFractionAlong="0.879681450256" preCellId="../SMBVL/0/SMBVL" postFractionAlong="0.910838571496" postSegmentId="11" postCellId="../vBWML5/0/vBWML5" preSegmentId="25" id="3203032"/>
            <connection preFractionAlong="0.286317906719" preCellId="../SMBVL/0/SMBVL" postFractionAlong="0.930283422376" postSegmentId="259" postCellId="../vBWML5/0/vBWML5" preSegmentId="25" id="3203034"/>
        </projection>
        <projection id="NCXLS_SMDVR_vBWML2" postsynapticPopulation="vBWML2" presynapticPopulation="SMDVR">
            <connection preFractionAlong="1.0" preCellId="../SMDVR/0/SMDVR" postFractionAlong="1.0" postSegmentId="230" postCellId="../vBWML2/0/vBWML2" preSegmentId="11" id="3217995"/>
            <connection preFractionAlong="1.0" preCellId="../SMDVR/0/SMDVR" postFractionAlong="0.0" postSegmentId="208" postCellId="../vBWML2/0/vBWML2" preSegmentId="9" id="3218085"/>
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        </projection>
        <projection id="NCXLS_PVNL_vBWML22" postsynapticPopulation="vBWML22" presynapticPopulation="PVNL">
            <connection preFractionAlong="0.287461544402" preCellId="../PVNL/0/PVNL" postFractionAlong="0.466487285909" postSegmentId="42" postCellId="../vBWML22/0/vBWML22" preSegmentId="19" id="3225541"/>
            <connection preFractionAlong="0.80407433031" preCellId="../PVNL/0/PVNL" postFractionAlong="1.0" postSegmentId="336" postCellId="../vBWML22/0/vBWML22" preSegmentId="13" id="3226346"/>
        </projection>
        <projection id="NCXLS_PDA_dBWMR22" postsynapticPopulation="dBWMR22" presynapticPopulation="PDA">
            <connection preFractionAlong="0.59129632027" preCellId="../PDA/0/PDA" postFractionAlong="0.111617655744" postSegmentId="423" postCellId="../dBWMR22/0/dBWMR22" preSegmentId="23" id="3234764"/>
            <connection preFractionAlong="0.981374389147" preCellId="../PDA/0/PDA" postFractionAlong="0.125867433405" postSegmentId="519" postCellId="../dBWMR22/0/dBWMR22" preSegmentId="24" id="3234767"/>
            <connection preFractionAlong="0.558648507634" preCellId="../PDA/0/PDA" postFractionAlong="0.141875145441" postSegmentId="619" postCellId="../dBWMR22/0/dBWMR22" preSegmentId="25" id="3234792"/>
        </projection>
        <projection id="NCXLS_DVC_vBWML13" postsynapticPopulation="vBWML13" presynapticPopulation="DVC">
            <connection preFractionAlong="0.343013533493" preCellId="../DVC/0/DVC" postFractionAlong="1.0" postSegmentId="84" postCellId="../vBWML13/0/vBWML13" preSegmentId="34" id="3240095"/>
        </projection>
        <projection id="NCXLS_AVG_vBWML10" postsynapticPopulation="vBWML10" presynapticPopulation="AVG">
            <connection preFractionAlong="0.456525647615" preCellId="../AVG/0/AVG" postFractionAlong="0.533878591609" postSegmentId="72" postCellId="../vBWML10/0/vBWML10" preSegmentId="7" id="3242863"/>
        </projection>
        <projection id="NCXLS_PVNR_vBWML23" postsynapticPopulation="vBWML23" presynapticPopulation="PVNR">
            <connection preFractionAlong="0.760818340605" preCellId="../PVNR/0/PVNR" postFractionAlong="0.0906272267984" postSegmentId="429" postCellId="../vBWML23/0/vBWML23" preSegmentId="11" id="3246107"/>
            <connection preFractionAlong="0.235848727355" preCellId="../PVNR/0/PVNR" postFractionAlong="0.952920657634" postSegmentId="454" postCellId="../vBWML23/0/vBWML23" preSegmentId="18" id="3246959"/>
            <connection preFractionAlong="0.235848727355" preCellId="../PVNR/0/PVNR" postFractionAlong="0.952920657634" postSegmentId="592" postCellId="../vBWML23/0/vBWML23" preSegmentId="18" id="3246960"/>
        </projection>
        <projection id="NCXLS_IL1L_vBWML2" postsynapticPopulation="vBWML2" presynapticPopulation="IL1L">
            <connection preFractionAlong="0.768218575777" preCellId="../IL1L/0/IL1L" postFractionAlong="1.0" postSegmentId="94" postCellId="../vBWML2/0/vBWML2" preSegmentId="26" id="3267941"/>
            <connection preFractionAlong="0.673256605639" preCellId="../IL1L/0/IL1L" postFractionAlong="1.0" postSegmentId="221" postCellId="../vBWML2/0/vBWML2" preSegmentId="26" id="3267948"/>
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        </projection>
        <projection id="NCXLS_AIZL_vBWML7" postsynapticPopulation="vBWML7" presynapticPopulation="AIZL">
            <connection preFractionAlong="1.0" preCellId="../AIZL/0/AIZL" postFractionAlong="1.0" postSegmentId="188" postCellId="../vBWML7/0/vBWML7" preSegmentId="1" id="3284651"/>
        </projection>
        <projection id="NCXLS_AS11_dBWMR24" postsynapticPopulation="dBWMR24" presynapticPopulation="AS11">
            <connection preFractionAlong="0.104915837414" preCellId="../AS11/0/AS11" postFractionAlong="1.0" postSegmentId="268" postCellId="../dBWMR24/0/dBWMR24" preSegmentId="13" id="3296701"/>
            <connection preFractionAlong="0.988722611993" preCellId="../AS11/0/AS11" postFractionAlong="1.0" postSegmentId="46" postCellId="../dBWMR24/0/dBWMR24" preSegmentId="14" id="3296923"/>
        </projection>
        <projection id="NCXLS_VA12_vBWMR21" postsynapticPopulation="vBWMR21" presynapticPopulation="VA12">
            <connection preFractionAlong="0.632734331354" preCellId="../VA12/0/VA12" postFractionAlong="0.745364278177" postSegmentId="164" postCellId="../vBWMR21/0/vBWMR21" preSegmentId="7" id="3309276"/>
            <connection preFractionAlong="0.771354333192" preCellId="../VA12/0/VA12" postFractionAlong="0.739736469579" postSegmentId="166" postCellId="../vBWMR21/0/vBWMR21" preSegmentId="6" id="3309296"/>
        </projection>
        <projection id="NCXLS_CEPVL_vBWML5" postsynapticPopulation="vBWML5" presynapticPopulation="CEPVL">
            <connection preFractionAlong="0.570603704709" preCellId="../CEPVL/0/CEPVL" postFractionAlong="0.813687958655" postSegmentId="123" postCellId="../vBWML5/0/vBWML5" preSegmentId="6" id="3310647"/>
        </projection>
        <projection id="NCXLS_PDB_dBWMR23" postsynapticPopulation="dBWMR23" presynapticPopulation="PDB">
            <connection preFractionAlong="0.116863386632" preCellId="../PDB/0/PDB" postFractionAlong="0.700713492844" postSegmentId="364" postCellId="../dBWMR23/0/dBWMR23" preSegmentId="24" id="3332799"/>
            <connection preFractionAlong="0.347066427059" preCellId="../PDB/0/PDB" postFractionAlong="0.890280503463" postSegmentId="471" postCellId="../dBWMR23/0/dBWMR23" preSegmentId="25" id="3332825"/>
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        </projection>
        <projection id="NCXLS_PDB_vBWML12" postsynapticPopulation="vBWML12" presynapticPopulation="PDB">
            <connection preFractionAlong="1.0" preCellId="../PDB/0/PDB" postFractionAlong="1.0" postSegmentId="378" postCellId="../vBWML12/0/vBWML12" preSegmentId="33" id="3368773"/>
            <connection preFractionAlong="1.0" preCellId="../PDB/0/PDB" postFractionAlong="0.0" postSegmentId="468" postCellId="../vBWML12/0/vBWML12" preSegmentId="31" id="3369179"/>
            <connection preFractionAlong="1.0" preCellId="../PDB/0/PDB" postFractionAlong="1.0" postSegmentId="160" postCellId="../vBWML12/0/vBWML12" preSegmentId="29" id="3370388"/>
            <connection preFractionAlong="1.0" preCellId="../PDB/0/PDB" postFractionAlong="1.0" postSegmentId="382" postCellId="../vBWML12/0/vBWML12" preSegmentId="29" id="3370389"/>
        </projection>
        <projection id="NCXLS_RIVR_vBWML3" postsynapticPopulation="vBWML3" presynapticPopulation="RIVR">
            <connection preFractionAlong="0.139659859661" preCellId="../RIVR/0/RIVR" postFractionAlong="0.835110931372" postSegmentId="135" postCellId="../vBWML3/0/vBWML3" preSegmentId="14" id="3394125"/>
            <connection preFractionAlong="1.0" preCellId="../RIVR/0/RIVR" postFractionAlong="1.0" postSegmentId="26" postCellId="../vBWML3/0/vBWML3" preSegmentId="11" id="3394359"/>
        </projection>
        <projection id="NCXLS_IL1L_dBWML3" postsynapticPopulation="dBWML3" presynapticPopulation="IL1L">
            <connection preFractionAlong="0.981410870449" preCellId="../IL1L/0/IL1L" postFractionAlong="0.0" postSegmentId="139" postCellId="../dBWML3/0/dBWML3" preSegmentId="21" id="3406934"/>
            <connection preFractionAlong="0.937932615148" preCellId="../IL1L/0/IL1L" postFractionAlong="0.610328501689" postSegmentId="174" postCellId="../dBWML3/0/dBWML3" preSegmentId="19" id="3406942"/>
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        </projection>
        <projection id="NCXLS_SMBVR_vBWMR4" postsynapticPopulation="vBWMR4" presynapticPopulation="SMBVR">
            <connection preFractionAlong="1.0" preCellId="../SMBVR/0/SMBVR" postFractionAlong="1.0" postSegmentId="142" postCellId="../vBWMR4/0/vBWMR4" preSegmentId="22" id="3424649"/>
            <connection preFractionAlong="0.262955551304" preCellId="../SMBVR/0/SMBVR" postFractionAlong="0.59564730921" postSegmentId="86" postCellId="../vBWMR4/0/vBWMR4" preSegmentId="20" id="3424663"/>
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        </projection>
        <projection id="NCXLS_PLNR_vBWML13" postsynapticPopulation="vBWML13" presynapticPopulation="PLNR">
            <connection preFractionAlong="0.0" preCellId="../PLNR/0/PLNR" postFractionAlong="1.0" postSegmentId="84" postCellId="../vBWML13/0/vBWML13" preSegmentId="30" id="3430471"/>
        </projection>
        <projection id="NCXLS_GLRDL_dBWML2" postsynapticPopulation="dBWML2" presynapticPopulation="GLRDL">
            <connection preFractionAlong="0.911929835524" preCellId="../GLRDL/0/GLRDL" postFractionAlong="0.306741143197" postSegmentId="90" postCellId="../dBWML2/0/dBWML2" preSegmentId="12" id="3440719"/>
            <connection preFractionAlong="0.293563585542" preCellId="../GLRDL/0/GLRDL" postFractionAlong="1.0" postSegmentId="110" postCellId="../dBWML2/0/dBWML2" preSegmentId="10" id="3440723"/>
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        </projection>
        <projection id="NCXLS_VA12_vBWML19" postsynapticPopulation="vBWML19" presynapticPopulation="VA12">
            <connection preFractionAlong="1.0" preCellId="../VA12/0/VA12" postFractionAlong="1.0" postSegmentId="202" postCellId="../vBWML19/0/vBWML19" preSegmentId="7" id="3448653"/>
            <connection preFractionAlong="0.5" preCellId="../VA12/0/VA12" postFractionAlong="0.0" postSegmentId="101" postCellId="../vBWML19/0/vBWML19" preSegmentId="6" id="3448770"/>
        </projection>
        <projection id="NCXLS_BDUR_dBWMR6" postsynapticPopulation="dBWMR6" presynapticPopulation="BDUR">
            <connection preFractionAlong="0.0" preCellId="../BDUR/0/BDUR" postFractionAlong="0.93114174393" postSegmentId="18" postCellId="../dBWMR6/0/dBWMR6" preSegmentId="20" id="3449940"/>
        </projection>
        <projection id="NCXLS_PVWL_vBWML12" postsynapticPopulation="vBWML12" presynapticPopulation="PVWL">
            <connection preFractionAlong="1.0" preCellId="../PVWL/0/PVWL" postFractionAlong="1.0" postSegmentId="378" postCellId="../vBWML12/0/vBWML12" preSegmentId="15" id="3453300"/>
        </projection>
        <projection id="NCXLS_SMBVL_vBWML4" postsynapticPopulation="vBWML4" presynapticPopulation="SMBVL">
            <connection preFractionAlong="0.345193510997" preCellId="../SMBVL/0/SMBVL" postFractionAlong="0.800429346167" postSegmentId="175" postCellId="../vBWML4/0/vBWML4" preSegmentId="8" id="3466989"/>
            <connection preFractionAlong="1.0" preCellId="../SMBVL/0/SMBVL" postFractionAlong="0.0" postSegmentId="132" postCellId="../vBWML4/0/vBWML4" preSegmentId="5" id="3467110"/>
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        </projection>
        <projection id="NCXLS_SMBDR_dBWML6" postsynapticPopulation="dBWML6" presynapticPopulation="SMBDR">
            <connection preFractionAlong="0.567947678431" preCellId="../SMBDR/0/SMBDR" postFractionAlong="0.38164288075" postSegmentId="133" postCellId="../dBWML6/0/dBWML6" preSegmentId="20" id="3478620"/>
            <connection preFractionAlong="0.795512811243" preCellId="../SMBDR/0/SMBDR" postFractionAlong="0.810152395411" postSegmentId="139" postCellId="../dBWML6/0/dBWML6" preSegmentId="20" id="3478632"/>
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        </projection>
        <projection id="NCXLS_PDA_dBWMR21" postsynapticPopulation="dBWMR21" presynapticPopulation="PDA">
            <connection preFractionAlong="0.811775064025" preCellId="../PDA/0/PDA" postFractionAlong="1.0" postSegmentId="126" postCellId="../dBWMR21/0/dBWMR21" preSegmentId="25" id="3485066"/>
        </projection>
        <projection id="NCXLS_PVNR_vBWML22" postsynapticPopulation="vBWML22" presynapticPopulation="PVNR">
            <connection preFractionAlong="0.287461410964" preCellId="../PVNR/0/PVNR" postFractionAlong="0.466536666234" postSegmentId="42" postCellId="../vBWML22/0/vBWML22" preSegmentId="20" id="3486630"/>
        </projection>
        <projection id="NCXLS_IL1VR_vBWMR2" postsynapticPopulation="vBWMR2" presynapticPopulation="IL1VR">
            <connection preFractionAlong="0.500671507262" preCellId="../IL1VR/0/IL1VR" postFractionAlong="0.440100439991" postSegmentId="139" postCellId="../vBWMR2/0/vBWMR2" preSegmentId="8" id="3511305"/>
            <connection preFractionAlong="0.735569635858" preCellId="../IL1VR/0/IL1VR" postFractionAlong="0.613093215667" postSegmentId="411" postCellId="../vBWMR2/0/vBWMR2" preSegmentId="8" id="3511309"/>
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        </projection>
        <projection id="NCXLS_SIBDR_dBWMR4" postsynapticPopulation="dBWMR4" presynapticPopulation="SIBDR">
            <connection preFractionAlong="0.0114177356649" preCellId="../SIBDR/0/SIBDR" postFractionAlong="1.0" postSegmentId="122" postCellId="../dBWMR4/0/dBWMR4" preSegmentId="51" id="3521385"/>
        </projection>
        <projection id="NCXLS_AS11_dBWMR23" postsynapticPopulation="dBWMR23" presynapticPopulation="AS11">
            <connection preFractionAlong="0.60949874982" preCellId="../AS11/0/AS11" postFractionAlong="0.525533310652" postSegmentId="562" postCellId="../dBWMR23/0/dBWMR23" preSegmentId="13" id="3533077"/>
        </projection>
        <projection id="NCXLS_VA12_vBWMR20" postsynapticPopulation="vBWMR20" presynapticPopulation="VA12">
            <connection preFractionAlong="1.0" preCellId="../VA12/0/VA12" postFractionAlong="0.492145931792" postSegmentId="95" postCellId="../vBWMR20/0/vBWMR20" preSegmentId="7" id="3546057"/>
        </projection>
        <projection id="NCXLS_SMDDL_dBWML2" postsynapticPopulation="dBWML2" presynapticPopulation="SMDDL">
            <connection preFractionAlong="1.0" preCellId="../SMDDL/0/SMDDL" postFractionAlong="0.0" postSegmentId="4" postCellId="../dBWML2/0/dBWML2" preSegmentId="12" id="3550874"/>
            <connection preFractionAlong="0.0" preCellId="../SMDDL/0/SMDDL" postFractionAlong="0.0" postSegmentId="192" postCellId="../dBWML2/0/dBWML2" preSegmentId="15" id="3551022"/>
            <connection preFractionAlong="0.0" preCellId="../SMDDL/0/SMDDL" postFractionAlong="0.0" postSegmentId="312" postCellId="../dBWML2/0/dBWML2" preSegmentId="15" id="3551023"/>
        </projection>
        <projection id="NCXLS_VD11_vBWMR11" postsynapticPopulation="vBWMR11" presynapticPopulation="VD11">
            <connection preFractionAlong="1.0" preCellId="../VD11/0/VD11" postFractionAlong="1.0" postSegmentId="90" postCellId="../vBWMR11/0/vBWMR11" preSegmentId="29" id="3568520"/>
            <connection preFractionAlong="1.0" preCellId="../VD11/0/VD11" postFractionAlong="1.0" postSegmentId="18" postCellId="../vBWMR11/0/vBWMR11" preSegmentId="9" id="3568796"/>
        </projection>
        <projection id="NCXLS_IL1DL_dBWMR7" postsynapticPopulation="dBWMR7" presynapticPopulation="IL1DL">
            <connection preFractionAlong="0.0" preCellId="../IL1DL/0/IL1DL" postFractionAlong="1.0" postSegmentId="32" postCellId="../dBWMR7/0/dBWMR7" preSegmentId="22" id="3586737"/>
            <connection preFractionAlong="0.0" preCellId="../IL1DL/0/IL1DL" postFractionAlong="0.0" postSegmentId="32" postCellId="../dBWMR7/0/dBWMR7" preSegmentId="16" id="3586877"/>
        </projection>
        <projection id="NCXLS_SMDDR_dBWML6" postsynapticPopulation="dBWML6" presynapticPopulation="SMDDR">
            <connection preFractionAlong="0.787003410417" preCellId="../SMDDR/0/SMDDR" postFractionAlong="0.52611744064" postSegmentId="10" postCellId="../dBWML6/0/dBWML6" preSegmentId="21" id="3606248"/>
            <connection preFractionAlong="0.540133082898" preCellId="../SMDDR/0/SMDDR" postFractionAlong="0.310053873458" postSegmentId="133" postCellId="../dBWML6/0/dBWML6" preSegmentId="21" id="3606250"/>
        </projection>
        <projection id="NCXLS_SMBVR_vBWMR7" postsynapticPopulation="vBWMR7" presynapticPopulation="SMBVR">
            <connection preFractionAlong="0.879190183567" preCellId="../SMBVR/0/SMBVR" postFractionAlong="0.0" postSegmentId="152" postCellId="../vBWMR7/0/vBWMR7" preSegmentId="25" id="3615440"/>
            <connection preFractionAlong="0.0792660573526" preCellId="../SMBVR/0/SMBVR" postFractionAlong="0.43655770094" postSegmentId="240" postCellId="../vBWMR7/0/vBWMR7" preSegmentId="28" id="3615441"/>
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        </projection>
        <projection id="NCXLS_SDQL_vBWML17" postsynapticPopulation="vBWML17" presynapticPopulation="SDQL">
            <connection preFractionAlong="0.620302199329" preCellId="../SDQL/0/SDQL" postFractionAlong="1.0" postSegmentId="68" postCellId="../vBWML17/0/vBWML17" preSegmentId="4" id="3619749"/>
        </projection>
        <projection id="NCXLS_PVM_vBWMR10" postsynapticPopulation="vBWMR10" presynapticPopulation="PVM">
            <connection preFractionAlong="0.792186561009" preCellId="../PVM/0/PVM" postFractionAlong="0.476612229163" postSegmentId="120" postCellId="../vBWMR10/0/vBWMR10" preSegmentId="35" id="3624031"/>
            <connection preFractionAlong="0.94895404124" preCellId="../PVM/0/PVM" postFractionAlong="0.78854219815" postSegmentId="261" postCellId="../vBWMR10/0/vBWMR10" preSegmentId="34" id="3624059"/>
        </projection>
        <projection id="NCXLS_VD10_vBWMR19" postsynapticPopulation="vBWMR19" presynapticPopulation="VD10">
            <connection preFractionAlong="0.744680090375" preCellId="../VD10/0/VD10" postFractionAlong="0.699374163793" postSegmentId="44" postCellId="../vBWMR19/0/vBWMR19" preSegmentId="11" id="3626221"/>
        </projection>
        <projection id="NCXLS_URADL_dBWML6" postsynapticPopulation="dBWML6" presynapticPopulation="URADL">
            <connection preFractionAlong="0.237460630235" preCellId="../URADL/0/URADL" postFractionAlong="0.765088097195" postSegmentId="175" postCellId="../dBWML6/0/dBWML6" preSegmentId="6" id="3639645"/>
            <connection preFractionAlong="0.747463188608" preCellId="../URADL/0/URADL" postFractionAlong="0.0" postSegmentId="233" postCellId="../dBWML6/0/dBWML6" preSegmentId="16" id="3639684"/>
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        </projection>
        <projection id="NCXLS_SMBVL_vBWML7" postsynapticPopulation="vBWML7" presynapticPopulation="SMBVL">
            <connection preFractionAlong="0.913599803231" preCellId="../SMBVL/0/SMBVL" postFractionAlong="0.0574938514084" postSegmentId="216" postCellId="../vBWML7/0/vBWML7" preSegmentId="25" id="3649586"/>
            <connection preFractionAlong="0.456427859738" preCellId="../SMBVL/0/SMBVL" postFractionAlong="0.0" postSegmentId="64" postCellId="../vBWML7/0/vBWML7" preSegmentId="26" id="3649587"/>
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        </projection>
        <projection id="NCXLS_AVFR_vBWMR11" postsynapticPopulation="vBWMR11" presynapticPopulation="AVFR">
            <connection preFractionAlong="0.26109808979" preCellId="../AVFR/0/AVFR" postFractionAlong="1.0" postSegmentId="116" postCellId="../vBWMR11/0/vBWMR11" preSegmentId="12" id="3653861"/>
        </projection>
        <projection id="NCXLS_VA12_vBWMR22" postsynapticPopulation="vBWMR22" presynapticPopulation="VA12">
            <connection preFractionAlong="0.90614729258" preCellId="../VA12/0/VA12" postFractionAlong="0.337389678381" postSegmentId="324" postCellId="../vBWMR22/0/vBWMR22" preSegmentId="5" id="3659382"/>
            <connection preFractionAlong="0.770252332841" preCellId="../VA12/0/VA12" postFractionAlong="0.829395779206" postSegmentId="356" postCellId="../vBWMR22/0/vBWMR22" preSegmentId="6" id="3659393"/>
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        </projection>
        <projection id="NCXLS_SMBVR_vBWMR6" postsynapticPopulation="vBWMR6" presynapticPopulation="SMBVR">
            <connection preFractionAlong="0.279632270542" preCellId="../SMBVR/0/SMBVR" postFractionAlong="0.991776538078" postSegmentId="8" postCellId="../vBWMR6/0/vBWMR6" preSegmentId="25" id="3669058"/>
            <connection preFractionAlong="0.327616419189" preCellId="../SMBVR/0/SMBVR" postFractionAlong="0.428811757928" postSegmentId="5" postCellId="../vBWMR6/0/vBWMR6" preSegmentId="23" id="3669059"/>
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        </projection>
        <projection id="NCXLS_ADER_dBWMR4" postsynapticPopulation="dBWMR4" presynapticPopulation="ADER">
            <connection preFractionAlong="0.0" preCellId="../ADER/0/ADER" postFractionAlong="1.0" postSegmentId="110" postCellId="../dBWMR4/0/dBWMR4" preSegmentId="32" id="3675154"/>
        </projection>
        <projection id="NCXLS_RMDVL_vBWMR7" postsynapticPopulation="vBWMR7" presynapticPopulation="RMDVL">
            <connection preFractionAlong="1.0" preCellId="../RMDVL/0/RMDVL" postFractionAlong="1.0" postSegmentId="93" postCellId="../vBWMR7/0/vBWMR7" preSegmentId="16" id="3689488"/>
            <connection preFractionAlong="1.0" preCellId="../RMDVL/0/RMDVL" postFractionAlong="0.0" postSegmentId="92" postCellId="../vBWMR7/0/vBWMR7" preSegmentId="14" id="3689510"/>
            <connection preFractionAlong="1.0" preCellId="../RMDVL/0/RMDVL" postFractionAlong="1.0" postSegmentId="38" postCellId="../vBWMR7/0/vBWMR7" preSegmentId="13" id="3689606"/>
        </projection>
        <projection id="NCXLS_RMGL_dBWML4" postsynapticPopulation="dBWML4" presynapticPopulation="RMGL">
            <connection preFractionAlong="1.0" preCellId="../RMGL/0/RMGL" postFractionAlong="0.965006490683" postSegmentId="115" postCellId="../dBWML4/0/dBWML4" preSegmentId="18" id="3697834"/>
            <connection preFractionAlong="1.0" preCellId="../RMGL/0/RMGL" postFractionAlong="1.0" postSegmentId="114" postCellId="../dBWML4/0/dBWML4" preSegmentId="16" id="3697890"/>
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        </projection>
        <projection id="NCXLS_PDB_dBWML24" postsynapticPopulation="dBWML24" presynapticPopulation="PDB">
            <connection preFractionAlong="0.0740893071177" preCellId="../PDB/0/PDB" postFractionAlong="0.121939936655" postSegmentId="20" postCellId="../dBWML24/0/dBWML24" preSegmentId="25" id="3717652"/>
            <connection preFractionAlong="0.298875517995" preCellId="../PDB/0/PDB" postFractionAlong="0.723056140728" postSegmentId="148" postCellId="../dBWML24/0/dBWML24" preSegmentId="26" id="3717660"/>
            <connection preFractionAlong="0.298875517995" preCellId="../PDB/0/PDB" postFractionAlong="0.723056140728" postSegmentId="258" postCellId="../dBWML24/0/dBWML24" preSegmentId="26" id="3717661"/>
        </projection>
        <projection id="NCXLS_SMBVL_vBWML6" postsynapticPopulation="vBWML6" presynapticPopulation="SMBVL">
            <connection preFractionAlong="0.874466300337" preCellId="../SMBVL/0/SMBVL" postFractionAlong="0.203595219662" postSegmentId="167" postCellId="../vBWML6/0/vBWML6" preSegmentId="23" id="3752031"/>
            <connection preFractionAlong="0.969225083493" preCellId="../SMBVL/0/SMBVL" postFractionAlong="0.519771857157" postSegmentId="146" postCellId="../vBWML6/0/vBWML6" preSegmentId="24" id="3752032"/>
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        </projection>
        <projection id="NCXLS_RMEV_dBWMR1" postsynapticPopulation="dBWMR1" presynapticPopulation="RMEV">
            <connection preFractionAlong="1.0" preCellId="../RMEV/0/RMEV" postFractionAlong="1.0" postSegmentId="224" postCellId="../dBWMR1/0/dBWMR1" preSegmentId="62" id="3784906"/>
            <connection preFractionAlong="1.0" preCellId="../RMEV/0/RMEV" postFractionAlong="0.0" postSegmentId="72" postCellId="../dBWMR1/0/dBWMR1" preSegmentId="11" id="3784982"/>
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        </projection>
        <projection id="NCXLS_SMBDR_dBWML4" postsynapticPopulation="dBWML4" presynapticPopulation="SMBDR">
            <connection preFractionAlong="0.304433914622" preCellId="../SMBDR/0/SMBDR" postFractionAlong="1.0" postSegmentId="114" postCellId="../dBWML4/0/dBWML4" preSegmentId="19" id="3814392"/>
            <connection preFractionAlong="0.0148905176601" preCellId="../SMBDR/0/SMBDR" postFractionAlong="0.115751745811" postSegmentId="218" postCellId="../dBWML4/0/dBWML4" preSegmentId="16" id="3814400"/>
            <connection preFractionAlong="1.0" preCellId="../SMBDR/0/SMBDR" postFractionAlong="1.0" postSegmentId="26" postCellId="../dBWML4/0/dBWML4" preSegmentId="13" id="3814654"/>
        </projection>
        <projection id="NCXLS_AVJL_vBWMR11" postsynapticPopulation="vBWMR11" presynapticPopulation="AVJL">
            <connection preFractionAlong="0.0423932292679" preCellId="../AVJL/0/AVJL" postFractionAlong="0.856439781467" postSegmentId="116" postCellId="../vBWMR11/0/vBWMR11" preSegmentId="28" id="3822198"/>
            <connection preFractionAlong="0.618764568035" preCellId="../AVJL/0/AVJL" postFractionAlong="0.195113180736" postSegmentId="233" postCellId="../vBWMR11/0/vBWMR11" preSegmentId="27" id="3822216"/>
        </projection>
        <projection id="NCXLS_OLQDL_dBWML6" postsynapticPopulation="dBWML6" presynapticPopulation="OLQDL">
            <connection preFractionAlong="0.145743596154" preCellId="../OLQDL/0/OLQDL" postFractionAlong="1.0" postSegmentId="159" postCellId="../dBWML6/0/dBWML6" preSegmentId="12" id="3825211"/>
        </projection>
        <projection id="NCXLS_VD13_dBWML21" postsynapticPopulation="dBWML21" presynapticPopulation="VD13">
            <connection preFractionAlong="1.0" preCellId="../VD13/0/VD13" postFractionAlong="1.0" postSegmentId="57" postCellId="../dBWML21/0/dBWML21" preSegmentId="24" id="3832211"/>
        </projection>
        <projection id="NCXLS_IL1L_vBWML1" postsynapticPopulation="vBWML1" presynapticPopulation="IL1L">
            <connection preFractionAlong="0.461889158349" preCellId="../IL1L/0/IL1L" postFractionAlong="1.0" postSegmentId="83" postCellId="../vBWML1/0/vBWML1" preSegmentId="23" id="3868199"/>
            <connection preFractionAlong="0.618647514892" preCellId="../IL1L/0/IL1L" postFractionAlong="0.784160366471" postSegmentId="330" postCellId="../vBWML1/0/vBWML1" preSegmentId="23" id="3868204"/>
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        </projection>
        <projection id="NCXLS_RID_dBWMR10" postsynapticPopulation="dBWMR10" presynapticPopulation="RID">
            <connection preFractionAlong="0.450130802869" preCellId="../RID/0/RID" postFractionAlong="0.898535711844" postSegmentId="422" postCellId="../dBWMR10/0/dBWMR10" preSegmentId="31" id="3886247"/>
        </projection>
        <projection id="NCXLS_PVR_vBWML12" postsynapticPopulation="vBWML12" presynapticPopulation="PVR">
            <connection preFractionAlong="0.164702959968" preCellId="../PVR/0/PVR" postFractionAlong="1.0" postSegmentId="276" postCellId="../vBWML12/0/vBWML12" preSegmentId="47" id="3892883"/>
        </projection>
        <projection id="NCXLS_AVAL_vBWMR21" postsynapticPopulation="vBWMR21" presynapticPopulation="AVAL">
            <connection preFractionAlong="0.339942414696" preCellId="../AVAL/0/AVAL" postFractionAlong="0.0" postSegmentId="163" postCellId="../vBWMR21/0/vBWMR21" preSegmentId="40" id="3905584"/>
            <connection preFractionAlong="0.369824994835" preCellId="../AVAL/0/AVAL" postFractionAlong="0.0" postSegmentId="135" postCellId="../vBWMR21/0/vBWMR21" preSegmentId="40" id="3905605"/>
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        </projection>
        <projection id="NCXLS_RMDVL_vBWMR4" postsynapticPopulation="vBWMR4" presynapticPopulation="RMDVL">
            <connection preFractionAlong="1.0" preCellId="../RMDVL/0/RMDVL" postFractionAlong="0.628747531914" postSegmentId="10" postCellId="../vBWMR4/0/vBWMR4" preSegmentId="16" id="3939612"/>
            <connection preFractionAlong="1.0" preCellId="../RMDVL/0/RMDVL" postFractionAlong="1.0" postSegmentId="12" postCellId="../vBWMR4/0/vBWMR4" preSegmentId="13" id="3939845"/>
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        </projection>
        <projection id="NCXLS_RMEV_dBWML2" postsynapticPopulation="dBWML2" presynapticPopulation="RMEV">
            <connection preFractionAlong="0.0" preCellId="../RMEV/0/RMEV" postFractionAlong="0.0" postSegmentId="4" postCellId="../dBWML2/0/dBWML2" preSegmentId="53" id="3962300"/>
            <connection preFractionAlong="1.0" preCellId="../RMEV/0/RMEV" postFractionAlong="0.0" postSegmentId="192" postCellId="../dBWML2/0/dBWML2" preSegmentId="64" id="3962491"/>
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        </projection>
        <projection id="NCXLS_RMGL_dBWML5" postsynapticPopulation="dBWML5" presynapticPopulation="RMGL">
            <connection preFractionAlong="1.0" preCellId="../RMGL/0/RMGL" postFractionAlong="0.149166893458" postSegmentId="149" postCellId="../dBWML5/0/dBWML5" preSegmentId="18" id="3981184"/>
        </projection>
        <projection id="NCXLS_RIAR_vBWML6" postsynapticPopulation="vBWML6" presynapticPopulation="RIAR">
            <connection preFractionAlong="1.0" preCellId="../RIAR/0/RIAR" postFractionAlong="0.453126283297" postSegmentId="107" postCellId="../vBWML6/0/vBWML6" preSegmentId="25" id="3994802"/>
            <connection preFractionAlong="1.0" preCellId="../RIAR/0/RIAR" postFractionAlong="1.0" postSegmentId="10" postCellId="../vBWML6/0/vBWML6" preSegmentId="22" id="3995259"/>
        </projection>
        <projection id="NCXLS_RIVR_vBWMR7" postsynapticPopulation="vBWMR7" presynapticPopulation="RIVR">
            <connection preFractionAlong="1.0" preCellId="../RIVR/0/RIVR" postFractionAlong="1.0" postSegmentId="93" postCellId="../vBWMR7/0/vBWMR7" preSegmentId="24" id="4014698"/>
            <connection preFractionAlong="0.0" preCellId="../RIVR/0/RIVR" postFractionAlong="0.0" postSegmentId="92" postCellId="../vBWMR7/0/vBWMR7" preSegmentId="0" id="4014800"/>
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        </projection>
        <projection id="NCXLS_SMBVL_vBWML1" postsynapticPopulation="vBWML1" presynapticPopulation="SMBVL">
            <connection preFractionAlong="1.0" preCellId="../SMBVL/0/SMBVL" postFractionAlong="1.0" postSegmentId="102" postCellId="../vBWML1/0/vBWML1" preSegmentId="10" id="4029371"/>
            <connection preFractionAlong="1.0" preCellId="../SMBVL/0/SMBVL" postFractionAlong="1.0" postSegmentId="33" postCellId="../vBWML1/0/vBWML1" preSegmentId="8" id="4029707"/>
            <connection preFractionAlong="1.0" preCellId="../SMBVL/0/SMBVL" postFractionAlong="0.0" postSegmentId="34" postCellId="../vBWML1/0/vBWML1" preSegmentId="8" id="4029708"/>
        </projection>
        <projection id="NCXLS_SMBDR_dBWMR7" postsynapticPopulation="dBWMR7" presynapticPopulation="SMBDR">
            <connection preFractionAlong="0.494180671121" preCellId="../SMBDR/0/SMBDR" postFractionAlong="1.0" postSegmentId="32" postCellId="../dBWMR7/0/dBWMR7" preSegmentId="21" id="4040163"/>
            <connection preFractionAlong="0.793347771627" preCellId="../SMBDR/0/SMBDR" postFractionAlong="0.0" postSegmentId="183" postCellId="../dBWMR7/0/dBWMR7" preSegmentId="21" id="4040165"/>
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        </projection>
        <projection id="NCXLS_VB10_vBWML21" postsynapticPopulation="vBWML21" presynapticPopulation="VB10">
            <connection preFractionAlong="0.153437623577" preCellId="../VB10/0/VB10" postFractionAlong="0.0" postSegmentId="51" postCellId="../vBWML21/0/vBWML21" preSegmentId="6" id="4048903"/>
            <connection preFractionAlong="0.599709531916" preCellId="../VB10/0/VB10" postFractionAlong="0.830145871482" postSegmentId="49" postCellId="../vBWML21/0/vBWML21" preSegmentId="5" id="4048905"/>
        </projection>
        <projection id="NCXLS_RMDVR_dBWML3" postsynapticPopulation="dBWML3" presynapticPopulation="RMDVR">
            <connection preFractionAlong="1.0" preCellId="../RMDVR/0/RMDVR" postFractionAlong="1.0" postSegmentId="20" postCellId="../dBWML3/0/dBWML3" preSegmentId="9" id="4057581"/>
            <connection preFractionAlong="0.0" preCellId="../RMDVR/0/RMDVR" postFractionAlong="1.0" postSegmentId="54" postCellId="../dBWML3/0/dBWML3" preSegmentId="12" id="4057663"/>
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        </projection>
        <projection id="NCXLS_RIVR_vBWMR6" postsynapticPopulation="vBWMR6" presynapticPopulation="RIVR">
            <connection preFractionAlong="1.0" preCellId="../RIVR/0/RIVR" postFractionAlong="1.0" postSegmentId="48" postCellId="../vBWMR6/0/vBWMR6" preSegmentId="24" id="4066745"/>
            <connection preFractionAlong="0.0" preCellId="../RIVR/0/RIVR" postFractionAlong="0.0" postSegmentId="30" postCellId="../vBWMR6/0/vBWMR6" preSegmentId="21" id="4067831"/>
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        </projection>
        <projection id="NCXLS_SMBDR_dBWML2" postsynapticPopulation="dBWML2" presynapticPopulation="SMBDR">
            <connection preFractionAlong="1.0" preCellId="../SMBDR/0/SMBDR" postFractionAlong="0.0" postSegmentId="4" postCellId="../dBWML2/0/dBWML2" preSegmentId="15" id="4082814"/>
            <connection preFractionAlong="0.0" preCellId="../SMBDR/0/SMBDR" postFractionAlong="0.0" postSegmentId="5" postCellId="../dBWML2/0/dBWML2" preSegmentId="19" id="4082904"/>
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        </projection>
        <projection id="NCXLS_SMDDR_vBWMR6" postsynapticPopulation="vBWMR6" presynapticPopulation="SMDDR">
            <connection preFractionAlong="0.387906230087" preCellId="../SMDDR/0/SMDDR" postFractionAlong="0.817567227805" postSegmentId="179" postCellId="../vBWMR6/0/vBWMR6" preSegmentId="3" id="4094843"/>
            <connection preFractionAlong="1.0" preCellId="../SMDDR/0/SMDDR" postFractionAlong="0.6728705244" postSegmentId="69" postCellId="../vBWMR6/0/vBWMR6" preSegmentId="4" id="4094845"/>
        </projection>
        <projection id="NCXLS_PVPL_vBWML10" postsynapticPopulation="vBWML10" presynapticPopulation="PVPL">
            <connection preFractionAlong="0.543476109225" preCellId="../PVPL/0/PVPL" postFractionAlong="0.53383659478" postSegmentId="72" postCellId="../vBWML10/0/vBWML10" preSegmentId="34" id="4103108"/>
            <connection preFractionAlong="0.730380805932" preCellId="../PVPL/0/PVPL" postFractionAlong="0.17339449881" postSegmentId="202" postCellId="../vBWML10/0/vBWML10" preSegmentId="36" id="4103120"/>
        </projection>
        <projection id="NCXLS_AVDR_vBWMR21" postsynapticPopulation="vBWMR21" presynapticPopulation="AVDR">
            <connection preFractionAlong="0.3153228754" preCellId="../AVDR/0/AVDR" postFractionAlong="0.0" postSegmentId="163" postCellId="../vBWMR21/0/vBWMR21" preSegmentId="38" id="4114772"/>
            <connection preFractionAlong="0.341731853836" preCellId="../AVDR/0/AVDR" postFractionAlong="0.093143564682" postSegmentId="245" postCellId="../vBWMR21/0/vBWMR21" preSegmentId="38" id="4114775"/>
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        </projection>
        <projection id="NCXLS_URADR_dBWMR5" postsynapticPopulation="dBWMR5" presynapticPopulation="URADR">
            <connection preFractionAlong="0.435747986186" preCellId="../URADR/0/URADR" postFractionAlong="1.0" postSegmentId="220" postCellId="../dBWMR5/0/dBWMR5" preSegmentId="6" id="4160718"/>
            <connection preFractionAlong="1.0" preCellId="../URADR/0/URADR" postFractionAlong="0.547160886894" postSegmentId="354" postCellId="../dBWMR5/0/dBWMR5" preSegmentId="3" id="4160742"/>
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        </projection>
        <projection id="NCXLS_CEPVR_vBWMR8" postsynapticPopulation="vBWMR8" presynapticPopulation="CEPVR">
            <connection preFractionAlong="1.0" preCellId="../CEPVR/0/CEPVR" postFractionAlong="1.0" postSegmentId="2" postCellId="../vBWMR8/0/vBWMR8" preSegmentId="16" id="4179007"/>
            <connection preFractionAlong="0.0" preCellId="../CEPVR/0/CEPVR" postFractionAlong="1.0" postSegmentId="48" postCellId="../vBWMR8/0/vBWMR8" preSegmentId="28" id="4179960"/>
        </projection>
        <projection id="NCXLS_PHCR_vBWML13" postsynapticPopulation="vBWML13" presynapticPopulation="PHCR">
            <connection preFractionAlong="1.0" preCellId="../PHCR/0/PHCR" postFractionAlong="1.0" postSegmentId="154" postCellId="../vBWML13/0/vBWML13" preSegmentId="17" id="4188309"/>
        </projection>
        <projection id="NCXLS_GLRDL_dBWMR7" postsynapticPopulation="dBWMR7" presynapticPopulation="GLRDL">
            <connection preFractionAlong="1.0" preCellId="../GLRDL/0/GLRDL" postFractionAlong="1.0" postSegmentId="32" postCellId="../dBWMR7/0/dBWMR7" preSegmentId="20" id="4204814"/>
            <connection preFractionAlong="1.0" preCellId="../GLRDL/0/GLRDL" postFractionAlong="0.0" postSegmentId="180" postCellId="../dBWMR7/0/dBWMR7" preSegmentId="18" id="4204830"/>
            <connection preFractionAlong="0.0" preCellId="../GLRDL/0/GLRDL" postFractionAlong="0.0" postSegmentId="180" postCellId="../dBWMR7/0/dBWMR7" preSegmentId="19" id="4204831"/>
        </projection>
        <projection id="NCXLS_PVWR_vBWML12" postsynapticPopulation="vBWML12" presynapticPopulation="PVWR">
            <connection preFractionAlong="1.0" preCellId="../PVWR/0/PVWR" postFractionAlong="1.0" postSegmentId="378" postCellId="../vBWML12/0/vBWML12" preSegmentId="15" id="4210891"/>
        </projection>
        <projection id="NCXLS_VB10_vBWML22" postsynapticPopulation="vBWML22" presynapticPopulation="VB10">
            <connection preFractionAlong="0.621978348627" preCellId="../VB10/0/VB10" postFractionAlong="0.538106892783" postSegmentId="42" postCellId="../vBWML22/0/vBWML22" preSegmentId="3" id="4227686"/>
            <connection preFractionAlong="0.717570908809" preCellId="../VB10/0/VB10" postFractionAlong="0.295521560917" postSegmentId="340" postCellId="../vBWML22/0/vBWML22" preSegmentId="4" id="4227691"/>
            <connection preFractionAlong="0.717570908809" preCellId="../VB10/0/VB10" postFractionAlong="0.295521560917" postSegmentId="394" postCellId="../vBWML22/0/vBWML22" preSegmentId="4" id="4227692"/>
            <connection preFractionAlong="0.761555208168" preCellId="../VB10/0/VB10" postFractionAlong="0.576809456658" postSegmentId="64" postCellId="../vBWML22/0/vBWML22" preSegmentId="8" id="4227698"/>
        </projection>
        <projection id="NCXLS_RMDVL_vBWMR2" postsynapticPopulation="vBWMR2" presynapticPopulation="RMDVL">
            <connection preFractionAlong="1.0" preCellId="../RMDVL/0/RMDVL" postFractionAlong="1.0" postSegmentId="54" postCellId="../vBWMR2/0/vBWMR2" preSegmentId="13" id="4244503"/>
            <connection preFractionAlong="1.0" preCellId="../RMDVL/0/RMDVL" postFractionAlong="1.0" postSegmentId="24" postCellId="../vBWMR2/0/vBWMR2" preSegmentId="11" id="4244587"/>
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        </projection>
        <projection id="NCXLS_VD12_vBWMR22" postsynapticPopulation="vBWMR22" presynapticPopulation="VD12">
            <connection preFractionAlong="0.870244672098" preCellId="../VD12/0/VD12" postFractionAlong="0.902509270426" postSegmentId="134" postCellId="../vBWMR22/0/vBWMR22" preSegmentId="8" id="4268276"/>
            <connection preFractionAlong="0.31343535142" preCellId="../VD12/0/VD12" postFractionAlong="0.0581049556978" postSegmentId="394" postCellId="../vBWMR22/0/vBWMR22" preSegmentId="10" id="4268293"/>
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        </projection>
        <projection id="NCXLS_SMBVL_vBWML3" postsynapticPopulation="vBWML3" presynapticPopulation="SMBVL">
            <connection preFractionAlong="0.826061705247" preCellId="../SMBVL/0/SMBVL" postFractionAlong="0.825406496206" postSegmentId="135" postCellId="../vBWML3/0/vBWML3" preSegmentId="8" id="4293453"/>
            <connection preFractionAlong="0.0" preCellId="../SMBVL/0/SMBVL" postFractionAlong="1.0" postSegmentId="26" postCellId="../vBWML3/0/vBWML3" preSegmentId="11" id="4293669"/>
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        </projection>
        <projection id="NCXLS_RMEV_dBWMR2" postsynapticPopulation="dBWMR2" presynapticPopulation="RMEV">
            <connection preFractionAlong="1.0" preCellId="../RMEV/0/RMEV" postFractionAlong="1.0" postSegmentId="218" postCellId="../dBWMR2/0/dBWMR2" preSegmentId="63" id="4308211"/>
            <connection preFractionAlong="0.0" preCellId="../RMEV/0/RMEV" postFractionAlong="1.0" postSegmentId="58" postCellId="../dBWMR2/0/dBWMR2" preSegmentId="53" id="4308360"/>
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        </projection>
        <projection id="NCXLS_SMDVR_vBWML8" postsynapticPopulation="vBWML8" presynapticPopulation="SMDVR">
            <connection preFractionAlong="0.0206729164807" preCellId="../SMDVR/0/SMDVR" postFractionAlong="0.197259828058" postSegmentId="103" postCellId="../vBWML8/0/vBWML8" preSegmentId="21" id="4319440"/>
        </projection>
        <projection id="NCXLS_AVBL_vBWML11" postsynapticPopulation="vBWML11" presynapticPopulation="AVBL">
            <connection preFractionAlong="0.0837252450835" preCellId="../AVBL/0/AVBL" postFractionAlong="0.0464030451169" postSegmentId="170" postCellId="../vBWML11/0/vBWML11" preSegmentId="12" id="4325554"/>
        </projection>
        <projection id="NCXLS_AVG_vBWML16" postsynapticPopulation="vBWML16" presynapticPopulation="AVG">
            <connection preFractionAlong="0.802396333421" preCellId="../AVG/0/AVG" postFractionAlong="0.248118891868" postSegmentId="132" postCellId="../vBWML16/0/vBWML16" preSegmentId="15" id="4336796"/>
            <connection preFractionAlong="0.202496328767" preCellId="../AVG/0/AVG" postFractionAlong="0.555654431726" postSegmentId="222" postCellId="../vBWML16/0/vBWML16" preSegmentId="15" id="4336801"/>
        </projection>
        <projection id="NCXLS_AVAR_vBWML21" postsynapticPopulation="vBWML21" presynapticPopulation="AVAR">
            <connection preFractionAlong="0.339918122762" preCellId="../AVAR/0/AVAR" postFractionAlong="1.0" postSegmentId="251" postCellId="../vBWML21/0/vBWML21" preSegmentId="40" id="4349642"/>
            <connection preFractionAlong="0.36896293241" preCellId="../AVAR/0/AVAR" postFractionAlong="0.0" postSegmentId="211" postCellId="../vBWML21/0/vBWML21" preSegmentId="40" id="4349658"/>
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        </projection>
        <projection id="NCXLS_SMBDL_dBWMR3" postsynapticPopulation="dBWMR3" presynapticPopulation="SMBDL">
            <connection preFractionAlong="0.972762296411" preCellId="../SMBDL/0/SMBDL" postFractionAlong="0.722208952463" postSegmentId="6" postCellId="../dBWMR3/0/dBWMR3" preSegmentId="18" id="4380334"/>
            <connection preFractionAlong="0.240216357755" preCellId="../SMBDL/0/SMBDL" postFractionAlong="1.0" postSegmentId="113" postCellId="../dBWMR3/0/dBWMR3" preSegmentId="16" id="4380348"/>
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        </projection>
        <projection id="NCXLS_URADR_dBWMR4" postsynapticPopulation="dBWMR4" presynapticPopulation="URADR">
            <connection preFractionAlong="1.0" preCellId="../URADR/0/URADR" postFractionAlong="0.64343441526" postSegmentId="63" postCellId="../dBWMR4/0/dBWMR4" preSegmentId="16" id="4390167"/>
            <connection preFractionAlong="0.0" preCellId="../URADR/0/URADR" postFractionAlong="0.864274331563" postSegmentId="39" postCellId="../dBWMR4/0/dBWMR4" preSegmentId="6" id="4390171"/>
            <connection preFractionAlong="0.0" preCellId="../URADR/0/URADR" postFractionAlong="0.864274331563" postSegmentId="152" postCellId="../dBWMR4/0/dBWMR4" preSegmentId="6" id="4390172"/>
            <connection preFractionAlong="0.352275006933" preCellId="../URADR/0/URADR" postFractionAlong="0.686383469274" postSegmentId="179" postCellId="../dBWMR4/0/dBWMR4" preSegmentId="6" id="4390248"/>
        </projection>
        <projection id="NCXLS_SMBDR_dBWMR1" postsynapticPopulation="dBWMR1" presynapticPopulation="SMBDR">
            <connection preFractionAlong="1.0" preCellId="../SMBDR/0/SMBDR" postFractionAlong="1.0" postSegmentId="224" postCellId="../dBWMR1/0/dBWMR1" preSegmentId="12" id="4402351"/>
            <connection preFractionAlong="0.0" preCellId="../SMBDR/0/SMBDR" postFractionAlong="0.0" postSegmentId="75" postCellId="../dBWMR1/0/dBWMR1" preSegmentId="15" id="4402550"/>
            <connection preFractionAlong="0.0" preCellId="../SMBDR/0/SMBDR" postFractionAlong="0.0" postSegmentId="168" postCellId="../dBWMR1/0/dBWMR1" preSegmentId="15" id="4402551"/>
        </projection>
        <projection id="NCXLS_PVNL_vBWMR22" postsynapticPopulation="vBWMR22" presynapticPopulation="PVNL">
            <connection preFractionAlong="0.550672941251" preCellId="../PVNL/0/PVNL" postFractionAlong="0.0418979595051" postSegmentId="48" postCellId="../vBWMR22/0/vBWMR22" preSegmentId="18" id="4410332"/>
        </projection>
        <projection id="NCXLS_SMBDR_dBWML5" postsynapticPopulation="dBWML5" presynapticPopulation="SMBDR">
            <connection preFractionAlong="0.788847205277" preCellId="../SMBDR/0/SMBDR" postFractionAlong="0.459977701606" postSegmentId="55" postCellId="../dBWML5/0/dBWML5" preSegmentId="20" id="4422560"/>
            <connection preFractionAlong="0.0484835738283" preCellId="../SMBDR/0/SMBDR" postFractionAlong="0.762712670032" postSegmentId="289" postCellId="../dBWML5/0/dBWML5" preSegmentId="21" id="4422561"/>
            <connection preFractionAlong="0.288965689373" preCellId="../SMBDR/0/SMBDR" postFractionAlong="0.578028410382" postSegmentId="173" postCellId="../dBWML5/0/dBWML5" preSegmentId="21" id="4422564"/>
            <connection preFractionAlong="0.530920180943" preCellId="../SMBDR/0/SMBDR" postFractionAlong="0.399499718419" postSegmentId="132" postCellId="../dBWML5/0/dBWML5" preSegmentId="21" id="4422566"/>
        </projection>
        <projection id="NCXLS_PVWR_vBWML11" postsynapticPopulation="vBWML11" presynapticPopulation="PVWR">
            <connection preFractionAlong="1.0" preCellId="../PVWR/0/PVWR" postFractionAlong="1.0" postSegmentId="41" postCellId="../vBWML11/0/vBWML11" preSegmentId="15" id="4430961"/>
        </projection>
        <projection id="NCXLS_RMDVL_vBWMR3" postsynapticPopulation="vBWMR3" presynapticPopulation="RMDVL">
            <connection preFractionAlong="0.0" preCellId="../RMDVL/0/RMDVL" postFractionAlong="0.34486188223" postSegmentId="46" postCellId="../vBWMR3/0/vBWMR3" preSegmentId="14" id="4441225"/>
            <connection preFractionAlong="1.0" preCellId="../RMDVL/0/RMDVL" postFractionAlong="1.0" postSegmentId="74" postCellId="../vBWMR3/0/vBWMR3" preSegmentId="11" id="4441310"/>
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        </projection>
        <projection id="NCXLS_SMBVL_vBWML2" postsynapticPopulation="vBWML2" presynapticPopulation="SMBVL">
            <connection preFractionAlong="1.0" preCellId="../SMBVL/0/SMBVL" postFractionAlong="1.0" postSegmentId="230" postCellId="../vBWML2/0/vBWML2" preSegmentId="9" id="4461411"/>
            <connection preFractionAlong="1.0" preCellId="../SMBVL/0/SMBVL" postFractionAlong="1.0" postSegmentId="229" postCellId="../vBWML2/0/vBWML2" preSegmentId="8" id="4461455"/>
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        </projection>
        <projection id="NCXLS_LUAR_vBWMR12" postsynapticPopulation="vBWMR12" presynapticPopulation="LUAR">
            <connection preFractionAlong="1.0" preCellId="../LUAR/0/LUAR" postFractionAlong="1.0" postSegmentId="90" postCellId="../vBWMR12/0/vBWMR12" preSegmentId="13" id="4479664"/>
            <connection preFractionAlong="1.0" preCellId="../LUAR/0/LUAR" postFractionAlong="1.0" postSegmentId="88" postCellId="../vBWMR12/0/vBWMR12" preSegmentId="11" id="4479993"/>
        </projection>
        <projection id="NCXLS_AS11_dBWML21" postsynapticPopulation="dBWML21" presynapticPopulation="AS11">
            <connection preFractionAlong="0.710012543333" preCellId="../AS11/0/AS11" postFractionAlong="0.938754185821" postSegmentId="172" postCellId="../dBWML21/0/dBWML21" preSegmentId="22" id="4487056"/>
        </projection>
        <projection id="NCXLS_RMDL_vBWMR8" postsynapticPopulation="vBWMR8" presynapticPopulation="RMDL">
            <connection preFractionAlong="1.0" preCellId="../RMDL/0/RMDL" postFractionAlong="1.0" postSegmentId="2" postCellId="../vBWMR8/0/vBWMR8" preSegmentId="16" id="4491810"/>
        </projection>
        <projection id="NCXLS_IL1VR_vBWMR4" postsynapticPopulation="vBWMR4" presynapticPopulation="IL1VR">
            <connection preFractionAlong="0.0584198725786" preCellId="../IL1VR/0/IL1VR" postFractionAlong="0.206681876047" postSegmentId="123" postCellId="../vBWMR4/0/vBWMR4" preSegmentId="3" id="4503519"/>
            <connection preFractionAlong="0.0" preCellId="../IL1VR/0/IL1VR" postFractionAlong="0.859439817334" postSegmentId="123" postCellId="../vBWMR4/0/vBWMR4" preSegmentId="4" id="4503533"/>
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        </projection>
        <projection id="NCXLS_SMBDL_dBWMR2" postsynapticPopulation="dBWMR2" presynapticPopulation="SMBDL">
            <connection preFractionAlong="1.0" preCellId="../SMBDL/0/SMBDL" postFractionAlong="1.0" postSegmentId="218" postCellId="../dBWMR2/0/dBWMR2" preSegmentId="15" id="4518040"/>
            <connection preFractionAlong="0.0" preCellId="../SMBDL/0/SMBDL" postFractionAlong="1.0" postSegmentId="216" postCellId="../dBWMR2/0/dBWMR2" preSegmentId="19" id="4518104"/>
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        </projection>
        <projection id="NCXLS_VD10_vBWML19" postsynapticPopulation="vBWML19" presynapticPopulation="VD10">
            <connection preFractionAlong="0.553453978502" preCellId="../VD10/0/VD10" postFractionAlong="1.0" postSegmentId="132" postCellId="../vBWML19/0/vBWML19" preSegmentId="28" id="4532540"/>
            <connection preFractionAlong="1.0" preCellId="../VD10/0/VD10" postFractionAlong="0.0" postSegmentId="24" postCellId="../vBWML19/0/vBWML19" preSegmentId="29" id="4532542"/>
            <connection preFractionAlong="1.0" preCellId="../VD10/0/VD10" postFractionAlong="1.0" postSegmentId="129" postCellId="../vBWML19/0/vBWML19" preSegmentId="29" id="4532543"/>
        </projection>
        <projection id="NCXLS_VD10_vBWMR19" postsynapticPopulation="vBWMR19" presynapticPopulation="VD10">
            <connection preFractionAlong="0.744680090375" preCellId="../VD10/0/VD10" postFractionAlong="0.699374163793" postSegmentId="44" postCellId="../vBWMR19/0/vBWMR19" preSegmentId="11" id="4547716"/>
            <connection preFractionAlong="0.628988838604" preCellId="../VD10/0/VD10" postFractionAlong="0.0" postSegmentId="16" postCellId="../vBWMR19/0/vBWMR19" preSegmentId="10" id="4547768"/>
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        </projection>
        <projection id="NCXLS_AVL_vBWMR12" postsynapticPopulation="vBWMR12" presynapticPopulation="AVL">
            <connection preFractionAlong="0.095690866719" preCellId="../AVL/0/AVL" postFractionAlong="0.159715796581" postSegmentId="24" postCellId="../vBWMR12/0/vBWMR12" preSegmentId="33" id="4555460"/>
        </projection>
        <projection id="NCXLS_VA10_vBWML19" postsynapticPopulation="vBWML19" presynapticPopulation="VA10">
            <connection preFractionAlong="0.212666212037" preCellId="../VA10/0/VA10" postFractionAlong="1.0" postSegmentId="132" postCellId="../vBWML19/0/vBWML19" preSegmentId="5" id="4561928"/>
            <connection preFractionAlong="0.14990106986" preCellId="../VA10/0/VA10" postFractionAlong="1.0" postSegmentId="148" postCellId="../vBWML19/0/vBWML19" preSegmentId="5" id="4561934"/>
            <connection preFractionAlong="0.14990106986" preCellId="../VA10/0/VA10" postFractionAlong="1.0" postSegmentId="178" postCellId="../vBWML19/0/vBWML19" preSegmentId="5" id="4561935"/>
        </projection>
        <projection id="NCXLS_SMBVR_dBWMR4" postsynapticPopulation="dBWMR4" presynapticPopulation="SMBVR">
            <connection preFractionAlong="0.0" preCellId="../SMBVR/0/SMBVR" postFractionAlong="0.423103096604" postSegmentId="123" postCellId="../dBWMR4/0/dBWMR4" preSegmentId="13" id="4570499"/>
        </projection>
        <projection id="NCXLS_IL1VL_vBWML2" postsynapticPopulation="vBWML2" presynapticPopulation="IL1VL">
            <connection preFractionAlong="0.495881294213" preCellId="../IL1VL/0/IL1VL" postFractionAlong="0.817737165492" postSegmentId="155" postCellId="../vBWML2/0/vBWML2" preSegmentId="8" id="4593502"/>
            <connection preFractionAlong="0.72589944907" preCellId="../IL1VL/0/IL1VL" postFractionAlong="0.272482180778" postSegmentId="92" postCellId="../vBWML2/0/vBWML2" preSegmentId="8" id="4593507"/>
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        </projection>
        <projection id="NCXLS_VD11_vBWMR21" postsynapticPopulation="vBWMR21" presynapticPopulation="VD11">
            <connection preFractionAlong="0.763227503103" preCellId="../VD11/0/VD11" postFractionAlong="0.0586342993932" postSegmentId="120" postCellId="../vBWMR21/0/vBWMR21" preSegmentId="12" id="4614213"/>
            <connection preFractionAlong="0.220062941864" preCellId="../VD11/0/VD11" postFractionAlong="0.0688656931281" postSegmentId="375" postCellId="../vBWMR21/0/vBWMR21" preSegmentId="12" id="4614225"/>
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        </projection>
        <projection id="NCXLS_RMEV_dBWMR6" postsynapticPopulation="dBWMR6" presynapticPopulation="RMEV">
            <connection preFractionAlong="0.0122913941195" preCellId="../RMEV/0/RMEV" postFractionAlong="0.770843151265" postSegmentId="71" postCellId="../dBWMR6/0/dBWMR6" preSegmentId="53" id="4634864"/>
            <connection preFractionAlong="1.0" preCellId="../RMEV/0/RMEV" postFractionAlong="0.797580468903" postSegmentId="219" postCellId="../dBWMR6/0/dBWMR6" preSegmentId="63" id="4634868"/>
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        </projection>
        <projection id="NCXLS_CEPDR_dBWMR5" postsynapticPopulation="dBWMR5" presynapticPopulation="CEPDR">
            <connection preFractionAlong="0.555626337065" preCellId="../CEPDR/0/CEPDR" postFractionAlong="1.0" postSegmentId="220" postCellId="../dBWMR5/0/dBWMR5" preSegmentId="6" id="4657126"/>
            <connection preFractionAlong="0.119502716836" preCellId="../CEPDR/0/CEPDR" postFractionAlong="1.0" postSegmentId="114" postCellId="../dBWMR5/0/dBWMR5" preSegmentId="6" id="4657143"/>
        </projection>
        <projection id="NCXLS_SMBDL_dBWMR1" postsynapticPopulation="dBWMR1" presynapticPopulation="SMBDL">
            <connection preFractionAlong="1.0" preCellId="../SMBDL/0/SMBDL" postFractionAlong="1.0" postSegmentId="224" postCellId="../dBWMR1/0/dBWMR1" preSegmentId="16" id="4674345"/>
            <connection preFractionAlong="1.0" preCellId="../SMBDL/0/SMBDL" postFractionAlong="0.0" postSegmentId="75" postCellId="../dBWMR1/0/dBWMR1" preSegmentId="14" id="4674517"/>
            <connection preFractionAlong="1.0" preCellId="../SMBDL/0/SMBDL" postFractionAlong="0.0" postSegmentId="168" postCellId="../dBWMR1/0/dBWMR1" preSegmentId="14" id="4674518"/>
            <connection preFractionAlong="1.0" preCellId="../SMBDL/0/SMBDL" postFractionAlong="1.0" postSegmentId="269" postCellId="../dBWMR1/0/dBWMR1" preSegmentId="14" id="4674519"/>
        </projection>
        <projection id="NCXLS_AVKL_vBWMR6" postsynapticPopulation="vBWMR6" presynapticPopulation="AVKL">
            <connection preFractionAlong="0.99587570937" preCellId="../AVKL/0/AVKL" postFractionAlong="0.16376233679" postSegmentId="69" postCellId="../vBWMR6/0/vBWMR6" preSegmentId="18" id="4693556"/>
            <connection preFractionAlong="0.0186048682611" preCellId="../AVKL/0/AVKL" postFractionAlong="0.401717522137" postSegmentId="80" postCellId="../vBWMR6/0/vBWMR6" preSegmentId="41" id="4693568"/>
        </projection>
        <projection id="NCXLS_PVR_vBWMR12" postsynapticPopulation="vBWMR12" presynapticPopulation="PVR">
            <connection preFractionAlong="0.847622452489" preCellId="../PVR/0/PVR" postFractionAlong="0.181714448917" postSegmentId="107" postCellId="../vBWMR12/0/vBWMR12" preSegmentId="49" id="4722120"/>
            <connection preFractionAlong="0.786915085769" preCellId="../PVR/0/PVR" postFractionAlong="0.0" postSegmentId="95" postCellId="../vBWMR12/0/vBWMR12" preSegmentId="47" id="4722124"/>
        </projection>
        <projection id="NCXLS_IL1VL_vBWML1" postsynapticPopulation="vBWML1" presynapticPopulation="IL1VL">
            <connection preFractionAlong="0.955911082295" preCellId="../IL1VL/0/IL1VL" postFractionAlong="0.0" postSegmentId="216" postCellId="../vBWML1/0/vBWML1" preSegmentId="8" id="4747847"/>
            <connection preFractionAlong="0.72589360406" preCellId="../IL1VL/0/IL1VL" postFractionAlong="0.0" postSegmentId="218" postCellId="../vBWML1/0/vBWML1" preSegmentId="8" id="4747851"/>
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        </projection>
        <projection id="NCXLS_SMDDR_vBWMR2" postsynapticPopulation="vBWMR2" presynapticPopulation="SMDDR">
            <connection preFractionAlong="1.0" preCellId="../SMDDR/0/SMDDR" postFractionAlong="1.0" postSegmentId="54" postCellId="../vBWMR2/0/vBWMR2" preSegmentId="7" id="4763797"/>
            <connection preFractionAlong="0.0" preCellId="../SMDDR/0/SMDDR" postFractionAlong="1.0" postSegmentId="24" postCellId="../vBWMR2/0/vBWMR2" preSegmentId="10" id="4763908"/>
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        </projection>
        <projection id="NCXLS_RMEV_dBWMR7" postsynapticPopulation="dBWMR7" presynapticPopulation="RMEV">
            <connection preFractionAlong="0.137487344972" preCellId="../RMEV/0/RMEV" postFractionAlong="0.216022566782" postSegmentId="90" postCellId="../dBWMR7/0/dBWMR7" preSegmentId="44" id="4781008"/>
            <connection preFractionAlong="0.14979998448" preCellId="../RMEV/0/RMEV" postFractionAlong="0.0" postSegmentId="99" postCellId="../dBWMR7/0/dBWMR7" preSegmentId="44" id="4781020"/>
            <connection preFractionAlong="0.117491291817" preCellId="../RMEV/0/RMEV" postFractionAlong="0.0" postSegmentId="83" postCellId="../dBWMR7/0/dBWMR7" preSegmentId="44" id="4781032"/>
            <connection preFractionAlong="0.0725586879583" preCellId="../RMEV/0/RMEV" postFractionAlong="0.808235288458" postSegmentId="32" postCellId="../dBWMR7/0/dBWMR7" preSegmentId="53" id="4781036"/>
        </projection>
        <projection id="NCXLS_VD12_dBWMR21" postsynapticPopulation="dBWMR21" presynapticPopulation="VD12">
            <connection preFractionAlong="0.523382957353" preCellId="../VD12/0/VD12" postFractionAlong="0.0" postSegmentId="32" postCellId="../dBWMR21/0/dBWMR21" preSegmentId="14" id="4810013"/>
            <connection preFractionAlong="1.0" preCellId="../VD12/0/VD12" postFractionAlong="0.53242704676" postSegmentId="187" postCellId="../dBWMR21/0/dBWMR21" preSegmentId="21" id="4810074"/>
        </projection>
        <projection id="NCXLS_AS11_dBWML23" postsynapticPopulation="dBWML23" presynapticPopulation="AS11">
            <connection preFractionAlong="0.957285991309" preCellId="../AS11/0/AS11" postFractionAlong="0.382911123579" postSegmentId="288" postCellId="../dBWML23/0/dBWML23" preSegmentId="17" id="4817105"/>
        </projection>
    </network>
</neuroml>
