<neuroml xmlns="http://www.neuroml.org/schema/neuroml2"  xmlns:xi="http://www.w3.org/2001/XInclude" xmlns:xs="http://www.w3.org/2001/XMLSchema" xmlns:xsi="http://www.w3.org/2001/XMLSchema-instance" xsi:schemaLocation="http://www.w3.org/2001/XMLSchema" id="MuscleConnections">
    <network id="MuscleConnections">
        <population id="vBWMR12" component="vBWMR12" size="1">
            <instance id="0">
                <location y="0.000000" x="0.000000" z="0.000000"/>
            </instance>
        </population>
        <projection id="NCXLS_PVWR_vBWMR12" postsynapticPopulation="vBWMR12" presynapticPopulation="PVWR">
            <connection preFractionAlong="1.0" preCellId="../PVWR/0/PVWR" postFractionAlong="1.0" postSegmentId="90" postCellId="../vBWMR12/0/vBWMR12" preSegmentId="15" id="1"/>
        </projection>
    </network>
</neuroml>
